# wedi Bauplatte

Dataset: ILCD process, EPD, specific dataset
Geography: DE
Reference year: 2019
Valid until: 2024
Classification: OEKOBAU.DAT: Komposite / Systembauteile / Innenwände
Classification: IBUCategories: 02 Bauprodukte / Wärmedämmungsprodukte / Dämmstoffe aus Schaumkunststoffen
Method details: Dämmstoffe aus Schaumkunststoffen.pdf
Registration number: EPD-WDI-20190016-IAA1-DE
Owner: WESSLING GmbH
Compliance: DIN EN 15804; ISO 14025
Review: Accredited third party review by Institut Bauen und Umwelt e. V.
Amounts: rows without a unit in brackets have none in this file; such an amount is in the reference unit of its flow, which a separate flow dataset defines
copyright: true

## General comment
Die wedi Bauplatte besteht aus einem extrudierten Polystyrol-Hartschaumkern mit einer beidseitigen Glasfaserarmierung und einer zementären Mörtelbeschichtung.

Extrudierter Polystyrol-Hartschaum (XPS) ist ein Kunststoffschaum-Dämmstoff entsprechend der /EN 13164/, der in Form von Platten im Rohdichtenbereich von 35 kg/m³ (+/-3) produziert wird.

Die rechnerische Dichte der wedi Bauplatte unter Einbeziehung der Beschichtung beträgt 177 kg/m³. Die wedi Bauplatten werden in einer Stärke von 4 mm bis 100 mm und mit besäumten Kanten geliefert.

## Technology and included processes
XPS wird in einem kontinuierlichen Extrusionsprozess aus Polystyrol-Granulat hergestellt. Das Polystyrol wird mit den Zusatzstoffen in einem Tandem-Extruder unter hohem Druck aufgeschmolzen und homogenisiert. Das Treibmittel wird in der Schmelze gelöst und anschließend durch eine Breitschlitzdüse ausgetragen. Durch den dabei stark abfallenden Gegendruck schäumt das Treibmittel die Schmelze in Umgebungstemperatur auf. Die Schmelze kühlt sich dabei ab und der Polystyrol-Schaum verfestigt sich. Es entsteht ein geschlossenzelliger Polystyrol-Hartschaum. Dieser kühlt sich weiter ab und kann nach der Entfernung der Extrusionshaut verpackt werden. Zur Beschichtung der Hartschaumplatte wird ein polymer-modifizierter Mörtel mit Wasser gemischt und zusammen mit dem Glasgewebe auf den XPS-Kern aufgebracht. Die getrocknete Platte kann abschließend dimensioniert werden. Die wedi Bauplatten werden auf Paletten mit Polyethylen-Folie verpackt. XPS aus Produktionsabschnitten und Frässtaub wird direkt in den Produktionen rezykliert und wieder zur Produktion von XPS eingesetzt. Polystyrol ist ein thermoplastisches Material und kann deshalb einfach und kostengünstig durch Aufschmelzen rezykliert werden.
Deklarierte Einheit:
Die deklarierte Einheit der vorliegenden Studie ist eine zweiseitig beschichtete wedi Bauplatte mit einer Fläche von 1 m² und einer Dicke von 20 mm.

## Technical purpose
Die wedi Bauplatte kann auf fast jedem Untergrund angebracht werden, ist wasserundurchlässig, wärmedämmend, leicht und stabil. Die wedi Bauplatte kann mit Putzen und Fliesen aller Art beschichtet werden.

Die wedi Bauplatte ist insbesondere für den Nassbereich in Bad- und Wellnessanlagen geeignet. Sie wird sowohl im Neubau als auch in der Sanierung eingesetzt. Als Fliesenträgerelement findet sie Einsatz im Wandbereich, als Trennwandkonstruktion und im Bodenbereich.

Als Konstruktionselement lassen sich im Nassbereich von privaten oder öffentlichen Bädern, Toilettenanlagen und Wellnessanlagen mit der wedi Bauplatte Badmöbel, Waschtische, Sitzbänke und Liegen (beheizt und unbeheizt), Nischen und Regale erstellen.

## Reference product
- wedi Bauplatte, 20 mm: 1

## Inputs
- Erneuerbare Primärenergie als Energieträger (PERE) [MJ]: A1-A3 0.91, A5 0
- Erneuerbare Primärenergie zur stofflichen Nutzung (PERM) [MJ]: A1-A3 7.96, A5 0.00182
- Total erneuerbare Primärenergie (PERT) [MJ]: A1-A3 8.87, A5 0.00182
- Nicht-erneuerbare Primärenergie als Energieträger (PENRE) [MJ]: A1-A3 4.22, A5 0
- Nicht-erneuerbare Primärenergie zur stofflichen Nutzung (PENRM) [MJ]: A1-A3 94.65, A5 0.0085
- Total nicht erneuerbare Primärenergie (PENRT) [MJ]: A1-A3 98.87, A5 0.0085
- Einsatz von Sekundärstoffen (SM) [kg]: A1-A3 0, A5 0
- Erneuerbare Sekundärbrennstoffe (RSF) [MJ]: A1-A3 0.044, A5 0
- Nicht erneuerbare Sekundärbrennstoffe (NRSF) [MJ]: A1-A3 0.46, A5 0
- Einsatz von Süßwasserressourcen (FW) [m^3]: A1-A3 0.0124, A5 5.37e-5

## Outputs
- Gefährlicher Abfall zur Deponie (HWD) [kg]: A1-A3 3.13e-6, A5 4.38e-11
- Entsorgter nicht gefährlicher Abfall (NHWD) [kg]: A1-A3 0.0384, A5 0.00162
- Entsorgter radioaktiver Abfall (RWD) [kg]: A1-A3 0.00132, A5 3.81e-7
- Komponenten für die Wiederverwendung (CRU) [kg]: A1-A3 0, A5 0
- Stoffe zum Recycling (MFR) [kg]: A1-A3 0, A5 0
- Stoffe für die Energierückgewinnung (MER) [kg]: A1-A3 0.63, A5 0
- Exportierte elektrische Energie (EEE) [MJ]: A1-A3 0, A5 0
- Exportierte thermische Energie (EET) [MJ]: A1-A3 0, A5 0

## Impact indicators
- Globales Erwärmungspotenzial (GWP) [kg CO_(2)-Äq.]: A1-A3 4.63, A5 0.021
- Abbau Potential der stratosphärischen Ozonschicht (ODP) [kg CFC11-Äq.]: A1-A3 1.4e-8, A5 1.48e-15
- Versauerungspotenzial von Boden und Wasser (AP) [kg SO_(2)-Äq.]: A1-A3 0.01, A5 2.45e-6
- Eutrophierungspotenzial (EP) [kg PO_(4)^(3)-Äq.]: A1-A3 0.00116, A5 5.12e-7
- Bildungspotential für troposphärisches Ozon (POCP) [kg Ethen-Äq.]: A1-A3 0.00154, A5 2.39e-7
- Potenzial für den abiotischen Abbau nicht fossiler Ressourcen (ADPE) [kg Sb-Äq.]: A1-A3 2.13e-5, A5 1.65e-10
- Potenzial für den abiotischen Abbau fossiler Brennstoffe (ADPF) [MJ]: A1-A3 93.48, A5 0.0076

## Use advice
Gültigkeitsbereich:
Die Ökobilanz bezieht sich auf Daten für das Jahr 2016 aus dem Produktionsstandort der wedi GmbH in Emsdetten, Deutschland.
Systemgrenze:
Die Umweltinformationen der vorliegenden EPD beruhen auf einer „cradle-to-gate“-Annahme („Wiege bis Werkstor“) und berücksichtigen daher ausschließlich die Module des Produktionsstadiums bzw. der Herstellungsphase A1-A3 sowie das Modul A5 zur Beschreibung des End-of-Life-Prozesses des Verpackungsmaterials.

A1: Rohstoffgewinnung- und Verarbeitung

1. Kern aus extrudiertem Polystyrol-Hartschaum

2. Armierung aus Glasfasergewebe

3. Kunststoffvergüteter Mörtel

A2: Transport zum Hersteller

Bereitstellung von Diesel und die Verwendung der Transportfahrzeuge (LKW) über die spezifischen Distanzen und Auslastung wurden berücksichtigt.

A3: Produktionsprozess wedi

Die Vorbereitung der Vorprodukte vor dem Zusammensetzen und der allgemeine Produktionsprozess der Bauplatte bis zur Verpackung und Lagerung wurden berücksichtigt.

A5: Baustadium: End of Life Verpackungsmaterial

Zur Vervollständigung wurde mit dem Modul A5 die Entsorgung des im Werk verwendeten Verpackungsmaterials berücksichtigt.

## Data sources
- wedi Bauplatte.pdf
- GaBi Database (all versions)
- GaBi database SP34 2017
