# Nadelschnittholz - getrocknet (Durchschnitt DE)

Dataset: ILCD process, EPD, representative dataset
Geography: DE
Reference year: 2020
Valid until: 2025
Classification: OEKOBAU.DAT: Holz / Vollholz / Bau-Schnittholz
Method details: ILCD format; EN 15804
Owner: Thünen-Institut für Holzforschung
Compliance: EN 15804
Review: Independent external review by Dr. Frank Werner - Umwelt & Entwicklung
Amounts: rows without a unit in brackets have none in this file; such an amount is in the reference unit of its flow, which a separate flow dataset defines
copyright: true

## General comment
Weitere Informationen zur deklarierten Einheit (Zusammensetzung) und die auf Herstellerangaben beruhende Sachbilanz (In- und Output der Stoff- und Energieströme) stehen als Excel-Datei unter dem Unterpunkt Hintergrund-Bericht zum Download bereit.
Der Datensatz wurde 2020 als Aktualisierung mit gleichbleibendem Vordergrundsystem erstellt. Alle Hintergrunddaten entstammen der GaBi Professional Datenbank 2020 im Service Pack 40. Die Modellierung und Berechnung der Ökobilanz basiert auf den europäischen Normen EN 15804:2012+A1:2013 und EN 16485:2014. Bei Rückfragen wenden Sie sich bitte an holzundklima@thuenen.de.

## Geography
Für die Ökobilanzierung von kammergetrocknetem Nadelschnittholz wurden Daten von 38 Werken berücksichtigt (Rüter & Diederichs 2012). Im Rahmen der den Daten zugrunde liegenden Ökobilanzstudie wurden insgesamt 178 Prozesslinien für Vollholzprodukte erfasst. Im Verhältnis zu den vom Statistischen Bundesamt gemeldeten Produktionsmengen im selben Zeitraum entspricht die erreichte Abdeckung von Vollholzprodukten aus Nadelschnittholz 38 %.

## Time period
Der Datensatz basiert auf Produktionsdaten aus den Jahren 2009 bis 2011 (Vordergrundsystem).
Eine Aktualisierung des Hintergrundsystems erfolgte 2020.

## Technology and included processes
Die Holzrohstoffe werden durchschnittlich 111 km transportiert. Der größte Anteil der Rohstoffe ist Rundholz in Rinde. Zur Herstellung des Produktes wird frisches Nadelschnittholz in Paketen voll- oder halbautomatisch gebündelt und getrocknet.Dabei kommen bis auf sehr wenige Ausnahmen Trockenkammern mit der Arbeitsweise der Frischluft-Ablufttrocknung zur Anwendung. Das enthaltene Wasser wir langsam und kontrollieet an die umgebende Luft abgegeben. Dabei spielt die Zuführung von Wasser und Wärmeenergie in Form von erhitzter Luft eine zentrale Rolle. Die Trocknung kan je nach Dimension und gewünschter Endfeuchte mehrere Tage dauern. Tunneltrockner arbeiten nach dem gleichen Prinzip, sind aber meist bei Schnittholzveredlern in Gebrauch, da eine gleichmäßige Produktdimensionierung vorausgesetzt wird. Nach der Trocknung wird das Produkt für den Transport gestapelt und verpackt. Das Produkt wird nicht mit Holzschutzmitteln behandelt.
Die Holzfeuchte des Produktes liegt bei 12%

## Technical purpose
Kammergetrocknetes Nadelschnittholz ist eingeschnittenes Nadelholz in allen typischen Dimensionen als Balken, Bohle, Vierkantholz oder Latte. Nadelschnittholz (NH) findet Anwendung in der Bau- und Möbelindustrie. Im Baubereich werden aus Nadelschnittholz insbesondere Holzhäuser, Dachstühle, Fenster und Türen sowie Fußböden (Dielen, Parkett oder Laminat) hergestellt.

## Scenarios
- energetisch: therm. Verwertung
- stofflich: stoffl. Verwertung

## Reference product
- Nadelschnittholz - kammergetrocknet (Durchschnitt DE): 1

## Inputs
- Use of renewable primary energy (PERE) [MJ]: A1 24.8113, A2 5.01552, A3 1944.42, A1-A3 1974.25, A5 0.228473, C2 0.390441, C3 30.8332, D (energetisch) 6083.62, D (stofflich) -32.6592
- Use of renewable primary energy resources used as raw materials (PERM) [MJ]: A1 8336.44, A2 0, A3 33.6354, A1-A3 8370.08, A5 -33.6354, C2 0, C3 -8336.44, D (energetisch) 0, D (stofflich) 0
- Total use of renewable primary energy resources (PERT) [MJ]: A1 8361.25, A2 5.01552, A3 1978.06, A1-A3 10344.3, A5 -33.407, C2 0.390441, C3 -8305.61, D (energetisch) 6083.62, D (stofflich) -32.6592
- Use of non renewable primary energy (PENRE) [MJ]: A1 185.708, A2 83.0557, A3 445.311, A1-A3 714.074, A5 1.24325, C2 6.95284, C3 53.6094, D (energetisch) -4630.92, D (stofflich) -169.834
- Use of non renewable primary energy resources used as raw materials (PENRM) [MJ]: A1 0, A2 0, A3 11.232, A1-A3 11.232, A5 -11.232, C2 0, C3 0, D (energetisch) 0, D (stofflich) 0
- Total use of non renewable primary energy resource (PENRT) [MJ]: A1 185.708, A2 83.0557, A3 456.543, A1-A3 725.306, A5 -9.98875, C2 6.95284, C3 53.6094, D (energetisch) -4630.92, D (stofflich) -169.834
- Use of secondary material (SM) [kg]: A1 0, A2 0, A3 0, A1-A3 0, A5 0, C2 0, C3 0, D (energetisch) 0, D (stofflich) 484.445
- Use of renewable secondary fuels (RSF) [MJ]: A1 0, A2 0, A3 151.619, A1-A3 151.619, A5 0, C2 0, C3 0, D (energetisch) 0, D (stofflich) 0
- Use of non renewable secondary fuels (NRSF) [MJ]: A1 0, A2 0, A3 0, A1-A3 0, A5 0, C2 0, C3 0, D (energetisch) 0, D (stofflich) 0
- Use of net fresh water (FW) [m3]: A1 0.0169037, A2 0.00445704, A3 0.132633, A1-A3 0.153994, A5 0.0137134, C2 0.000452104, C3 0.0166923, D (energetisch) 0.702, D (stofflich) -0.0204057

## Outputs
- Hazardous waste disposed (HWD) [kg]: A1 1.01396e-5, A2 3.11442e-6, A3 5.44482e-6, A1-A3 1.86988e-5, A5 3.38771e-9, C2 3.23563e-7, C3 3.60527e-8, D (energetisch) -2.78244e-6, D (stofflich) -5.48597e-6
- Non hazardous waste dispose (NHWD) [kg]: A1 0.0494737, A2 0.0147326, A3 1.54917, A1-A3 1.61338, A5 0.0468422, C2 0.00106405, C3 0.0412596, D (energetisch) 2.16455, D (stofflich) -0.0403912
- Radioactive waste disposed (RWD) [kg]: A1 0.00233332, A2 0.000117576, A3 0.025689, A1-A3 0.0281399, A5 6.15897e-5, C2 8.60578e-6, C3 0.00448112, D (energetisch) -0.305235, D (stofflich) -0.00400923
- Components for re-use (CRU) [kg]: A1 0, A2 0, A3 0, A1-A3 0, A5 0, C2 0, C3 0, D (energetisch) 0, D (stofflich) 0
- Materials for recycling (MFR) [kg]: A1 0, A2 0, A3 0, A1-A3 0, A5 0, C2 0, C3 484.445, D (energetisch) 0, D (stofflich) 0
- Materials for energy recovery (MER) [kg]: A1 0, A2 0, A3 0, A1-A3 0, A5 0, C2 0, C3 484.445, D (energetisch) 0, D (stofflich) 0
- Exported electrical energy (EEE) [MJ]: A1 0, A2 0, A3 0.158457, A1-A3 0.158457, A5 8.8556, C2 0, C3 0, D (energetisch) 0, D (stofflich) 0
- Exported thermal energy (EET) [MJ]: A1 0, A2 0, A3 0.368113, A1-A3 0.368113, A5 17.1524, C2 0, C3 0, D (energetisch) 0, D (stofflich) 0

## Impact indicators
- Global warming potential (GWP) [kg CO2-Äqv.]: A1 -777.864, A2 6.16927, A3 32.7582, A1-A3 -738.936, A5 4.61851, C2 0.502109, C3 796.779, D (energetisch) -349.478, D (stofflich) -13.1262
- Depletion potential of the stratospheric ozone layer (ODP) [kg R11 eq.]: A1 8.88039e-14, A2 3.18303e-15, A3 9.99606e-13, A1-A3 1.09159e-12, A5 9.9187e-16, C2 8.35821e-17, C3 1.7597e-13, D (energetisch) -1.19849e-11, D (stofflich) -1.55316e-13
- Acidification potential of soil and water (AP) [kg SO2-Äqv.]: A1 0.0776208, A2 0.0251203, A3 0.264261, A1-A3 0.367002, A5 0.000579526, C2 0.0021038, C3 0.00587833, D (energetisch) -0.352009, D (stofflich) -0.0481029
- Eutrophication potential (EP) [kg Phosphat-Äqv.]: A1 0.0187306, A2 0.00636949, A3 0.056494, A1-A3 0.0815941, A5 0.000123197, C2 0.000529249, C3 0.00104827, D (energetisch) -0.0585853, D (stofflich) -0.0112563
- Formation potential of tropospheric ozone (POCP) [kg Ethen-Äqv.]: A1 0.00952779, A2 -0.0109017, A3 0.0691981, A1-A3 0.0678243, A5 3.76164e-5, C2 -0.000884726, C3 0.000414745, D (energetisch) -0.027646, D (stofflich) -0.000373414
- Abiotic depletion potential for non fossil resources (ADPE) [kg Sb-Äqv.]: A1 2.05825e-6, A2 5.77426e-7, A3 2.77263e-5, A1-A3 3.0362e-5, A5 6.34834e-8, C2 4.22798e-8, C3 1.75259e-6, D (energetisch) -0.000116287, D (stofflich) -2.26976e-6
- Abiotic depletion potential for fossil resources (ADPF) [MJ]: A1 179.813, A2 82.7562, A3 383.86, A1-A3 646.429, A5 1.08813, C2 6.93087, C3 42.2985, D (energetisch) -3860.46, D (stofflich) -159.711

## Use advice
Aufgrund der hohen Abdeckung bildet der Datensatz die durchschnittlichen Produktionsverhältnisse und die damit verbundenen Umweltwirkungen repräsentativ für Deutschland ab. Liegen keine
herstellerspezifischen Ökobilanzergebnisse des verwendeten Produkts vor, empfiehlt sich die Verwendung dieses Durchschnittsdatensatzes.

## Data sources
- Rüter S, Diederichs S (2012) Ökobilanz Basisdaten für Bauprodukte aus Holz, Hamburg, Johann Heinrich von Thünen Institut, Institut für Holztechnologie und Holzbiologie, Abschlussbericht
- GaBi database SP40 2020
- GaBi database (general)
