# Doppelbodensystem Typ LIGNA

Dataset: ILCD process, EPD, specific dataset
Geography: DE
Reference year: 2016
Valid until: 2021
Classification: OEKOBAU.DAT: Komposite / Systembauteile / Decken
Classification: IBUCategories: 02 Bauprodukte / Systemböden / Systemböden
Method details: Systemböden.pdf
Registration number: EPD-LIN-20160235-IAA1-DE
Owner: Lindner Group
Compliance: DIN EN 15804; ISO 14025
Review: Accredited third party review by Institut Bauen und Umwelt e. V.
Amounts: rows without a unit in brackets have none in this file; such an amount is in the reference unit of its flow, which a separate flow dataset defines
copyright: false

## General comment
Doppelbodensysteme vom Typ LIGNA sind werkseitig industriell vorgefertigte modulare Komponenten, die einen Installationsraum für die Unterbringung aller Installationen sowie Ver- und Entsorgungsleitungen bilden und jederzeit an jeder Stelle den freien Zugang zu diesem Hohlraum gestatten.

Das Doppelbodensystem wird im Wesentlichen von der Doppelbodenplatte und der Unterkonstruktion gebildet. Für die Montage werden ergänzende Teile bzw. Produkte (Auflageplättchen, Rohbodenver-siegelung, Stützenkleber, Gewindeversiegelung, Kantenversiegelung und Wandanschlussband) benötigt.

Die Doppelbodenplatten, Typ LIGNA, werden aus hochverdichteten Holzwerkstoffplatten hergestellt (Rohdichtebereich ca. 600 – 720 kg/m³ und Platten-stärken von 28 – 38 mm). Doppelbodenplatten werden standardmäßig in den Abmessungen 600 x 600 mm und mit seitlich angeklebten Kantenbändern gefertigt. Unterseitig und/oder oberseitig sind die Platten mit Stahlblech oder Feuchteschutz beschichtet.

Als Unterkonstruktion werden Stahlstützen verwendet, die unterschiedliche Konstruktionshöhen (28 – 2.000 mm) ermöglichen.

Durch das Zusammenfügen (Montage in Gebäuden) der einzelnen Komponenten zu einem Flächen-verbund, entsteht die Bauart Doppelboden. Entsprechend den speziellen Anforderungen werden die Plattentypen (Dichte und Plattendicke) und die Dimensionierung der Unterkonstruktion bestimmt.

## Technology and included processes
Die Doppelbodenplatten, Typ LIGNA, werden aus hochverdichteten Holzwerkstoffplatten hergestellt (Rohdichtebereich ca. 600 – 720 kg/m³ und Platten-stärken von 28 – 38 mm). Doppelbodenplatten werden standardmäßig in den Abmessungen 600 x 600 mm und mit seitlich angeklebten Kantenbändern gefertigt. Unterseitig und/oder oberseitig sind die Platten mit Stahlblech oder Feuchteschutz beschichtet. Als Unterkonstruktion werden Stahlstützen verwendet, die unterschiedliche Konstruktionshöhen (28 – 2.000 mm) ermöglichen. Durch das Zusammenfügen (Montage in Gebäuden) der einzelnen Komponenten zu einem Flächen-verbund, entsteht die Bauart Doppelboden. Entsprechend den speziellen Anforderungen werden die Plattentypen (Dichte und Plattendicke) und die Dimensionierung der Unterkonstruktion bestimmt. Herstellung und Verarbeitung der Doppelbodenplatte: Die im Großformat angelieferten hochverdichteten Holzwerkstoffplatten werden in einem ersten Fertigungsschritt konfektioniert. In weiteren Fertigungsschritten werden die Platten unterseitig und/oder oberseitig mit Stahlblech oder Feuchteschutz beschichtet. Seitlich werden die Holzwerkstoffplatten mit Kantenbändern beklebt. Herstellung der Stützen: Durch Widerstandsschweißen oder Vertaumeln der einzelnen Komponenten Rohre, Gewindestangen und Stahlblech werden die Stützen hergestellt. Dimensionen der einzelnen Komponenten richten sich nach technischen Vorgaben. Durch Galvanotechnik (galvanische Verzinkung) werden die Stützen mit einer Zinkschicht versehen, um sie vor Korrosion zu schützen.
Deklarierte Einheit:
Die deklarierte Einheit bezieht sich jeweils auf 1 m² Doppelboden LIGNA ohne Bodenbelag mit einer durchschnittlichen Holzplattendicke von 37,52 mm und der durchschnittlichen Dichte von 644,31 kg/m³.

Die deklarierte Einheit hat ein Gesamtgewicht für die Platte von 24,17 kg/m² zzgl. 1,3488 kg die dazugehörigen Stützen (4 Stück pro m² Doppelboden) mit einem Gewicht von 0,3372 kg je Stütze. Der Oberbelag wird für die Ökobilanzierung nicht betrachtet, da die Möglichkeiten an Belägen sehr vielfältig sind. Dies kann entweder Parkett, Linoleum, Teppich usw. sein.

## Technical purpose
Das unter 2.1 genannte Doppelbodensystem aus hochverdichteten Holzwerkstoffplatten, Doppelboden-stützen und ergänzenden Komponenten wird hauptsächlich in öffentlichen, gewerblichen und privat genutzten Gebäuden zur Herstellung von Hohlräumen/

Installationsräumen eingesetzt. Doppelbodensysteme können mit allen üblichen Bodenbelägen belegt werden, müssen jedoch auf die verschiedenen Systemvarianten abgestimmt werden.

## Reference product
- 1 m² Doppelbodensystem LIGNA: 1

## Inputs
- Erneuerbare Primärenergie als Energieträger (PERE) [MJ]: A1-A3 5.89, A4 0.589, A5 4.04892, B1 0, B2 0, B3 0, B4 0, B5 0, C1 0, C2 0.11568, C3 182.67, C4 0, D -35.59
- Erneuerbare Primärenergie zur stofflichen Nutzung (PERM) [MJ]: A1-A3 188.144, A4 0, A5 -5.47154, B1 0, B2 0, B3 0, B4 0, B5 0, C1 0, C2 0, C3 -182.672, C4 0, D 0
- Total erneuerbare Primärenergie (PERT) [MJ]: A1-A3 194.037, A4 0.588997, A5 -1.42, B1 0, B2 0, B3 0, B4 0, B5 0, C1 0, C2 0.1156, C3 1.31687, C4 0, D -35.59
- Nicht-erneuerbare Primärenergie als Energieträger (PENRE) [MJ]: A1-A3 206.97, A4 8.67, A5 0.014, B1 0, B2 0, B3 0, B4 0, B5 0, C1 0, C2 1.7034, C3 12.3552, C4 0, D -217.247
- Nicht-erneuerbare Primärenergie zur stofflichen Nutzung (PENRM) [MJ]: A1-A3 0, A4 0, A5 0, B1 0, B2 0, B3 0, B4 0, B5 0, C1 0, C2 0, C3 0, C4 0, D 0
- Total nicht erneuerbare Primärenergie (PENRT) [MJ]: A1-A3 206.97, A4 8.67, A5 0.0144844, B1 0, B2 0, B3 0, B4 0, B5 0, C1 0, C2 1.70343, C3 12.36, C4 0, D -217.247
- Einsatz von Sekundärstoffen (SM) [kg]: A1-A3 7.4174, A4 0, A5 0, B1 0, B2 0, B3 0, B4 0, B5 0, C1 0, C2 0, C3 0, C4 0, D 1.03
- Erneuerbare Sekundärbrennstoffe (RSF) [MJ]: A1-A3 0, A4 0, A5 0, B1 0, B2 0, B3 0, B4 0, B5 0, C1 0, C2 0, C3 0, C4 0, D 0
- Nicht erneuerbare Sekundärbrennstoffe (NRSF) [MJ]: A1-A3 0, A4 0, A5 0, B1 0, B2 0, B3 0, B4 0, B5 0, C1 0, C2 0, C3 0, C4 0, D 0
- Einsatz von Süßwasserressourcen (FW) [m^3]: A1-A3 0.09354, A4 0.00089, A5 0.000121, B1 0, B2 0, B3 0, B4 0, B5 0, C1 0, C2 0.000174, C3 0.0990593, C4 0, D -0.020461

## Outputs
- Gefährlicher Abfall zur Deponie (HWD) [kg]: A1-A3 1.47e-6, A4 1.16e-6, A5 8.88e-11, B1 0, B2 0, B3 0, B4 0, B5 0, C1 0, C2 2.191, C3 8.629e-9, C4 0, D -1.1526
- Entsorgter nicht gefährlicher Abfall (NHWD) [kg]: A1-A3 0.369, A4 0.001, A5 0.00168592, B1 0, B2 0, B3 0, B4 0, B5 0, C1 0, C2 0.0002, C3 0.09185, C4 0, D -0.122
- Entsorgter radioaktiver Abfall (RWD) [kg]: A1-A3 0.0066, A4 1.17e-5, A5 8.05e-7, B1 0, B2 0, B3 0, B4 0, B5 0, C1 0, C2 2.3063, C3 0.0006, C4 0, D -0.0084
- Komponenten für die Wiederverwendung (CRU) [kg]: A1-A3 0, A4 0, A5 0, B1 0, B2 0, B3 0, B4 0, B5 0, C1 0, C2 0, C3 0, C4 0, D 0
- Stoffe zum Recycling (MFR) [kg]: A1-A3 0.1335, A4 0, A5 0.0858, B1 0, B2 0, B3 0, B4 0, B5 0, C1 0, C2 1.2881, C3 0, C4 0, D 0
- Stoffe für die Energierückgewinnung (MER) [kg]: A1-A3 0, A4 0, A5 0, B1 0, B2 0, B3 0, B4 0, B5 0, C1 0, C2 0, C3 0, C4 0, D 0
- Exportierte elektrische Energie (EEE) [MJ]: A1-A3 0, A4 0, A5 0.0727476, B1 0, B2 0, B3 0, B4 0, B5 0, C1 0, C2 0, C3 42.653, C4 0, D 0
- Exportierte thermische Energie (EET) [MJ]: A1-A3 0, A4 0, A5 0.17286, B1 0, B2 0, B3 0, B4 0, B5 0, C1 0, C2 0, C3 99.281, C4 0, D 0

## Impact indicators
- Globales Erwärmungspotenzial (GWP) [kg CO_(2)-Äq.]: A1-A3 -28.3729, A4 0.63, A5 0.0499894, B1 0, B2 0, B3 0, B4 0, B5 0, C1 0, C2 0.124262, C3 43.47, C4 0, D -15.681
- Abbau Potential der stratosphärischen Ozonschicht (ODP) [kg CFC11-Äq.]: A1-A3 7.1025e-9, A4 1.31543e-12, A5 1.37e-13, B1 0, B2 0, B3 0, B4 0, B5 0, C1 0, C2 2.58355, C3 1.57604e-10, C4 0, D -4.25e-10
- Versauerungspotenzial von Boden und Wasser (AP) [kg SO_(2)-Äq.]: A1-A3 0.045, A4 0.001, A5 7.12951, B1 0, B2 0, B3 0, B4 0, B5 0, C1 0, C2 0.000283768, C3 0.014, C4 0, D -0.022
- Eutrophierungspotenzial (EP) [kg PO_(4)^(3)-Äq.]: A1-A3 0.0056, A4 0.00036, A5 1.009e-6, B1 0, B2 0, B3 0, B4 0, B5 0, C1 0, C2 7.07249e-5, C3 0.00355815, C4 0, D -0.00288
- Bildungspotential für troposphärisches Ozon (POCP) [kg Ethen-Äq.]: A1-A3 0.007, A4 -0.0004, A5 5.18e-7, B1 0, B2 0, B3 0, B4 0, B5 0, C1 0, C2 -8.81216, C3 0.000987581, C4 0, D -0.00266
- Potenzial für den abiotischen Abbau nicht fossiler Ressourcen (ADPE) [kg Sb-Äq.]: A1-A3 3.81e-5, A4 4.81e-8, A5 2.67e-9, B1 0, B2 0, B3 0, B4 0, B5 0, C1 0, C2 9.4443e-9, C3 4.17e-7, C4 0, D -3.375e-6
- Potenzial für den abiotischen Abbau fossiler Brennstoffe (ADPF) [MJ]: A1-A3 190.157, A4 8.643, A5 0.0124605, B1 0, B2 0, B3 0, B4 0, B5 0, C1 0, C2 1.69745, C3 10.766, C4 0, D -195.9

## Use advice
Gültigkeitsbereich:
Die EPD bezieht sich auf das Doppelbodensystem Typ LIGNA. Die gesammelten Produktionsdaten beziehen sich auf das Jahr 2015. Die Ökobilanz, die auf plausiblen, transparent nachvollziehbaren Basisdaten beruht, repräsentiert zu 100% das genannte Systemprodukt.
Systemgrenze:
Die Lebenszyklusanalyse für die System Doppelboden LIGNA umfasst die Lebenswegabschnitte „von der Wiege bis Werkstor mit Optionen“ (cradle to gate with options).

Sie beginnt mit der Herstellung und Verarbeitung der Rohmaterialien bzw. Zuschneiden von den Spanplatten. Ebenfalls eingeschlossen sind die Herstellung der weiteren Hilfs- und Betriebsstoffe, wie z. B. Kraftstoffe für Transporte sowie die Verpackung der auslieferfähigen Systemböden und Stahlstützen. Berücksichtigt werden die Module A1-A3 als zusammengefasstes Modul für die Herstellungsphase, A4-A5 (Errichtungsphase), B1-B5 (Nutzungsphase), C1-C4 (Entsorgungsphase), D(Gutschriften und Lasten außerhalb der Systemgrenze).

Im Einzelnen wurden folgende Prozesse in das Informationsmodul A1-A3 der Herstellung des Doppelbodensystems, Typ LIGNA, einbezogen:
- Bereitstellungsprozesse von Rohmaterial (Holzwerkstoffplatten, Stahl) (A1)
- Transporte der Roh- und Hilfs- und Betriebsstoffe zum Werk (A2)
- Herstellungsprozesse für das Systemprodukt im Werk, inkl. der energetischen Aufwendungen (Strom, thermische Energie und Entsorgung von anfallenden Reststoffen (A3)
- Herstellung von Verpackungsmaterialien (A3)
- Transport vom Werkstor bis zur Baustelle (A4).
Beim Einbau in das Gebäude werden keine weiteren Materialien berücksichtigt; das Modul A5 umfasst die Umweltlasten für die Entsorgung der Verpackung.Für die Nutzungsphase (B1- B5) werden die Module mit 0 deklariert. Das Produkt verursacht während der Nutzungsphase keine Umweltlasten.

Das Produkt selbst bedarf keiner Wartung; die Reinigung der Böden hängt stets vom Oberbelag und der Nutzung ab. Die EPD bezieht sich rein auf die Doppelbodenkonstruktion. Bei normaler Nutzung ist während der Gebäudenutzung keine Reparatur oder Austausch zu erwarten.
Module B6 und B7 werden nicht betrachtet.
Für das Entsorgungsstadium wird der Rückbau und Abriss des Produktes aus dem Gebäude, einschließlich einer ersten manuellen Sortierung auf der Baustelle (C1) und der Transport in einen Recyclinghof berücksichtigt (C2).
Die Spanplatte erreicht nie das Ende der Abfalleigenschaft. Diese wird in C3 als Abfallstoff verbrannt und die exportierte Energie deklariert; die vermiedenen Umweltlasten zur Erzeugung dieser Energie werden in D ausgewiesen.
Es wird angenommen, dass die Stahlstützen nach dem Transport auf den Recyclinghof das Ende der Abfalleigenschaft erreichen. Ein Entsorgungsfachbetrieb erhält für den sortierten Stahl eine Vergütung. Damit wird der Stahl zum Wertstoff. Die Stahlstützen werden im Modul D recycelt.

Im Modul C4 entstehen keine Umweltlasten. Es wird daher mit 0 deklariert.

## Data sources
- Doppelbodensystem Typ LIGNA.pdf
- GaBi Database (all versions)
- GaBi database SP29 2016
