# Röhrenspanplatte (Durchschnitt DE)

Dataset: ILCD process, EPD, representative dataset
Geography: DE
Reference year: 2020
Valid until: 2025
Classification: OEKOBAU.DAT: Holz / Holzwerkstoffe / Spanplatten
Method details: EN 15804; ILCD format
Owner: Thünen-Institut für Holzforschung
Compliance: EN 15804
Review: Independent external review by Dr. Frank Werner - Umwelt & Entwicklung
Amounts: rows without a unit in brackets have none in this file; such an amount is in the reference unit of its flow, which a separate flow dataset defines
copyright: true

## General comment
Weitere Informationen zur deklarierten Einheit (Zusammensetzung) und die auf Herstellerangaben beruhende Sachbilanz (In- und Output der Stoff- und Energieströme) stehen als Excel-Datei unter dem Unterpunkt Hintergrundbericht zum Download bereit.
Der Datensatz wurde 2020 als Aktualisierung mit gleichbleibendem Vordergrundsystem erstellt. Alle Hintergrunddaten entstammen der GaBi Professional Datenbank 2020 im Service Pack 40. Die Modellierung und Berechnung der Ökobilanz basiert auf den europäischen Normen EN 15804:2012+A1:2013 und EN 16485:2014. Bei Rückfragen wenden Sie sich bitte an holzundklima@thuenen.de.

## Geography
Primärdaten wurden mittels Fragebögen von 2009 bis 2011 erhoben und anhand einzelner Werksbegehungen und durch den Vergleich verschiedener Kenndaten sowie den Vergleich zwischen den Produktionsstätten auf Plausibilität überprüft. Die Produktion der an der Ökobilanzstudie beteiligten Projektpartner lag bei 250.000 m³/a.

## Time period
Der Datensatz basiert auf Produktionsdaten aus den Jahren 2009 bis 2011 (Vordergrundsystem).
Eine Aktualisierung des Hintergrundsystems erfolgte 2020.

## Technology and included processes
Röhrenspanplatten bestehen hauptsächlich aus kleinteiligen Holzpartikeln wie Spänen und Mehl und werden mit duroplastischen Bindemitteln verpresst. Als Bindemittel werden Harnstoff-Formaldehyd-Harze (UF) verwendet. Als weitere Inhaltstoffe werden Paraffine zur Hydrophobierung der Späne genutzt. Zur Herstellung dieser spanbasierten Holzwerkstoffe werden Holzrohstoffe aus Waldholz (Industrie-holz oder Waldhackschnitzel) und Industrierestholz (Industrierestholz, Hackschnitzel, Holzmehl) zu-nächst aufbereitet und getrocknet. Die sortierten Fraktionen werden mit Bindemitteln vermischt und durch einen Einfallkanal zwischen zwei Heizplatten gestreut. Die Späne werden über eine Kolben mit Rundstäben für die Hohlräume nach und nach komprimiert. Der verpresste Plattenstrang wird aufgetrennt und formatiert. Nachdem die Klebstoffe vollständig ausgehärtet sind, werden die Platten verpackt.
Die Holzfeuchte des Produktes liegt bei 7%

## Technical purpose
Röhrenspanplatten sind leichte Spanplatten, bei denen die mittlere Schicht mit röhrenförmigen Hohlräumen durchzogen ist. Spanplatten können im dekorativen Innenausbau, Möbelbau sowie im Holzbau eingesetzt werden. Für die Röhrenspanplatte ergibt sich besonders im Be-reich der Innentüren ein breites Anwendungsgebiet.

## Scenarios
- energetisch: therm. Verwertung
- stofflich: stoffl. Verwertung

## Reference product
- Röhrenspanplatte: 1

## Inputs
- Use of renewable primary energy (PERE) [MJ]: A1 57.1741, A2 4.65857, A3 1104.46, A1-A3 1166.29, A5 0.827008, C2 0.26758, C3 30.8332, D (energetisch) 3259.42, D (stofflich) -36.2938
- Use of renewable primary energy resources used as raw materials (PERM) [MJ]: A1 4532.54, A2 0, A3 44.8522, A1-A3 4577.39, A5 -44.8522, C2 0, C3 -4532.54, D (energetisch) 0, D (stofflich) 0
- Total use of renewable primary energy resources (PERT) [MJ]: A1 4589.71, A2 4.65857, A3 1149.31, A1-A3 5743.68, A5 -44.0252, C2 0.26758, C3 -4501.71, D (energetisch) 3259.42, D (stofflich) -36.2938
- Use of non renewable primary energy (PENRE) [MJ]: A1 648.862, A2 56.2634, A3 1071.29, A1-A3 1776.41, A5 3.912, C2 4.76497, C3 53.6094, D (energetisch) -3001.81, D (stofflich) -156.536
- Use of non renewable primary energy resources used as raw materials (PENRM) [MJ]: A1 204.675, A2 0, A3 47.916, A1-A3 252.591, A5 -47.916, C2 0, C3 -204.675, D (energetisch) 0, D (stofflich) 0
- Total use of non renewable primary energy resource (PENRT) [MJ]: A1 853.538, A2 56.2634, A3 1119.2, A1-A3 2029, A5 -44.004, C2 4.76497, C3 -151.066, D (energetisch) -3001.81, D (stofflich) -156.536
- Use of secondary material (SM) [kg]: A1 0, A2 0, A3 0, A1-A3 0, A5 0, C2 0, C3 0, D (energetisch) 0, D (stofflich) 271.813
- Use of renewable secondary fuels (RSF) [MJ]: A1 0, A2 0, A3 0, A1-A3 0, A5 0, C2 0, C3 0, D (energetisch) 0, D (stofflich) 0
- Use of non renewable secondary fuels (NRSF) [MJ]: A1 0, A2 0, A3 0, A1-A3 0, A5 0, C2 0, C3 0, D (energetisch) 0, D (stofflich) 0
- Use of net fresh water (FW) [m3]: A1 0.158821, A2 0.00539142, A3 0.14941, A1-A3 0.313622, A5 0.0331856, C2 0.000309839, C3 0.0166923, D (energetisch) 0.732568, D (stofflich) -0.020912

## Outputs
- Hazardous waste disposed (HWD) [kg]: A1 8.62204e-6, A2 2.43966e-6, A3 3.19943e-6, A1-A3 1.42611e-5, A5 1.30443e-8, C2 2.21746e-7, C3 3.60527e-8, D (energetisch) -1.34438e-6, D (stofflich) -2.98273e-6
- Non hazardous waste dispose (NHWD) [kg]: A1 0.206627, A2 0.0107657, A3 1.1912, A1-A3 1.40859, A5 0.452003, C2 0.000729222, C3 0.0412596, D (energetisch) 21.9444, D (stofflich) -0.0219608
- Radioactive waste disposed (RWD) [kg]: A1 0.00825694, A2 0.000652617, A3 0.0307865, A1-A3 0.0396961, A5 0.00018472, C2 5.89777e-6, C3 0.00448112, D (energetisch) -0.185004, D (stofflich) -0.0048722
- Components for re-use (CRU) [kg]: A1 0, A2 0, A3 0, A1-A3 0, A5 0, C2 0, C3 0, D (energetisch) 0, D (stofflich) 0
- Materials for recycling (MFR) [kg]: A1 0, A2 0, A3 0, A1-A3 0, A5 0, C2 0, C3 271.813, D (energetisch) 0, D (stofflich) 0
- Materials for energy recovery (MER) [kg]: A1 0, A2 0, A3 0, A1-A3 0, A5 0, C2 0, C3 271.813, D (energetisch) 0, D (stofflich) 0
- Exported electrical energy (EEE) [MJ]: A1 0, A2 0, A3 0.0174638, A1-A3 0.0174638, A5 21.0328, C2 0, C3 0, D (energetisch) 0, D (stofflich) 0
- Exported thermal energy (EET) [MJ]: A1 0, A2 0, A3 0.0405705, A1-A3 0.0405705, A5 40.9199, C2 0, C3 0, D (energetisch) 0, D (stofflich) 0

## Impact indicators
- Global warming potential (GWP) [kg CO2-Äqv.]: A1 -393.43, A2 4.0005, A3 71.2827, A1-A3 -318.147, A5 7.78714, C2 0.344109, C3 435.161, D (energetisch) -15.151, D (stofflich) -11.4856
- Depletion potential of the stratospheric ozone layer (ODP) [kg R11 eq.]: A1 2.9365e-13, A2 7.09124e-15, A3 1.38541e-12, A1-A3 1.68615e-12, A5 3.95224e-15, C2 5.7281e-17, C3 1.7597e-13, D (energetisch) -7.26477e-12, D (stofflich) -1.90288e-13
- Acidification potential of soil and water (AP) [kg SO2-Äqv.]: A1 0.0800652, A2 0.0163056, A3 0.156151, A1-A3 0.252522, A5 0.00188807, C2 0.00144179, C3 0.00587833, D (energetisch) -0.174654, D (stofflich) -0.030138
- Eutrophication potential (EP) [kg Phosphat-Äqv.]: A1 0.0319611, A2 0.00403807, A3 0.0319057, A1-A3 0.0679048, A5 0.00030484, C2 0.000362708, C3 0.00104827, D (energetisch) -0.0332088, D (stofflich) -0.00688249
- Formation potential of tropospheric ozone (POCP) [kg Ethen-Äqv.]: A1 0.00281055, A2 -0.00663414, A3 0.102066, A1-A3 0.0982425, A5 0.000101075, C2 -0.000606326, C3 0.000414745, D (energetisch) -0.015608, D (stofflich) -0.000528124
- Abiotic depletion potential for non fossil resources (ADPE) [kg Sb-Äqv.]: A1 8.20075e-6, A2 3.9074e-7, A3 6.30412e-5, A1-A3 7.16327e-5, A5 5.94909e-7, C2 2.89755e-8, C3 1.75259e-6, D (energetisch) -4.27581e-5, D (stofflich) -2.41364e-6
- Abiotic depletion potential for fossil resources (ADPF) [MJ]: A1 832.679, A2 54.6184, A3 995.341, A1-A3 1882.64, A5 3.44653, C2 4.74991, C3 42.2985, D (energetisch) -2330.16, D (stofflich) -144.236

## Use advice
Der Datensatz bildet die durchschnittlichen Produktionsverhältnisse und die damit verbundenen Umweltwirkungen repräsentativ für Deutschland ab. Liegen keine herstellerspezifischen Ökobilanzergebnisse des verwendeten Produkts vor, empfiehlt sich die Verwendung dieses Durchschnittsdatensatzes.

## Data sources
- Rüter S, Diederichs S (2012) Ökobilanz Basisdaten für Bauprodukte aus Holz, Hamburg, Johann Heinrich von Thünen Institut, Institut für Holztechnologie und Holzbiologie, Abschlussbericht
- GaBi database SP40 2020
- GaBi database (general)
