# FLOOR and more® hollow floor

Dataset: ILCD process, EPD, average dataset
Geography: DE
Reference year: 2017
Valid until: 2022
Classification: OEKOBAU.DAT: Komposite / Systembauteile / Decken
Classification: IBUCategories: 02 Bauprodukte / Systemböden / Systemböden
Method details: Systemböden.pdf
Registration number: EPD-LIN-20170194-IBD1-DE
Owner: Lindner Group
Compliance: DIN EN 15804; ISO 14025
Review: Accredited third party review by Institut Bauen und Umwelt e. V.
Amounts: rows without a unit in brackets have none in this file; such an amount is in the reference unit of its flow, which a separate flow dataset defines
copyright: true

## General comment
The dry hollow floor system FLOOR and more® is a hollow floor with sealed base course suited for the application of floor coverings; it is supported by a special substructure in order to form a cavity between the base course and the raw ceiling for installation to accommodate all installations as well as supply and waste lines. Access to the cavity of hollow floors is realised for example by inspection openings or raised floor routes.

The hollow floor system is in essence formed using hollow floor panels and a substructure.

For installation, supplementary components (structural adhesive for panel bonding, bare floor sealant, support adhesive, thread sealant, edge sealant and connecting elements for different system floor constructions) are required.

Use of this product is subject to the respective national provisions at the place of use, in Germany for example the building regulations of the federal states and the technical provisions based on this legislation.

The FLOOR and more® hollow floor panels

are made from fibre-reinforced plasterboard (with a density of approx. 1,300 – 1,530 kg/m³ and a panel thickness of 24 – 40 mm). Hollow floor panels are by default delivered in dimensions 600 x 600 mm.

Steel supports are used for the substructure and these cater for different construction heights (40 – 2,000 mm).

The EPD results for the production of the FLOOR and more® hollow floor system is applicable to hollow floor panels with a thickness between 24 mm and 40 mm. These different panel types can be combined with different supports.

The production processes do not differ.

Surface coverings are not considered in the life cycle assessment, since the possibilities for surface coverings are very varied. This could be a choice of stone, parquet, carpet, etc. Its consideration would not be meaningful for the FLOOR and more® system.

## Technology and included processes
Production and treatment of the fibre-reinforced plasterboard: The main raw materials Alpha hemihydrate, Beta gypsum and cellulose fibre are mixed, water is added, and then they are pressed under high pressure to form rugged panels which are dried and cut to the required formats. Further production steps include the milling of serrations into the sides of the panels. Production of the supports: The supports are produced by resistance welding or clinching the individual components; tubes, threaded rods and sheet steel. Electroplating (galvanic zinc coating) applies a zinc coating to the supports to protect them from corrosion. Lindner Group operates a quality management system in conformity with /EN ISO 9001/.
Declared unit:
The declared unit relates to 1 m² FLOOR and more® hollow floor without floor covering and with an average floor panel thickness of 36.46 mm and average density of 1,304 kg/m³. For the installation of the floor panel, 4 support per m² are required.

The panel thickness within the product family varies from 24 – 40 mm and the raw density from 1,300 – 1,530 kg/m³.

The declared unit has a weight of 47.6 kg/m² for the panel plus 0.805 kg for the corresponding supports (0.2014 kg per support). The total weight of the hollow floor system is 48.4 kg.

For the steel supports, the most widely used common supports are declared: Type L1, 120 mm, unit weight 0.2014 kg/unit

Optionally, it is possible to combine the panels with supports for construction heights between 40 and 2,000 mm.
A surface covering is not considered in the life cycle assessment, since the possibilities for coverings are very varied. This could be a choice of parquet, linoleum, carpet, etc.

## Technical purpose
The hollow floor system named in 2.1 and made from plasterboard, supports and supplementary components is mainly intended for creating cavities / installation spaces in public, commercial and private buildings. The hollow floor system can be covered with all the usual floor coverings, but must be aligned to the system variants.

## Reference product
- 1 m² Hohlbodensystem Typ FLOOR and more®: 1

## Inputs
- Renewable primary energy as energy carrier (PERE) [MJ]: A1-A3 201, A4 1.13, A5 0.0402, B1 0, B2 0
- Renewable primary energy resources as material utilization (PERM) [MJ]: A1-A3 0, A4 0, A5 0, B1 0, B2 0
- Total use of renewable primary energy resources (PERT) [MJ]: A1-A3 201, A4 1.13, A5 0.0402, B1 0, B2 0
- Non renewable primary energy as energy carrier (PENRE) [MJ]: A1-A3 297.983, A4 17.1, A5 0.269, B1 0, B2 0
- Non renewable primary energy as material utilization (PENRM) [MJ]: A1-A3 0, A4 0, A5 0, B1 0, B2 0
- Total use of non renewable primary energy resources (PENRT) [MJ]: A1-A3 298, A4 17.1, A5 0.269, B1 0, B2 0
- Use of secondary material (SM) [kg]: A1-A3 8.97, A4 0, A5 0, B1 0, B2 0
- Use of renewable secondary fuels (RSF) [MJ]: A1-A3 0, A4 0, A5 0, B1 0, B2 0
- Use of non renewable secondary fuels (NRSF) [MJ]: A1-A3 0, A4 0, A5 0, B1 0, B2 0
- Use of net fresh water (FW) [m^3]: A1-A3 0.114, A4 0.00131, A5 0.00306, B1 0, B2 0

## Outputs
- Hazardous waste disposed (HWD) [kg]: A1-A3 3.15e-6, A4 1.08e-6, A5 1.6e-10, B1 0, B2 0
- Non hazardous waste disposed (NHWD) [kg]: A1-A3 2.62, A4 0.00125, A5 0.003, B1 0, B2 0
- Radioactive waste disposed (RWD) [kg]: A1-A3 0.00974, A4 1.96e-5, A5 1.73e-5, B1 0, B2 0
- Components for re-use (CRU) [kg]: A1-A3 0, A4 0, A5 0, B1 0, B2 0
- Materials for recycling (MFR) [kg]: A1-A3 1.1202, A4 0, A5 0.228, B1 0, B2 0
- Materials for energy recovery (MER) [kg]: A1-A3 0, A4 0, A5 0, B1 0, B2 0
- Exported electrical energy (EEE) [MJ]: A1-A3 0, A4 0, A5 3.66, B1 0, B2 0
- Exported thermal energy (EET) [MJ]: A1-A3 0, A4 0, A5 1.57, B1 0, B2 0

## Impact indicators
- Global warming potential (GWP) [kg CO_(2)-Äq.]: A1-A3 13.2, A4 1.26, A5 1.26, B1 0, B2 0
- Depletion potential of the stratospheric ozone layer (ODP) [kg CFC11-Äq.]: A1-A3 1.82e-10, A4 1.59e-13, A5 2.74e-13, B1 0, B2 0
- Acidification potential of land and water (AP) [kg SO_(2)-Äq.]: A1-A3 0.0313, A4 0.00277, A5 0.000127, B1 0, B2 0
- Eutrophication potential (EP) [kg PO_(4)^(3)-Äq.]: A1-A3 0.00578, A4 0.000651, A5 2.59e-5, B1 0, B2 0
- Formation potential of tropospheric ozone photochemical oxidants (POCP) [kg Ethen-Äq.]: A1-A3 0.00253, A4 -0.00089, A5 1.02e-5, B1 0, B2 0
- Abiotic depletion potential for non fossil resources (ADPE) [kg Sb-Äq.]: A1-A3 0.000633, A4 1.31e-7, A5 1.17e-8, B1 0, B2 0
- Abiotic depletion potential for fossil resources (ADPF) [MJ]: A1-A3 274, A4 17, A5 0.226, B1 0, B2 0

## Use advice
Scope:
This EPD relates to the FLOOR and more® hollow floor system.
The collected production data are for the year 2016. The hollow floor panel is produced at the Lindner plant in Dettelbach, whereas the substructure is produced in Arnstorf.
This document is translated from the German Environmental Product Declaration into English. It is based on the German original version EPD-LIN-20170194-IBD1-DE. The verifier has no influence on the quality of the translation.
System boundary:
The life cycle analysis for the FLOOR and more® hollow floor system includes the stages "cradle to gate with options".

Consideration is given to Modules A1–A3 as a combined module for the production phase, A4–A5 (deployment phase), and B1-B2 (use as well as maintenance and repair).

In particular, the following processes were included in information module A1–A3 for production of the FLOOR and more® hollow floor system:

Raw material provision processes (gypsum, cellulose, steel – module A1)

- Transport of the raw and auxiliary materials and consumables to the plant (A2)

- Production processes for the system product in the plant, including the energy costs (power, thermal energy and disposal of residual substances (A3)

- Production of packaging materials (A3)

- Transport from the factory gate to the construction site (A4) - Disposal of the packaging materials (A5)
- Use of the hollow floor (B1) and its maintenance and repair (B2)

The modules are declared with 0 for the use phase (B1–B2). During the use phase the product causes no environmental impacts.
The product itself has no need of maintenance.

## Data sources
- Hohlbodensystem Typ FLOOR and more® .pdf
- GaBi Database (all versions)
- GaBi database SP29 2016
