# Laubschnittholz - getrocknet (Durchschnitt DE)

Dataset: ILCD process, EPD, representative dataset
Geography: DE
Reference year: 2020
Valid until: 2025
Classification: OEKOBAU.DAT: Holz / Vollholz / Bau-Schnittholz
Method details: EN 15804; ILCD format
Owner: Thünen-Institut für Holzforschung
Compliance: EN 15804
Review: Independent external review by Dr. Frank Werner - Umwelt & Entwicklung
Amounts: rows without a unit in brackets have none in this file; such an amount is in the reference unit of its flow, which a separate flow dataset defines
copyright: true

## General comment
Weitere Informationen zur deklarierten Einheit (Zusammensetzung) und die auf Herstellerangaben beruhende Sachbilanz (In- und Output der Stoff- und Energieströme) stehen als Excel-Datei unter dem Unterpunkt Hintergrundbericht zum Download bereit.
Der Datensatz wurde 2020 als Aktualisierung mit gleichbleibendem Vordergrundsystem erstellt. Alle Hintergrunddaten entstammen der GaBi Professional Datenbank 2020 im Service Pack 40. Die Modellierung und Berechnung der Ökobilanz basiert auf den europäischen Normen EN 15804:2012+A1:2013 und EN 16485:2014. Bei Rückfragen wenden Sie sich bitte an holzundklima@thuenen.de.

## Geography
Für die Ökobilanzierung von kammergetrocknetem Laubschnittholz wurden Daten von 5 Werken berücksichtigt. Für alle in Rüter & Diederichs 2012 berücksichtigten Vollholzprodukte wurden von 2009 bis 2011 insgesamt 178 Prozesslinien erfasst. Im Verhältnis zu den vom Statistischen Bundesamt gemeldeten Produktionsmengen im selben Zeitraum entspricht die erreichte Abdeckung von Vollholzprodukten aus Laubschnittholz 2%.

## Time period
Der Datensatz basiert auf Produktionsdaten aus den Jahren 2009 bis 2011 (Vordergrundsystem).
Eine Aktualisierung des Hintergrundsystems erfolgte 2020.

## Technology and included processes
Zur Herstellung von kammergetrocknetem Laubschnittholz wird frisches Laubschnittholz genutzt. Es wird zunächst in Paketen voll- oder halbautomatisch gebündelt und dann getrocknet. Dabei kommen bis auf sehr wenige Ausnahmen Trockenkammern mit der Arbeitsweise der Frischluft-Ablufttrocknung zur Anwendung. Das Prinzip besteht darin, das im Holz enthaltene Wasser langsam über die umgebende Luft abzuführen, indem die Fähigkeit der Luft, zusätzliches Wasser aufzunehmen über einen Regelkreis gesteuert wird. Dabei spielen die Zuführung von Wasser und Wärmeenergie in Form von erhitzter Luft eine zentrale Rolle. In Abhängigkeit von der Anfangsfeuchte und der gewünschten Endfeuchte des Holzes, sowie der Dimension der einzelnen Schnittholzelemente, kann die Trocknung mehrere Tage dauern. Andere Trocknungstechniken sind für den heutigen Laubschnittholzmarkt nicht relevant. Nach der Trocknung wird das Produkt für den Transport gestapelt und verpackt.
Die Holzfeuchte des Produktes liegt bei 12%

## Technical purpose
Kammergetrocknetes Laubschnittholz ist eingeschnittenes Laubholz in allen typischen Dimensionen als Balken, Bohle, Vierkantholz oder Latte. Laubschnittholz (LH) findet Anwendung in der Bau- und Möbelindustrie. Im Baubereich werden aus Laubschnittholz insbesondere Holzverkleidungen, Geländer, Teppen, Fenster und Türen sowie Fußböden (Dielen, Parkett oder Laminat) für den Innenbereich hergestellt. Im Außenbereich wird Laubschnittholz seltener verwendet.

## Scenarios
- energetisch: therm. Verwertung
- stofflich: stoffl. Verwertung

## Reference product
- Laubschnittholz - getrocknet (Durchschnitt DE): 1

## Inputs
- Use of renewable primary energy (PERE) [MJ]: A1 20.488, A2 6.63686, A3 9864.45, A1-A3 9891.57, A5 0.348118, C2 0.613745, C3 30.8332, D (energetisch) 9743.15, D (stofflich) -48.9603
- Use of renewable primary energy resources used as raw materials (PERM) [MJ]: A1 13104.3, A2 0, A3 60.231, A1-A3 13164.5, A5 -60.231, C2 0, C3 -13104.3, D (energetisch) 0, D (stofflich) 0
- Total use of renewable primary energy resources (PERT) [MJ]: A1 13124.8, A2 6.63686, A3 9924.68, A1-A3 23056.1, A5 -59.8829, C2 0.613745, C3 -13073.4, D (energetisch) 9743.15, D (stofflich) -48.9603
- Use of non renewable primary energy (PENRE) [MJ]: A1 156.43, A2 114.004, A3 1141.32, A1-A3 1411.75, A5 1.91292, C2 10.9294, C3 53.6094, D (energetisch) -7409.96, D (stofflich) -264.513
- Use of non renewable primary energy resources used as raw materials (PENRM) [MJ]: A1 0, A2 0, A3 6.048, A1-A3 6.048, A5 -6.048, C2 0, C3 0, D (energetisch) 0, D (stofflich) 0
- Total use of non renewable primary energy resource (PENRT) [MJ]: A1 156.43, A2 114.004, A3 1147.36, A1-A3 1417.8, A5 -4.13508, C2 10.9294, C3 53.6094, D (energetisch) -7409.96, D (stofflich) -264.513
- Use of secondary material (SM) [kg]: A1 0, A2 0, A3 0, A1-A3 0, A5 0, C2 0, C3 0, D (energetisch) 0, D (stofflich) 761.828
- Use of renewable secondary fuels (RSF) [MJ]: A1 0, A2 0, A3 0, A1-A3 0, A5 0, C2 0, C3 0, D (energetisch) 0, D (stofflich) 0
- Use of non renewable secondary fuels (NRSF) [MJ]: A1 0, A2 0, A3 0, A1-A3 0, A5 0, C2 0, C3 0, D (energetisch) 0, D (stofflich) 0
- Use of net fresh water (FW) [m3]: A1 0.0142134, A2 0.00594387, A3 0.29118, A1-A3 0.311337, A5 0.0204102, C2 0.000710674, C3 0.0166923, D (energetisch) 1.12449, D (stofflich) -0.0315857

## Outputs
- Hazardous waste disposed (HWD) [kg]: A1 1.52332e-5, A2 4.26021e-6, A3 1.82733e-5, A1-A3 3.77667e-5, A5 5.61882e-9, C2 5.08618e-7, C3 3.60527e-8, D (energetisch) -4.45439e-6, D (stofflich) -8.62355e-6
- Non hazardous waste dispose (NHWD) [kg]: A1 0.0409119, A2 0.0200097, A3 6.99779, A1-A3 7.05871, A5 0.0740197, C2 0.00167261, C3 0.0412596, D (energetisch) 3.46521, D (stofflich) -0.0634921
- Radioactive waste disposed (RWD) [kg]: A1 0.00201292, A2 0.000120023, A3 0.074425, A1-A3 0.0765579, A5 0.00010148, C2 1.35277e-5, C3 0.00448112, D (energetisch) -0.488253, D (stofflich) -0.00594904
- Components for re-use (CRU) [kg]: A1 0, A2 0, A3 0, A1-A3 0, A5 0, C2 0, C3 0, D (energetisch) 0, D (stofflich) 0
- Materials for recycling (MFR) [kg]: A1 0, A2 0, A3 0, A1-A3 0, A5 0, C2 0, C3 761.828, D (energetisch) 0, D (stofflich) 0
- Materials for energy recovery (MER) [kg]: A1 0, A2 0, A3 0, A1-A3 0, A5 0, C2 0, C3 761.828, D (energetisch) 0, D (stofflich) 0
- Exported electrical energy (EEE) [MJ]: A1 0, A2 0, A3 0.247778, A1-A3 0.247778, A5 12.3628, C2 0, C3 0, D (energetisch) 0, D (stofflich) 0
- Exported thermal energy (EET) [MJ]: A1 0, A2 0, A3 0.575618, A1-A3 0.575618, A5 22.6662, C2 0, C3 0, D (energetisch) 0, D (stofflich) 0

## Impact indicators
- Global warming potential (GWP) [kg CO2-Äqv.]: A1 -1233.42, A2 8.4733, A3 96.5435, A1-A3 -1128.41, A5 6.34791, C2 0.789279, C3 1250.03, D (energetisch) -559.562, D (stofflich) -20.8079
- Depletion potential of the stratospheric ozone layer (ODP) [kg R11 eq.]: A1 7.65758e-14, A2 2.80759e-15, A3 2.90895e-12, A1-A3 2.98834e-12, A5 1.43208e-15, C2 1.31385e-16, C3 1.7597e-13, D (energetisch) -1.91706e-11, D (stofflich) -2.29756e-13
- Acidification potential of soil and water (AP) [kg SO2-Äqv.]: A1 0.0633941, A2 0.034756, A3 1.05681, A1-A3 1.15496, A5 0.000855719, C2 0.00330702, C3 0.00587833, D (energetisch) -0.564555, D (stofflich) -0.076749
- Eutrophication potential (EP) [kg Phosphat-Äqv.]: A1 0.0152852, A2 0.00882133, A3 0.226906, A1-A3 0.251013, A5 0.000180954, C2 0.00083194, C3 0.00104827, D (energetisch) -0.0938259, D (stofflich) -0.0177474
- Formation potential of tropospheric ozone (POCP) [kg Ethen-Äqv.]: A1 0.012786, A2 -0.0151701, A3 0.116479, A1-A3 0.114095, A5 5.50137e-5, C2 -0.00139073, C3 0.000414745, D (energetisch) -0.0444139, D (stofflich) -0.000753594
- Abiotic depletion potential for non fossil resources (ADPE) [kg Sb-Äqv.]: A1 1.62812e-6, A2 7.82657e-7, A3 8.03765e-5, A1-A3 8.27872e-5, A5 9.39971e-8, C2 6.64608e-8, C3 1.75259e-6, D (energetisch) -0.000185985, D (stofflich) -3.40763e-6
- Abiotic depletion potential for fossil resources (ADPF) [MJ]: A1 151.345, A2 113.697, A3 970.478, A1-A3 1235.52, A5 1.6574, C2 10.8948, C3 42.2985, D (energetisch) -6177.53, D (stofflich) -249.494

## Use advice
Aufgrund der hohen Abdeckung bildet der Datensatz die durchschnittlichen Produktionsverhältnisse und die damit verbundenen Umweltwirkungen repräsentativ für Deutschland ab. Liegen keine
herstellerspezifischen Ökobilanzergebnisse des verwendeten Produkts vor, empfiehlt sich die Verwendung dieses Durchschnittsdatensatzes.

## Data sources
- Rüter S, Diederichs S (2012) Ökobilanz Basisdaten für Bauprodukte aus Holz, Hamburg, Johann Heinrich von Thünen Institut, Institut für Holztechnologie und Holzbiologie, Abschlussbericht
- GaBi database SP40 2020
- GaBi database (general)
