# PIPELAN Rohrschalen aus Glaswolle, phenolharzgebunden +A1

Dataset: ILCD process, EPD, specific dataset
Geography: CH
Reference year: 2021
Valid until: 2026
Classification: OEKOBAU.DAT: Dämmstoffe / Mineralwolle / Glaswolle
Classification: IBUCategories: 02 Bauprodukte / Wärmedämmungsprodukte / Mineralische Dämmstoffe
Method details: Mineralische Dämmstoffe.pdf
Registration number: EPD-SAR-20200275-CBA1-EN
Owner: Sager AG
Compliance: DIN EN 15804; ISO 14025
Review: Accredited third party review by Institut Bauen und Umwelt e. V.
Amounts: rows without a unit in brackets have none in this file; such an amount is in the reference unit of its flow, which a separate flow dataset defines
copyright: true

## General comment
Die Produktedeklaration bezieht sich auf Rohrschalen aus Glaswolle. Glaswolle besteht aus künstlich hergestellten monofilen Mineralfasern nicht kristalliner Struktur. Der mittlere Faserdurchmesser beträgt zwischen 3 und 6 μm. Die Herstellung ist durch RAL und EUCEB überwacht und zertifiziert. Die Glaswolle entspricht der Definition der Glaswolle nach deutschem Gefahrstoffrecht. Die Rohdichte der PIPELAN-Produkte variiert von 45 bis 100 kg/m3. Die Produkte werden unter der Bezeichnung PIPELAN vertrieben.

## Technology and included processes
unbeschichtete Rohrschalen PIPELAN mit phenolharzbasiertem Bindemittel bei einer durchschnittlichen/typischen Dichte von 55 kg/m3 Glaswolle ist ein Dämmstoff aus Mineralwolle, dessen wesentlicher Bestandteil monofile künstliche Mineralfasern nichtkristalliner Struktur sind, die aus einer silikatischen Schmelze gewonnen werden.
Deklarierte Einheit:
Die deklarierten Werte beziehen sich auf 1 kg unbeschichtete, phenolharzgebundene PIPELAN Rohrschalen aus Glaswolle.

## Technical purpose
PIPELAN Rohrschalen werden als Ummantelung von Rohrleitungen als Wärme- und Schallschutz sowie zur Minimierung von Abstrahlverlusten eingesetzt. Anwendung finden sie vor allem zur Dämmung von Haustechnik- und betriebstechnischen Industrieanlagen.

Brauchen die Leitungen besonders stoßfeste Oberflächen, so können die PIPELANE Rohrschalen zusätzlich ummantelt werden.

## Reference product
- PIPELAN Rohrschalen aus Glaswolle, phenolharzgebunden (): 1

## Inputs
- Erneuerbare Primärenergie als Energieträger (PERE) [MJ]: A1-A3 10.0892, A4 0.00863972, A5 0.202739, C2 0.000479581, C3 0, C4 0.00172066, D -0.0911309
- Erneuerbare Primärenergie zur stofflichen Nutzung (PERM) [MJ]: A1-A3 0, A4 0, A5 0, C2 0, C3 0, C4 0, D 0
- Total erneuerbare Primärenergie (PERT) [MJ]: A1-A3 10.0892, A4 0.00863972, A5 0.202739, C2 0.000479581, C3 0, C4 0.00172066, D -0.0911309
- Nicht-erneuerbare Primärenergie als Energieträger (PENRE) [MJ]: A1-A3 57.6765, A4 0.587919, A5 1.21168, C2 0.0326347, C3 0, C4 0.183967, D -0.853544
- Nicht-erneuerbare Primärenergie zur stofflichen Nutzung (PENRM) [MJ]: A1-A3 0, A4 0, A5 0, C2 0, C3 0, C4 0, D 0
- Total nicht erneuerbare Primärenergie (PENRT) [MJ]: A1-A3 57.6765, A4 0.587919, A5 1.21168, C2 0.0326347, C3 0, C4 0.183967, D -0.853544
- Einsatz von Sekundärstoffen (SM) [kg]: A1-A3 0.75, A4 0, A5 0.015, C2 0, C3 0, C4 0, D 0
- Erneuerbare Sekundärbrennstoffe (RSF) [MJ]: A1-A3 0, A4 0, A5 0, C2 0, C3 0, C4 0, D 0
- Nicht erneuerbare Sekundärbrennstoffe (NRSF) [MJ]: A1-A3 0, A4 0, A5 0, C2 0, C3 0, C4 0, D 0
- Einsatz von Süßwasserressourcen (FW) [m^3]: A1-A3 0.0549957, A4 0.000274327, A5 0.00116948, C2 1.52275e-5, C3 0, C4 0.000198592, D -0.000394704

## Outputs
- Gefährlicher Abfall zur Deponie (HWD) [kg]: A1-A3 4.33459e-5, A4 6.66049e-7, A5 9.30961e-7, C2 3.69716e-8, C3 0, C4 6.2557e-8, D -2.93958e-7
- Entsorgter nicht gefährlicher Abfall (NHWD) [kg]: A1-A3 0.249405, A4 0.00519349, A5 0.0285363, C2 0.000288284, C3 0, C4 0.999438, D -0.000905764
- Entsorgter radioaktiver Abfall (RWD) [kg]: A1-A3 0.000536472, A4 6.56081e-7, A5 1.07949e-5, C2 3.64183e-8, C3 0, C4 1.31905e-7, D -8.50458e-6
- Komponenten für die Wiederverwendung (CRU) [kg]: A1-A3 0, A4 0, A5 0, C2 0, C3 0, C4 0, D 0
- Stoffe zum Recycling (MFR) [kg]: A1-A3 0, A4 0, A5 0, C2 0, C3 0, C4 0, D 0
- Stoffe für die Energierückgewinnung (MER) [kg]: A1-A3 0, A4 0, A5 0, C2 0, C3 0, C4 0, D 0
- Exportierte elektrische Energie (EEE) [MJ]: A1-A3 0, A4 0, A5 0.195718, C2 0, C3 0, C4 0, D 0
- Exportierte thermische Energie (EET) [MJ]: A1-A3 0, A4 0, A5 0.38658, C2 0, C3 0, C4 0, D 0

## Impact indicators
- Globales Erwärmungspotenzial (GWP) [kg CO_(2)-Äq.]: A1-A3 2.15561, A4 0.0367598, A5 0.202346, C2 0.00204049, C3 0, C4 0.00711625, D -0.031082
- Abbau Potential der stratosphärischen Ozonschicht (ODP) [kg CFC11-Äq.]: A1-A3 3.15008e-7, A4 1.58234e-9, A5 6.57695e-9, C2 8.78338e-11, C3 0, C4 6.44829e-10, D -5.44392e-9
- Versauerungspotenzial von Boden und Wasser (AP) [kg SO_(2)-Äq.]: A1-A3 0.00711462, A4 0.000190979, A5 0.000172126, C2 1.0601e-5, C3 0, C4 4.14069e-5, D -3.23598e-5
- Eutrophierungspotenzial (EP) [kg PO_(4)^(3)-Äq.]: A1-A3 0.0014466, A4 4.19097e-5, A5 3.90416e-5, C2 2.32636e-6, C3 0, C4 8.71983e-6, D -4.68911e-6
- Bildungspotential für troposphärisches Ozon (POCP) [kg Ethen-Äq.]: A1-A3 0.000776391, A4 6.82636e-6, A5 1.65065e-5, C2 3.78924e-7, C3 0, C4 1.51941e-6, D -2.73459e-6
- Potenzial für den abiotischen Abbau nicht fossiler Ressourcen (ADPE) [kg Sb-Äq.]: A1-A3 3.38253e-6, A4 8.67567e-8, A5 7.22754e-8, C2 4.81576e-9, C3 0, C4 6.7963e-9, D -1.03878e-8
- Potenzial für den abiotischen Abbau fossiler Brennstoffe (ADPF) [MJ]: A1-A3 32.0801, A4 0.556736, A5 0.696708, C2 0.0309038, C3 0, C4 0.177339, D -0.449037

## Use advice
Gültigkeitsbereich:
Die Deklaration bezieht sich auf PIPELAN Rohrschalen aus Glaswolle, die am Standort der Sager AG in Dürrenäsch/CH hergestellt wird.
Systemgrenze:
Typ der EPD: Wiege bis Werkstor – mit Optionen

Die Module A1-A3 umfassen sämtliche Stoff- und Energieflüsse, die für die Herstellung von SAGLAN Glaswolle benötigt werden; die Systemgrenze für Altglas wird an dem Punkt angenommen, an dem sie sortenrein vorliegen (s. auch Kap. 3.5).

Modul A4 umfasst den Transport auf die Baustelle.

Modul A5 umfasst die Verbrennung der Transportverpackungen in einer Kehrichtverbrennungsanlage (KVA), wobei die rückgewonnene Energie in Modul D exportiert wird.

Zusätzlich werden in Anlehnung an EN 16783 2% Verschnitt angenommen, womit eine entsprechende Produktionsmenge inkl. Verpackung und Transport auf die Baustelle und deren Entsorgung (Verschnitt und dessen Verpackung) in Modul A5 mitbilanziert werden.

Modul C1: während des Rückbaus werden Staubemissionen bilanziert, die aber in keiner der Wirkungskategorien erfasst sind.

Modul C2 umfasst den Transport der rückgebauten Glaswolle auf eine Inertstoffdeponie.

Modul C3: aufgrund des angenommenen Entsorgungsszenarios in einer Inertstoffdeponie fallen in diesem Modul keine Umweltwirkungen an.

Modul C4 umfasst den Deponierungsprozess von Glaswolle ohne die Berücksichtigung der energetischen Nutzung des Deponiegases aus den (geringen) organischen Bestandteilen.

Modul D umfasst die Gutschriften aus der Produktion von Strom und Wärme, die bei der thermischen Behandlung der Verpackungsabfälle aus dem Einbau der Glaswolle auf der Baustelle (inkl. 2 % der Verpackung des Verschnitts) aus Modul A5 in einer KVA erzeugt werden.

## Data sources
- PIPELAN Rohrschalen aus Glaswolle, phenolharzgebunden +A1.pdf
- ecoinvent database (all versions)
- ecoinvent 2.2 database
