# SAGLAN Glaswolle, mit bio-basiertem Bindemittel +A1

Dataset: ILCD process, EPD, specific dataset
Geography: CH
Reference year: 2021
Valid until: 2026
Classification: OEKOBAU.DAT: Dämmstoffe / Mineralwolle / Glaswolle
Classification: IBUCategories: 02 Bauprodukte / Wärmedämmungsprodukte / Mineralische Dämmstoffe
Method details: Mineralische Dämmstoffe.pdf
Registration number: EPD-SAR-20200273-CBA1-EN
Owner: Sager AG
Compliance: DIN EN 15804; ISO 14025
Review: Accredited third party review by Institut Bauen und Umwelt e. V.
Amounts: rows without a unit in brackets have none in this file; such an amount is in the reference unit of its flow, which a separate flow dataset defines
copyright: true

## General comment
Die Produktedeklaration bezieht sich auf Produkte aus Glaswolle. Glaswolle besteht aus künstlich hergestellten monofilen Mineralfasern nicht kristalliner Struktur. Der mittlere Faserdurchmesser beträgt zwischen 3 und 6 μm. Die Herstellung ist durch RAL und EUCEB überwacht und zertifiziert. Die Glaswolle entspricht der Definition der Glaswolle nach deutschem Gefahrstoffrecht. Die Rohdichte der SAGLAN-Produkte variiert von 12 bis 100 kg/m3. Die durchschnittliche Dichte der Produkte liegt bei rund 30 kg/m3. Die Produkte werden unter der Bezeichnung SAGLAN vertrieben. Sie sind in Rollenform oder als Platten im Handel erhältlich.

## Technology and included processes
unbeschichtete Glaswolle SAGLAN mit biobasiertem Bindemitte bei einer durchschnittlichen/typischen Dichte von 30 kg/m3. Glaswolle ist ein Dämmstoff aus Mineralwolle, dessen wesentlicher Bestandteil monofile künstliche Mineralfasern nichtkristalliner Struktur sind, die aus einer silikatischen Schmelze gewonnen werden.
Deklarierte Einheit:
Die deklarierten Werte beziehen sich auf 1 kg unbeschichtete, phenolharzgebundene SAGLAN Glaswolle.

## Technical purpose
Die Anwendungsgebiete sind im Hochbau als thermische Dämmung von haustechnischen Installationen. Die Standardprodukte werden unter dem Namen SAGLAN gehandelt, jene für die Technik unter der Bezeichnung SAGLAN T.

Als Wärmedämmung in Gebäuden werden die Platten oder Rollen zwischen der Tragkonstruktion im Dach-/Wand-/Zwischendecken- und Bodenbereich sowie innerhalb oder außerhalb der Tragkonstruktion eingebaut.

Anwendungsbereich im Hochbau:

die Wärme- und Schalldämmung im Steildach und Flachdach.

Aufdachdämmung

Wärmedämmung von zweischaligen Mauerwerken

Wärmedämmung von hinterlüfteten Fassaden

Wärmedämmverbundsysteme

Haustrennwände

Trittschalldämmung in schwimmenden Estrichböden

Holzrahmenbau

Holzdecken

Kassettenwände

Innendämmungen in Dach und Wand

Trennlagen

Oberste Geschossdecke

Tiefgaragen und Kellerdecken
Akustikdecken

Im Bereich der Haustechnik:

Dämmung von Heizungen

Dämmung von Lüftungskanälen

Dämmung von Klimakanälen

Dämmung von Apparaturen

Dämmung von Rohrleitungen

Dämmung von Warmwasserspeichern

Dämmung von Tanks

Verwendung bei industrieller Verarbeitung

Verwendung in der Automotive

Verwendung im Schiffbau

Verwendung bei Brandschutzelementen

Verarbeitung

## Reference product
- SAGLAN Glaswolle, mit bio-basiertem Bindemittel (): 1

## Inputs
- Erneuerbare Primärenergie als Energieträger (PERE) [MJ]: A1-A3 4.71748, A4 0.00558015, A5 0.0899274, C2 0.000479581, C3 0, C4 0.00172066, D -0.157734
- Erneuerbare Primärenergie zur stofflichen Nutzung (PERM) [MJ]: A1-A3 0, A4 0, A5 0, C2 0, C3 0, C4 0, D 0
- Total erneuerbare Primärenergie (PERT) [MJ]: A1-A3 4.71748, A4 0.00558015, A5 0.0899274, C2 0.000479581, C3 0, C4 0.00172066, D -0.157734
- Nicht-erneuerbare Primärenergie als Energieträger (PENRE) [MJ]: A1-A3 27.1183, A4 0.37972, A5 0.745, C2 0.0326347, C3 0, C4 0.183967, D -1.45898
- Nicht-erneuerbare Primärenergie zur stofflichen Nutzung (PENRM) [MJ]: A1-A3 0, A4 0, A5 0, C2 0, C3 0, C4 0, D 0
- Total nicht erneuerbare Primärenergie (PENRT) [MJ]: A1-A3 27.1183, A4 0.37972, A5 0.745, C2 0.0326347, C3 0, C4 0.183967, D -1.45898
- Einsatz von Sekundärstoffen (SM) [kg]: A1-A3 0.75, A4 0, A5 0.015, C2 0, C3 0, C4 0, D 0
- Erneuerbare Sekundärbrennstoffe (RSF) [MJ]: A1-A3 0, A4 0, A5 0, C2 0, C3 0, C4 0, D 0
- Nicht erneuerbare Sekundärbrennstoffe (NRSF) [MJ]: A1-A3 0, A4 0, A5 0, C2 0, C3 0, C4 0, D 0
- Einsatz von Süßwasserressourcen (FW) [m^3]: A1-A3 0.0227096, A4 0.00017718, A5 0.000813864, C2 1.52275e-5, C3 0, C4 0.000198592, D -0.000682451

## Outputs
- Gefährlicher Abfall zur Deponie (HWD) [kg]: A1-A3 2.31818e-5, A4 4.30182e-7, A5 7.09458e-7, C2 3.69716e-8, C3 0, C4 6.2557e-8, D -5.04602e-7
- Entsorgter nicht gefährlicher Abfall (NHWD) [kg]: A1-A3 0.186376, A4 0.00335433, A5 0.0296666, C2 0.000288284, C3 0, C4 0.999438, D -0.00156169
- Entsorgter radioaktiver Abfall (RWD) [kg]: A1-A3 0.000244528, A4 4.23744e-7, A5 5.11919e-6, C2 3.64183e-8, C3 0, C4 1.31905e-7, D -1.47232e-5
- Komponenten für die Wiederverwendung (CRU) [kg]: A1-A3 0, A4 0, A5 0, C2 0, C3 0, C4 0, D 0
- Stoffe zum Recycling (MFR) [kg]: A1-A3 0, A4 0, A5 0, C2 0, C3 0, C4 0, D 0
- Stoffe für die Energierückgewinnung (MER) [kg]: A1-A3 0, A4 0, A5 0, C2 0, C3 0, C4 0, D 0
- Exportierte elektrische Energie (EEE) [MJ]: A1-A3 0, A4 0, A5 0.338926, C2 0, C3 0, C4 0, D 0
- Exportierte thermische Energie (EET) [MJ]: A1-A3 0, A4 0, A5 0.65076, C2 0, C3 0, C4 0, D 0

## Impact indicators
- Globales Erwärmungspotenzial (GWP) [kg CO_(2)-Äq.]: A1-A3 1.07584, A4 0.0237421, A5 0.318479, C2 0.00204049, C3 0, C4 0.00711625, D -0.0525677
- Abbau Potential der stratosphärischen Ozonschicht (ODP) [kg CFC11-Äq.]: A1-A3 1.50066e-7, A4 1.02199e-9, A5 3.49342e-9, C2 8.78338e-11, C3 0, C4 6.44829e-10, D -9.27134e-9
- Versauerungspotenzial von Boden und Wasser (AP) [kg SO_(2)-Äq.]: A1-A3 0.00593616, A4 0.000123348, A5 0.000172554, C2 1.0601e-5, C3 0, C4 4.14069e-5, D -5.53712e-5
- Eutrophierungspotenzial (EP) [kg PO_(4)^(3)-Äq.]: A1-A3 0.00121332, A4 2.70683e-5, A5 3.94953e-5, C2 2.32636e-6, C3 0, C4 8.71983e-6, D -8.02462e-6
- Bildungspotential für troposphärisches Ozon (POCP) [kg Ethen-Äq.]: A1-A3 0.000513768, A4 4.40895e-6, A5 1.64276e-5, C2 3.78924e-7, C3 0, C4 1.51941e-6, D -4.64348e-6
- Potenzial für den abiotischen Abbau nicht fossiler Ressourcen (ADPE) [kg Sb-Äq.]: A1-A3 1.87003e-6, A4 5.60337e-8, A5 5.68321e-8, C2 4.81576e-9, C3 0, C4 6.7963e-9, D -1.79445e-8
- Potenzial für den abiotischen Abbau fossiler Brennstoffe (ADPF) [MJ]: A1-A3 15.3485, A4 0.35958, A5 0.496285, C2 0.0309038, C3 0, C4 0.177339, D -0.758679

## Use advice
Gültigkeitsbereich:
Die Deklaration bezieht sich auf SAGLAN Glaswolle, die am Standort der Sager AG in Dürrenäsch/CH hergestellt wird.
Systemgrenze:
Typ der EPD: Wiege bis Werkstor – mit Optionen

Die Module A1–A3 umfassen sämtliche Stoff- und Energieflüsse, die für die Herstellung von SAGLAN Glaswolle benötigt werden; die Systemgrenze für Altglas wird an dem Punkt angenommen, an dem es sortenrein vorliegt.

Modul A4 umfasst den Transport auf die Baustelle.

Modul A5 umfasst die Verbrennung der Transportverpackungen in einer Kehrichtverbrennungsanlage (KVA), wobei die rückgewonnene Energie in Modul D exportiert wird.

Zusätzlich werden in Anlehnung an EN 16783 2% Verschnitt angenommen, womit eine entsprechende Produktionsmenge inkl. Verpackung und Transport auf die Baustelle und deren Entsorgung (Verschnitt und dessen Verpackung) in Modul A5 mitbilanziert werden.

Modul C1: während des Rückbaus werden Staubemissionen bilanziert, die aber in keiner der Wirkungskategorien erfasst sind.

Modul C2 umfasst den Transport der rückgebauten Glaswolle auf eine Inertstoffdeponie.

Modul C3: aufgrund des angenommenen Entsorgungsszenarios in einer Inertstoffdeponie fallen in diesem Modul keine Umweltwirkungen an.

Modul C4 umfasst den Deponierungsprozess von Glaswolle ohne die Berücksichtigung der energetischen Nutzung des Deponiegases aus den (geringen) organischen Bestandteilen.

Modul D umfasst die Gutschriften aus der Produktion von Strom und Wärme, die bei der thermischen Behandlung der Verpackungsabfälle aus dem Einbau der Glaswolle auf der Baustelle (inkl. 2 % der Verpackung des Verschnitts) aus Modul A5 in einer KVA erzeugt werden.

## Data sources
- SAGLAN Glaswolle, mit bio-basiertem Bindemittel +A1.pdf
- ecoinvent database (all versions)
- ecoinvent 2.2 database
