# Rohe und beschichtete MDF und HDF Holzfaserplatten

Dataset: ILCD process, EPD, average dataset
Geography: DE
Reference year: 2019
Valid until: 2024
Classification: OEKOBAU.DAT: Holz / Holzwerkstoffe / Holzfaserplatten
Classification: IBUCategories: 02 Bauprodukte / Holzwerkstoffe / Holzwerkstoffe
Method details: Holzwerkstoffe.pdf
Registration number: EPD-20190043-IBD1-DE
Owner: SWISS KRONO GmbH
Compliance: DIN EN 15804; ISO 14025
Review: Accredited third party review by Institut Bauen und Umwelt e. V.
Amounts: rows without a unit in brackets have none in this file; such an amount is in the reference unit of its flow, which a separate flow dataset defines
copyright: true

## General comment
Holzfaserplatten aus mitteldichten Faserplatten (MDF) und hochdichten Faserplatten (HDF) sind plattenförmige Holzwerkstoffe nach EN 622-5 für den Möbel- und Innenausbau. Diese können mit melaminharzgetränkten Papieren beschichtet sein.

## Technology and included processes
Die Herstellung der MDF Platten umfasst folgende Produktionsschritte: 1)Teilweise Entrindung des Holzes 2) Zerkleinern des Rundholzes zu Hackschnitzeln 3) Wäsche der Hackschnitzel 4) Plastifizierung der Hackschnitzel 5) Zerfaserung der Hackschnitzel 6) Beleimung mit Harz und Zugabe von Additiven 7) Trockung der Fasern 8) Aufstreuen der Fasern auf die Formstraße 7) Verpressung der Fasern in einer kontinuierlich arbeitenden Presse 8) Besäumen der Platten an den Längskanten und Aufteilung in die Plattenlänge 9) Schleifen der Oberflächen 10) Stapelung der Platten und Verpackung Alle Herstellwerke verfügen über ein Qualitätsmanagementsystem nach ISO 9001:2015.
Technische Daten:
Allgemeine Anforderungen nach /EN 622-1/ und /EN 622-2/.
Deklarierte Einheit:
Die Deklaration bezieht sich auf die Herstellung von 1 m3 MDF Rohplatte mit einer durchschnittlichen Dichte von 810 kg/m3 und einer Produktfeuchte von circa 4,8%. Die MDF Platte (roh) wurde in Deutschland (59%), der Schweiz (7%) und Polen (35%) produziert. MDF beschichtet Platte wurder nur in Polen (95%) und der Schweiz (5%).

## Technical purpose
Rohe und beschichtete MDF und HDF-Platten werden im dekorativen Innenausbau, Möbelbau, als Fußboden-, Wand- und Deckenpaneele und im dekorativen Objektbau verwendet.

## Reference product
- MDF und HDF Platte, Roh und beschichtet: 1

## Inputs
- Erneuerbare Primärenergie als Energieträger (PERE) [MJ]: A1-A3 3510, C3 0, D -3170
- Erneuerbare Primärenergie zur stofflichen Nutzung (PERM) [MJ]: A1-A3 14200, C3 -14200, D 0
- Total erneuerbare Primärenergie (PERT) [MJ]: A1-A3 17700, C3 -14200, D -3170
- Nicht-erneuerbare Primärenergie als Energieträger (PENRE) [MJ]: A1-A3 9719.4, C3 0, D -13700
- Nicht-erneuerbare Primärenergie zur stofflichen Nutzung (PENRM) [MJ]: A1-A3 881, C3 -881, D 0
- Total nicht erneuerbare Primärenergie (PENRT) [MJ]: A1-A3 10600, C3 -881, D -13700
- Einsatz von Sekundärstoffen (SM) [kg]: A1-A3 0, C3 0, D 0
- Erneuerbare Sekundärbrennstoffe (RSF) [MJ]: A1-A3 0, C3 0, D 142
- Nicht erneuerbare Sekundärbrennstoffe (NRSF) [MJ]: A1-A3 0, C3 0, D 880
- Einsatz von Süßwasserressourcen (FW) [m^3]: A1-A3 2.99, C3 0, D -3.21

## Outputs
- Gefährlicher Abfall zur Deponie (HWD) [kg]: A1-A3 8.52e-5, C3 0, D -4.94e-6
- Entsorgter nicht gefährlicher Abfall (NHWD) [kg]: A1-A3 6.97, C3 0, D 0.319
- Entsorgter radioaktiver Abfall (RWD) [kg]: A1-A3 0.264, C3 0, D -1.4
- Komponenten für die Wiederverwendung (CRU) [kg]: A1-A3 0, C3 0
- Stoffe zum Recycling (MFR) [kg]: A1-A3 0, C3 0
- Stoffe für die Energierückgewinnung (MER) [kg]: A1-A3 0, C3 810
- Exportierte elektrische Energie (EEE) [MJ]: A1-A3 0, C3 0
- Exportierte thermische Energie (EET) [MJ]: A1-A3 0, C3 0

## Impact indicators
- Globales Erwärmungspotenzial (GWP) [kg CO_(2)-Äq.]: A1-A3 -710, C3 1340, D -740
- Abbau Potential der stratosphärischen Ozonschicht (ODP) [kg CFC11-Äq.]: A1-A3 3.22e-10, C3 0, D -2.05e-9
- Versauerungspotenzial von Boden und Wasser (AP) [kg SO_(2)-Äq.]: A1-A3 1.96, C3 0, D 0.787
- Eutrophierungspotenzial (EP) [kg PO_(4)^(3)-Äq.]: A1-A3 0.441, C3 0, D -0.00139
- Bildungspotential für troposphärisches Ozon (POCP) [kg Ethen-Äq.]: A1-A3 0.265, C3 0, D 0.154
- Potenzial für den abiotischen Abbau nicht fossiler Ressourcen (ADPE) [kg Sb-Äq.]: A1-A3 0.000215, C3 0, D -0.000258
- Potenzial für den abiotischen Abbau fossiler Brennstoffe (ADPF) [MJ]: A1-A3 9900, C3 0, D -10200

## Use advice
Gültigkeitsbereich:
Dieses Dokument bezieht sich auf alle Holzfaserplatten, welche in folgenden Werken der SWISS KRONO GROUP hergestellt werden:
SWISS KRONO GmbH, Heiligengrabe, Deutschland

SWISS KRONO Sp. z o.o, Zary, Polen

SWISS KRONO AG, Menznau, Schweiz
Systemgrenze:
Es handelt sich um eine EPD vom Typ: "Wiege bis zum Werkstor – mit Optionen". Diese Ökobilanz adressiert die Lebenszyklusstadien A1- A3, C3 und D gemäß /EN15804/. Das Produktstadium umfasst die Produktion aller notwendigen Rohstoffe inklusive aller Vorketten sowie der CO2-Aufnahme der Rohstoffe (Holzwachstum durch Photosynthese). Die weiteren Prozesse sind die Produktion der Krono MDF Platte roh und beschichtet im Werk inklusive der Energiebereitstellung unter Berücksichtigung der entsprechenden Vorketten. Alle notwendigen dazugehörigen Transporte der Roh- und Hilfsstoffe sind in der Ökobilanz berücksichtigt.

In Modul C3 werden die Emission des im Produkt gebundenen biogenen CO2 aufgeführt, damit wird innerhalb des Produktsystems die CO2–Neutralität sichergestellt.

Nachdem das Produkt den End-of-Waste-Status nach Demontage erreicht hat, wird angenommen, dass das Produkt einer Biomasseverbrennung zugeführt wird, welche thermische Energie und Elektrizität erzeugt. Daraus entstehende Wirkungen und potentielle Gutschriften (Energiesubstitution) sind im Modul D deklariert.

## Data sources
- Rohe und beschichtete MDF und HDF Holzfaserplatten.pdf
- GaBi Database (all versions)
- GaBi database SP35 2018
