# Duschflächen, Badewannen und Waschtische aus KALDEWEI Stahl-Email

Dataset: ILCD process, EPD, average dataset
Geography: DE
Reference year: 2019
Valid until: 2024
Classification: OEKOBAU.DAT: Gebäudetechnik / Sanitär / Dusch- und Badewannen
Classification: IBUCategories: 03 Gebäudetechnik / Sanitäreinrichtungen / Sanitärprodukte aus Verbundwerkstoffen
Method details: Sanitärprodukte aus Verbundwerkstoffen.pdf
Registration number: EPD-KAL-20190057-IBC1-DE
Owner: Franz Kaldewei GmbH & Co. KG
Compliance: DIN EN 15804; ISO 14025
Review: Accredited third party review by Institut Bauen und Umwelt e. V.
Amounts: rows without a unit in brackets have none in this file; such an amount is in the reference unit of its flow, which a separate flow dataset defines
copyright: true

## General comment
Emaillierte Duschflächen, Badewannen und Waschtische bestehen aus einem tiefgezogenen Grundkörper aus emaillierfähigem Stahl, der beidseitig mit Grundemail und auf der Sichtseite mit Deckemail beschichtet ist.

Die deklarierte Einheit ist 1 m² Stahl-Email, aus denen Duschflächen, Badewannen und Waschtische der Marke Kaldewei hergestellt werden. Je nach Produkt variiert die Stahldicke und Emaildicke. Daher gibt es für das spezifische Produkt gewisse Abweichungen von den Umweltwirkungen in Abhängigkeit von der Stahl -und Emaildicke.

## Technology and included processes
Der Prozess zur Herstellung emaillierter Duschflächen, Badewannen und Waschtische gliedert sich in die Teilprozesse: - Herstellung der Stahl-Rohteile - Reinigung der Rohteile - Herstellung der Emailfritten - Herstellung der Emailschlicker - Emaillierung. Die Verfahrensschritte der Teilprozesse sind folgendermaßen zu beschreiben: 1. Herstellung der Stahl-Rohteile Die Herstellung der Rohteile erfolgt in automatischen, kontinuierlichen Pressenstraßen mit folgenden Verfahrensschritten: • Tiefziehen: Die Formgebung der Rohteile erfolgt durch Tiefziehen von elektrostatisch beölten Stahlplatinen in 2 Teilzügen mit Kräften von 8.000-10.000 kN. • Bearbeitung des Rohlings: Nach dem Tiefziehen werden in die Rohlinge Ablauf-, Überlauf- und z. T. Grifflöcher eingestanzt und es werden ggf. die Befestigungen des Fußgestells angebracht. • Bei Badewannen mit Schürzen werden diese nach dem Tiefziehen der Wannenrohlinge angeschweißt. • Bei Waschtischen zur Wandmontage sowie bei Ein- und Aufbau-Waschtischen werden die Waschtischränder verschweißt. • Randbearbeitung des Wannenrohlings: In mehreren Arbeitsgängen werden die Randkonturen der Rohwannen durch Umkanten und Beschneiden der Wannenränder erzeugt. 2. Reinigung der Rohteile Die Reinigung der Rohteile aus Stahl wird in einer kontinuierlichen, automatischen Anlage vorgenommen und geschieht in folgenden Teilschritten: • Entfettung der Rohteile: Nach der Herstellung sind die Rohteile mit einem Film bedeckt, der aus Korrosionsschutzölen, Tiefziehölen und Metallabrieb des Tiefziehprozesses besteht und durch Besprühen mit alkalischen Tensidlösungen abgewaschen wird. • Saures Spülen der Rohteile: Eventuell auf den Rohteilen nach dem Entfetten verbliebene Verunreinigungen werden durch Besprühen mit einer stark verdünnten Schwefelsäurelösung abgewaschen. • Alkalisches Spülen der Rohteile: Der Aufbau einer temporären Rostschutzschicht auf den Rohteilen wird durch das Besprühen mit einer leicht alkalischen Aminlösung erzielt. 3. Herstellung der Emailfritte Emailfritten sind für das Emaillieren verwendete Glasgranulate, die in folgenden Teilschritten hergestellt werden: • Rezeptieren und Mischen der Glasrohstoffe: Die Glasrohstoffe werden gewogen und in Mischanlagen miteinander vermischt. • Schmelzen der Emailfritte: Die Mischungen der Glasrohstoffe werden in diskontinuierlichen Schmelzöfen 2 - 3 Stunden bei Temperaturen von 1.100-1.300 °C geschmolzen. Nach der Beendigung des Schmelzprozesses wird die Glasschmelze zur Abschreckung in Wasser gegossen und dadurch granuliert. • Trocknen der Emailfritte: Das an den Emailfrittekörnern anhaftende Oberflächenwasser wird teilweise durch Trocknen entfernt. 4. Herstellung der Emailschlicker Emailschlicker sind für das Emaillieren verwendete Suspensionen von Glasgranulaten in Wasser, die in folgenden Teilschritten hergestellt werden: • Rezeptieren der Schlickerrohstoffe: Feste Rohstoffe werden gewogen und zusammen mit den flüssigen, volumetrisch dosierten Rohstoffen in diskontinuierlich betriebene Mühlen gefüllt. • Mahlprozess: Die Schlickerrohstoffe werden in Trommelmühlen zu Emailschlickern gemahlen • Aufbereitung der Emailschlicker: Nach dem Mahlprozess werden die Emailschlicker durch Siebanlagen und Magnetabscheider gepumpt, um grobe mechanische und magnetische metallene Verunreinigungen abzutrennen. 5. Emaillierung Das Emaillieren ist die Herstellung einer Glasschicht auf einer Metalloberfläche und wird in folgenden Teilschritten vorgenommen: • Beschichtung der gereinigten Rohteile mit Emailschlicker: Die Rohteile werden auf der Vorder- und Rückseite von Robotern in automatischen Spritzkabinen mit Emailschlickern besprüht. • Trocknen der Emailschicht: Das in der Emailschicht verbliebene Wasser wird in kontinuierlich betriebenen Trockenöfen verdampft. • Brennen der Emailschicht bei 820-860 °C: In kontinuierlich betriebenen Durchlauföfen wird die Emailschicht auf den Rohteilen aufgeschmolzen, wobei eine Schichtdicke von 200-300 μm auf der Waschtisch- bzw. Wannenoberseite resultiert. • Verpackung: Die emaillierten Teile werden in einer automatischen Anlage mit einem Firmenlogo versehen und verpackt.
Technische Daten:
Die Produkte bestehen aus einem tiefgezogenen
Grundkörper aus emaillierfähigem Stahl,
der beidseitig mit Grundemail und auf der Vorderseite
mit Deckemail beschichtet ist. Als Beispiele sind in der
folgenden Tabelle exemplarisch die Daten einiger Duschflächen, Badewannen und Waschtische aufgelistet.

Das Verhältnis von Wannenoberfläche zu Projektionsfläche lässt sich für Produkte der Firma KALDEWEI wie folgt ermitteln:

Bei Badewannen:

Wannenoberfläche [m²] ~ 1,5 x Projektionsfläche [m²] + 0,5 [m²]

Bei Duschwannen unter 140 mm Tiefe:

Wannenoberfläche [m²] ~ 1,14 x Projektionsfläche [m²] + 0,06 [m²]

Bei Duschwannen von 140 mm Tiefe:

Wannenoberfläche [m²] ~ 1,24 x Projektionsfläche [m²] + 0,13 [m²]

Bei Duschwannen von 250 mm Tiefe:

Wannenoberfläche [m²] ~ 1,45 x Projektionsfläche [m²] + 0,24 [m²]

Ein- und Unterbauwaschtische:

Waschtischoberfläche [m²] ~ Projektionsfläche [m²] x 1,19 + 0,02 [m²]

Wandhängende und Aufbau-Waschtische:

Waschtischoberfläche [m²] ~ Projektionsfläche [m²] x 1,86 + 0,04 [m²]

Badewannen mit Schürze:

Wannenoberfläche [m²] ~ Projektionsfläche [m²] x 1,5 + Schürzenlänge [m] x Wannenhöhe [m] + 0,5 [m²]

Das Flächengewicht der zur Emaillierung verwendeten Stahlgrundkörper beträgt bei Duschflächen und Badewannen 18 bis 22 kg/m², bei Badewannen mit reduzierter Stahldicke (vorwiegend für den Export) 10 bis 11 kg/m² und bei Waschtischen 15 bis 21 kg/m².

Duschflächen, Badewannen und Waschtische aus KALDEWEI Stahl-Email erfüllen je nach Modell, Ausrüstung und baulichen Vorgaben im Prüfstand einzelne oder mehrere Schallschutznormen. Dazu gehören u.a. DIN 4109 bzw. DIN 4109/A1, VDI 4100 SST I-III und SIA 181. Alle Schallschutzzertifikate stehen auf www.kaldewei.de zur Verfügung.

Die maximale Belastungstemperatur der emaillierten Stahlteile liegt deutlich oberhalb von 500 °C. Die Emaildicke beträgt auf der Nutzseite mindestens 0,2 mm.

Die optionalen emailbasierten rutschhemmenden Oberflächenveredelungen "Antislip", "Vollantislip" oder "KALDEWEI SECURE PLUS" erfüllen die Bewertungsgruppe B für nassbelastete Barfußbereiche /DIN 51097/ und Bewertungsgruppe R 10 für rutschhemmende Eigenschaften in Arbeitsräumen und Arbeitsbereichen mit erhöhter Rutschgefahr /DIN 51130/.
Deklarierte Einheit:
Ein m2 Oberfläche des deklarierten Durchschnittsprodukts wiegt 17,93 kg.

Für den Stahl beträgt das durchschnittliche Flächengewicht 16,64 kg/m². Daraus ergibt sich eine errechnete Stahldicke von 2,1 mm im Durchschnitt über die Produkte.

Für Email beträgt das durchschnittliche Flächengewicht über die verschiedenen Produkte 1,29 kg/m². Daraus ergibt sich eine errechnete Emaildicke von 517µm, diese beinhaltet die Vorder- und Rückseitenemaillierung.

## Technical purpose
Duschflächen, Badewannen und Waschtische aus KALDEWEI Stahl-Email werden als selbsttragende oder nicht selbsttragende Elemente im Sanitärbereich eingesetzt.

## Reference product
- 1m² Duschfläche, Badewanne oder Waschtisch: 1

## Inputs
- Erneuerbare Primärenergie als Energieträger (PERE) [MJ]: A1-A3 74.848, A5 0.00712, C3 0.191, C4 0.0561, D 19.4
- Erneuerbare Primärenergie zur stofflichen Nutzung (PERM) [MJ]: A1-A3 6.952, A5 0, C3 0, C4 0, D 0
- Total erneuerbare Primärenergie (PERT) [MJ]: A1-A3 81.8, A5 0.00712, C3 0.191, C4 0.0561, D 19.4
- Nicht-erneuerbare Primärenergie als Energieträger (PENRE) [MJ]: A1-A3 678, A5 0.0324, C3 0.537, C4 0.452, D -253
- Nicht-erneuerbare Primärenergie zur stofflichen Nutzung (PENRM) [MJ]: A1-A3 0, A5 0, C3 0, C4 0, D 0
- Total nicht erneuerbare Primärenergie (PENRT) [MJ]: A1-A3 678, A5 0.0324, C3 0.537, C4 0.452, D -253
- Einsatz von Sekundärstoffen (SM) [kg]: A1-A3 4.341, A5 0, C3 0, C4 0, D 16.8
- Erneuerbare Sekundärbrennstoffe (RSF) [MJ]: A1-A3 0, A5 0, C3 0, C4 0, D 0
- Nicht erneuerbare Sekundärbrennstoffe (NRSF) [MJ]: A1-A3 0, A5 0, C3 0, C4 0, D 0
- Einsatz von Süßwasserressourcen (FW) [m^3]: A1-A3 0.0454, A5 0.000187, C3 0.000259, C4 8.61e-5, D -0.0518

## Outputs
- Gefährlicher Abfall zur Deponie (HWD) [kg]: A1-A3 4.93e-6, A5 1.66e-10, C3 2.58e-9, C4 7.78e-9, D -3.23e-5
- Entsorgter nicht gefährlicher Abfall (NHWD) [kg]: A1-A3 3.8, A5 0.00629, C3 0.000355, C4 2.12, D 3.01
- Entsorgter radioaktiver Abfall (RWD) [kg]: A1-A3 0.012, A5 1.47e-6, C3 8.3e-5, C4 6.48e-6, D -1.89e-5
- Komponenten für die Wiederverwendung (CRU) [kg]: A1-A3 0, A5 0, C3 0, C4 0, D 0
- Stoffe zum Recycling (MFR) [kg]: A1-A3 0, A5 0, C3 16.8, C4 0, D 0
- Stoffe für die Energierückgewinnung (MER) [kg]: A1-A3 0, A5 0, C3 0, C4 0, D 0
- Exportierte elektrische Energie (EEE) [MJ]: A1-A3 0, A5 0.133, C3 0, C4 0, D 0
- Exportierte thermische Energie (EET) [MJ]: A1-A3 0, A5 0.306, C3 0, C4 0, D 0

## Impact indicators
- Globales Erwärmungspotenzial (GWP) [kg CO_(2)-Äq.]: A1-A3 64.5, A5 0.0763, C3 0.0301, C4 0.0337, D -28
- Abbau Potential der stratosphärischen Ozonschicht (ODP) [kg CFC11-Äq.]: A1-A3 3.14e-11, A5 1.69e-15, C3 1.22e-13, C4 7.5e-15, D 5.26e-14
- Versauerungspotenzial von Boden und Wasser (AP) [kg SO_(2)-Äq.]: A1-A3 0.163, A5 1.77e-5, C3 8.75e-5, C4 0.000199, D -0.0541
- Eutrophierungspotenzial (EP) [kg PO_(4)^(3)-Äq.]: A1-A3 0.017, A5 1.95e-6, C3 9.64e-6, C4 2.75e-5, D -0.00377
- Bildungspotential für troposphärisches Ozon (POCP) [kg Ethen-Äq.]: A1-A3 0.0182, A5 7.7e-7, C3 5.84e-6, C4 1.57e-5, D -0.0131
- Potenzial für den abiotischen Abbau nicht fossiler Ressourcen (ADPE) [kg Sb-Äq.]: A1-A3 0.000606, A5 9.62e-9, C3 1.48e-8, C4 1.3e-8, D -0.000472
- Potenzial für den abiotischen Abbau fossiler Brennstoffe (ADPF) [MJ]: A1-A3 648, A5 0.0287, C3 0.328, C4 0.436, D -263

## Use advice
Gültigkeitsbereich:
Duschflächen, Badewannen und Waschtische aus KALDEWEI Stahl-Email, ausschließlich hergestellt im Werk Ahlen der Franz Kaldewei GmbH & Co. KG, Deutschland.
Systemgrenze:
Typ der EPD: Wiege bis Werkstor - mit Optionen.

Die Ökobilanz für Duschflächen, Badewannen und Waschtische aus KALDEWEI Stahl-Email berücksichtigt die Lebenszyklusphasen der Produktherstellung (A1–A3) sowie die Verwertung der Verpackung beim Einbau (Modul A5). Die Entsorgung, im Sinne einer Weiterverarbeitung oder Aufbereitung (C3) sowie Deponierung (C4) ist in dieser Studie ebenfalls berücksichtigt. Aus der Bilanzierung der betrachteten Module ergeben sich Gutschriften und Lasten außerhalb der Systemgrenze (Modul D), insbesondere infolge des Stahl-Recyclingpotenzials, welches vollständig diesem Modul zugeordnet ist.

Der Transport zum Gebäude (Modul A4), der Abbau während des End-of-Life (C1), der Transport für das End-of-Life (C2) sowie das Nutzungsstadium (Modul B) sind in dieser Studie nicht berücksichtigt.

## Data sources
- Duschflächen, Badewannen und Waschtische aus KALDEWEI Stahl-Email.pdf
- GaBi Database (all versions)
- GaBi database SP36 2018
