# Hobelware (Durchschnitt DE)

Dataset: ILCD process, EPD, representative dataset
Geography: DE
Reference year: 2020
Valid until: 2025
Classification: OEKOBAU.DAT: Holz / Vollholz / Bau-Schnittholz
Method details: EN 15804; ILCD format
Owner: Thünen-Institut für Holzforschung
Compliance: EN 15804
Review: Independent external review by Dr. Frank Werner - Umwelt & Entwicklung
Amounts: rows without a unit in brackets have none in this file; such an amount is in the reference unit of its flow, which a separate flow dataset defines
copyright: true

## General comment
Weitere Informationen zur deklarierten Einheit (Zusammensetzung) und die auf Herstellerangaben beruhende Sachbilanz (In- und Output der Stoff- und Energieströme) stehen als Excel-Datei unter dem Unterpunkt Hintergrund-Bericht zum Download bereit.
Der Datensatz wurde 2020 als Aktualisierung mit gleichbleibendem Vordergrundsystem erstellt. Alle Hintergrunddaten entstammen der GaBi Professional Datenbank 2020 im Service Pack 40. Die Modellierung und Berechnung der Ökobilanz basiert auf den europäischen Normen EN 15804:2012+A1:2013 und EN 16485:2014. Bei Rückfragen wenden Sie sich bitte an holzundklima@thuenen.de.

## Geography
Für die Ökobilanzierung von Hobelware wurden Daten von 31 Werken berücksichtigt (Rüter & Diederichs 2012). Für alle in Rüter & Diederichs (2012) angeführten Vollholzprodukte wurden von 2009 bis 2011 insgesamt 178 Prozesslinien erfasst. Im Verhältnis zu den vom Statistischen Bundesamt gemeldeten Produktionsmengen im selben Zeitraum entspricht die erreichte Abdeckung von Vollholzprodukten aus Nadelschnittholz 38 %.

## Time period
Der Datensatz basiert auf Produktionsdaten aus den Jahren 2009 bis 2011 (Vordergrundsystem).
Eine Aktualisierung des Hintergrundsystems erfolgte 2020.

## Technology and included processes
Zur Herstellung von Hobelware aus Nadelholz wird kammergetrocknetes Nadelschnittholz auf mindestens einer Seite maschinell bearbeitet, wobei in den meisten Fällen von einem vierseitigen Hobelvorgang ausgegangen werden kann. Der Hobelvorgang kann ein Nuten oder Profilieren des eingeschnittenen Holzes beinhalten. Nach dem Hobeln wird das Produkt für den Transport gestapelt und verpackt. Für die Herstellung von Hobelware aus Nadelholz wurden die Rohstoffe durchschnittlich über eine Distanz von 111 km transportiert. Die meisten Werke bezogen dabei Rundholz in Rinde. Etwa 87 % der bezogenen Holzrohstoffe stammen aus Deutschland.
Die Holzfeuchte des Produktes liegt bei 12%

## Technical purpose
Neben der Anwendung als Fußbodenbelag findet Hobelware insbesondere Verwendung als Wand- und Deckenverkleidung in Form von Profilbrettern.

## Scenarios
- energetisch: therm. Verwertung
- stofflich: stoffl. Verwertung

## Reference product
- Hobelware (Durchschnitt DE): 1

## Inputs
- Use of renewable primary energy (PERE) [MJ]: A1 181.251, A2 4.64799, A3 2390.95, A1-A3 2576.85, A5 0.488661, C2 0.391091, C3 30.8332, D (energetisch) 6138.32, D (stofflich) -43.2257
- Use of renewable primary energy resources used as raw materials (PERM) [MJ]: A1 8350.32, A2 0, A3 74.5946, A1-A3 8424.91, A5 -74.5946, C2 0, C3 -8350.32, D (energetisch) 0, D (stofflich) 0
- Total use of renewable primary energy resources (PERT) [MJ]: A1 8531.57, A2 4.64799, A3 2465.54, A1-A3 11001.8, A5 -74.1059, C2 0.391091, C3 -8319.48, D (energetisch) 6138.32, D (stofflich) -43.2257
- Use of non renewable primary energy (PENRE) [MJ]: A1 219.931, A2 79.4539, A3 623.127, A1-A3 922.512, A5 2.6429, C2 6.96441, C3 53.6094, D (energetisch) -4714.84, D (stofflich) -205.503
- Use of non renewable primary energy resources used as raw materials (PENRM) [MJ]: A1 0, A2 0, A3 24.12, A1-A3 24.12, A5 -24.12, C2 0, C3 0, D (energetisch) 0, D (stofflich) 0
- Total use of non renewable primary energy resource (PENRT) [MJ]: A1 219.931, A2 79.4539, A3 647.247, A1-A3 946.632, A5 -21.4771, C2 6.96441, C3 53.6094, D (energetisch) -4714.84, D (stofflich) -205.503
- Use of secondary material (SM) [kg]: A1 0, A2 0, A3 0, A1-A3 0, A5 0, C2 0, C3 0, D (energetisch) 0, D (stofflich) 485.251
- Use of renewable secondary fuels (RSF) [MJ]: A1 11.407, A2 0, A3 66.7806, A1-A3 78.1876, A5 0, C2 0, C3 0, D (energetisch) 0, D (stofflich) 0
- Use of non renewable secondary fuels (NRSF) [MJ]: A1 0, A2 0, A3 0, A1-A3 0, A5 0, C2 0, C3 0, D (energetisch) 0, D (stofflich) 0
- Use of net fresh water (FW) [m3]: A1 0.0272625, A2 0.00431519, A3 0.183456, A1-A3 0.215033, A5 0.0286437, C2 0.000452856, C3 0.0166923, D (energetisch) 0.703931, D (stofflich) -0.025975

## Outputs
- Hazardous waste disposed (HWD) [kg]: A1 1.07215e-5, A2 3.07211e-6, A3 7.56434e-6, A1-A3 2.1358e-5, A5 6.94201e-9, C2 3.24102e-7, C3 3.60527e-8, D (energetisch) -2.81183e-6, D (stofflich) -5.4951e-6
- Non hazardous waste dispose (NHWD) [kg]: A1 0.168258, A2 0.0137382, A3 1.8386, A1-A3 2.02059, A5 0.104273, C2 0.00106582, C3 0.0412596, D (energetisch) 2.18741, D (stofflich) -0.0404585
- Radioactive waste disposed (RWD) [kg]: A1 0.00408765, A2 9.31992e-5, A3 0.0380048, A1-A3 0.0421857, A5 0.000134047, C2 8.62011e-6, C3 0.00448112, D (energetisch) -0.309973, D (stofflich) -0.00554315
- Components for re-use (CRU) [kg]: A1 0, A2 0, A3 0, A1-A3 0, A5 0, C2 0, C3 0, D (energetisch) 0, D (stofflich) 0
- Materials for recycling (MFR) [kg]: A1 0, A2 0, A3 0, A1-A3 0, A5 0, C2 0, C3 485.251, D (energetisch) 0, D (stofflich) 0
- Materials for energy recovery (MER) [kg]: A1 0, A2 0, A3 0, A1-A3 0, A5 0, C2 0, C3 485.251, D (energetisch) 0, D (stofflich) 0
- Exported electrical energy (EEE) [MJ]: A1 0, A2 0, A3 0.208983, A1-A3 0.208983, A5 17.9592, C2 0, C3 0, D (energetisch) 0, D (stofflich) 0
- Exported thermal energy (EET) [MJ]: A1 0, A2 0, A3 0.485493, A1-A3 0.485493, A5 34.1752, C2 0, C3 0, D (energetisch) 0, D (stofflich) 0

## Impact indicators
- Global warming potential (GWP) [kg CO2-Äqv.]: A1 -776.335, A2 5.88095, A3 42.5134, A1-A3 -727.94, A5 9.21333, C2 0.502945, C3 798.098, D (energetisch) -355.531, D (stofflich) -15.5377
- Depletion potential of the stratospheric ozone layer (ODP) [kg R11-Äqv.]: A1 1.56867e-13, A2 2.1029e-15, A3 3.15873e-12, A1-A3 3.3177e-12, A5 2.10116e-15, C2 8.37212e-17, C3 1.7597e-13, D (energetisch) -1.21711e-11, D (stofflich) -2.15635e-13
- Acidification potential of soil and water (AP) [kg SO2-Äqv.]: A1 0.0982277, A2 0.0240335, A3 0.315183, A1-A3 0.437444, A5 0.00122596, C2 0.0021073, C3 0.00587833, D (energetisch) -0.357863, D (stofflich) -0.0503526
- Eutrophication potential (EP) [kg Phosphat-Äqv.]: A1 0.0232237, A2 0.00608949, A3 0.0668429, A1-A3 0.0961561, A5 0.000258366, C2 0.00053013, C3 0.00104827, D (energetisch) -0.059621, D (stofflich) -0.011697
- Formation potential of tropospheric ozone (POCP) [kg Ethen-Äqv.]: A1 0.0139113, A2 -0.0104172, A3 0.0705306, A1-A3 0.0740247, A5 8.03661e-5, C2 -0.000886199, C3 0.000414745, D (energetisch) -0.0281071, D (stofflich) -0.000546581
- Abiotic depletion potential for non fossil resources (ADPE) [kg Sb-Äqv.]: A1 4.05949e-6, A2 5.38689e-7, A3 2.94728e-5, A1-A3 3.4071e-5, A5 1.4105e-7, C2 4.23502e-8, C3 1.75259e-6, D (energetisch) -0.000118176, D (stofflich) -2.93998e-6
- Abiotic depletion potential for fossil resources (ADPF) [MJ]: A1 209.863, A2 79.216, A3 531.019, A1-A3 820.098, A5 2.30531, C2 6.94241, C3 42.2985, D (energetisch) -3932.43, D (stofflich) -191.508

## Use advice
Aufgrund der hohen Abdeckung bildet der Datensatz die durchschnittlichen Produktionsverhältnisse und die damit verbundenen Umweltwirkungen repräsentativ für Deutschland ab. Liegen keine herstellerspezifischen Ökobilanzergebnisse des verwendeten Produkts vor, empfiehlt sich die Verwendung dieses Durchschnittsdatensatzes.

## Data sources
- Rüter S, Diederichs S (2012) Ökobilanz Basisdaten für Bauprodukte aus Holz, Hamburg, Johann Heinrich von Thünen Institut, Institut für Holztechnologie und Holzbiologie, Abschlussbericht
- GaBi database SP40 2020
- GaBi database (general)
