# Furniersperrholz (Durchschnitt DE)

Dataset: ILCD process, EPD, representative dataset
Geography: DE
Reference year: 2020
Valid until: 2025
Classification: OEKOBAU.DAT: Holz / Holzwerkstoffe / Sperrholz
Method details: EN 15804; ILCD format
Owner: Thünen-Institut für Holzforschung
Compliance: EN 15804
Review: Independent external review by Dr. Frank Werner - Umwelt & Entwicklung
Amounts: rows without a unit in brackets have none in this file; such an amount is in the reference unit of its flow, which a separate flow dataset defines
copyright: true

## General comment
Weitere Informationen zur deklarierten Einheit (Zusammensetzung) und die auf Herstellerangaben beruhende Sachbilanz (In- und Output der Stoff- und Energieströme) stehen als Excel-Datei unter dem Unterpunkt Hintergrund-Bericht zum Download bereit.
Der Datensatz wurde 2020 als Aktualisierung mit gleichbleibendem Vordergrundsystem erstellt. Alle Hintergrunddaten entstammen der GaBi Professional Datenbank 2020 im Service Pack 40. Die Modellierung und Berechnung der Ökobilanz basiert auf den europäischen Normen EN 15804:2012+A1:2013 und EN 16485:2014. Bei Rückfragen wenden Sie sich bitte an holzundklima@thuenen.de.

## Geography
Für Furniersperrholz übertreffen die Produktionsangaben (20.000 m³/a) der Werke (Datenerhebung von 2009 bis 2011), die an der Ökobilanzstudie teilgenommen haben, die Angaben des Statistischen Bundesamtes für das Jahr 2009 (14.961 m³/a).

## Time period
Der Datensatz basiert auf Produktionsdaten aus den Jahren 2009 bis 2011 (Vordergrundsystem).
Eine Aktualisierung des Hintergrundsystems erfolgte 2020.

## Technology and included processes
Furniersperrhölzer sind plattenförmige Holzwerkstoffe auf Basis von Furnieren aus Laub- und/oder Nadelholz. Die Furniere sind im 90° Winkel zueinander angeordnet (gesperrt) und mittels duroplasti-scher Bindemitteln miteinander verklebt. Rundholz wird nach der Lagerung (Bewässerung) in Dämpfgruben plastifiziert und in schälfähige Abschnitte gekappt. Die Abschnitte werden zu einem endlosen Furnierband geschält und Fehlerstellen werden ausgekappt. Das Furnierband wird getrocknet und die Furnierabschnitte werden gefügt (zu größeren Elementen zusammengesetzt). Zur Herstellung der Platten werden die gefügten Furnierabschnitte mit Klebstoff beschichtet, senkrecht zueinander zusammengelegt (jede Lage senkrecht zu der darunter liegenden) und miteinander verpresst. Nachdem der Klebstoff vollständig ausgehärtet ist, werden die Platten formatiert, geschliffen, eventuell ausgebessert und verpackt.
Die Holzfeuchte des Produktes liegt bei 8%

## Technical purpose
Wegen seiner guten Maß- und Formbeständigkeit wird dieser Furniersperrholz insbesondere im Möbel- und Innenausbau für Rückwände, Verkleidungen, Füllungen, Möbelkorpusse und Arbeitsplatten verwendet. Auch im KfZ- Bau sowie als Verpackungs-material kommt dieser Werkstoff zum Einsatz.

## Scenarios
- energetisch: therm.Verwertung
- stofflich: stoffl. Verwertung

## Reference product
- Funiersperrholz: 1

## Inputs
- Use of renewable primary energy (PERE) [MJ]: A1 129.177, A2 10.0829, A3 20958.7, A1-A3 21098, A5 0.325866, C2 0.647347, C3 30.8332, D (energetisch) 9866.62, D (stofflich) -47.8309
- Use of renewable primary energy resources used as raw materials (PERM) [MJ]: A1 13104.3, A2 0, A3 50.4605, A1-A3 13154.7, A5 -50.4605, C2 0, C3 -13104.3, D (energetisch) 0, D (stofflich) 0
- Total use of renewable primary energy resources (PERT) [MJ]: A1 13233.5, A2 10.0829, A3 21009.2, A1-A3 34252.7, A5 -50.1346, C2 0.647347, C3 -13073.4, D (energetisch) 9866.62, D (stofflich) -47.8309
- Use of non renewable primary energy (PENRE) [MJ]: A1 1855.43, A2 173.381, A3 3095.86, A1-A3 5124.67, A5 1.71769, C2 11.5277, C3 53.6094, D (energetisch) -7971.68, D (stofflich) -244.604
- Use of non renewable primary energy resources used as raw materials (PENRM) [MJ]: A1 895.253, A2 0, A3 64.332, A1-A3 959.585, A5 -64.332, C2 0, C3 -895.253, D (energetisch) 0, D (stofflich) 0
- Total use of non renewable primary energy resource (PENRT) [MJ]: A1 2750.69, A2 173.381, A3 3160.19, A1-A3 6084.26, A5 -62.6143, C2 11.5277, C3 -841.643, D (energetisch) -7971.68, D (stofflich) -244.604
- Use of secondary material (SM) [kg]: A1 0, A2 0, A3 0, A1-A3 0, A5 0, C2 0, C3 0, D (energetisch) 0, D (stofflich) 823.903
- Use of renewable secondary fuels (RSF) [MJ]: A1 0, A2 0, A3 0, A1-A3 0, A5 0, C2 0, C3 0, D (energetisch) 0, D (stofflich) 0
- Use of non renewable secondary fuels (NRSF) [MJ]: A1 0, A2 0, A3 0, A1-A3 0, A5 0, C2 0, C3 0, D (energetisch) 0, D (stofflich) 0
- Use of net fresh water (FW) [m3]: A1 0.554143, A2 0.00910643, A3 0.807714, A1-A3 1.37096, A5 0.0174213, C2 0.000749584, C3 0.0166923, D (energetisch) 1.55416, D (stofflich) -0.0292427

## Outputs
- Hazardous waste disposed (HWD) [kg]: A1 1.58231e-5, A2 6.52659e-6, A3 3.66334e-5, A1-A3 5.89832e-5, A5 4.73239e-9, C2 5.36465e-7, C3 3.60527e-8, D (energetisch) -3.83028e-6, D (stofflich) -8.62355e-6
- Non hazardous waste dispose (NHWD) [kg]: A1 0.630944, A2 0.030315, A3 15.4038, A1-A3 16.0651, A5 0.0975309, C2 0.00176419, C3 0.0412596, D (energetisch) 33.332, D (stofflich) -0.0634921
- Radioactive waste disposed (RWD) [kg]: A1 0.0211142, A2 0.000183493, A3 0.223469, A1-A3 0.244767, A5 8.99743e-5, C2 1.42683e-5, C3 0.00448112, D (energetisch) -0.470425, D (stofflich) -0.00580316
- Components for re-use (CRU) [kg]: A1 0, A2 0, A3 0, A1-A3 0, A5 0, C2 0, C3 0, D (energetisch) 0, D (stofflich) 0
- Materials for recycling (MFR) [kg]: A1 0, A2 0, A3 0, A1-A3 0, A5 0, C2 0, C3 823.903, D (energetisch) 0, D (stofflich) 0
- Materials for energy recovery (MER) [kg]: A1 0, A2 0, A3 0, A1-A3 0, A5 0, C2 0, C3 823.903, D (energetisch) 0, D (stofflich) 0
- Exported electrical energy (EEE) [MJ]: A1 0, A2 0, A3 0.0192312, A1-A3 0.0192312, A5 10.4526, C2 0, C3 0, D (energetisch) 0, D (stofflich) 0
- Exported thermal energy (EET) [MJ]: A1 0, A2 0, A3 0.0446763, A1-A3 0.0446763, A5 19.2079, C2 0, C3 0, D (energetisch) 0, D (stofflich) 0

## Impact indicators
- Global warming potential (GWP) [kg CO2-Äqv.]: A1 -1139.35, A2 12.8744, A3 244.884, A1-A3 -881.593, A5 5.29941, C2 0.832492, C3 1250.03, D (energetisch) -249.943, D (stofflich) -18.7109
- Depletion potential of the stratospheric ozone layer (ODP) [kg R11 eq.]: A1 7.18556e-13, A2 4.20456e-15, A3 9.78012e-12, A1-A3 1.05029e-11, A5 1.39354e-15, C2 1.38578e-16, C3 1.7597e-13, D (energetisch) -1.84724e-11, D (stofflich) -2.25169e-13
- Acidification potential of soil and water (AP) [kg SO2-Äqv.]: A1 0.152565, A2 0.0518689, A3 1.40956, A1-A3 1.61399, A5 0.000784085, C2 0.00348808, C3 0.00587833, D (energetisch) -0.482906, D (stofflich) -0.0726918
- Eutrophication potential (EP) [kg Phosphat-Äqv.]: A1 0.0860917, A2 0.0131512, A3 0.306632, A1-A3 0.405875, A5 0.000156061, C2 0.000877489, C3 0.00104827, D (energetisch) -0.086369, D (stofflich) -0.0173429
- Formation potential of tropospheric ozone (POCP) [kg Ethen-Äqv.]: A1 0.0234634, A2 -0.022561, A3 0.170517, A1-A3 0.171419, A5 4.99195e-5, C2 -0.00146687, C3 0.000414745, D (energetisch) -0.0405561, D (stofflich) -0.000249358
- Abiotic depletion potential for non fossil resources (ADPE) [kg Sb-Äqv.]: A1 2.47546e-5, A2 1.18623e-6, A3 9.6576e-5, A1-A3 0.000122517, A5 1.25097e-7, C2 7.00996e-8, C3 1.75259e-6, D (energetisch) -0.000138708, D (stofflich) -3.34558e-6
- Abiotic depletion potential for fossil resources (ADPF) [MJ]: A1 2697.34, A2 172.913, A3 2568.06, A1-A3 5438.31, A5 1.4911, C2 11.4913, C3 42.2985, D (energetisch) -5889.01, D (stofflich) -229.951

## Use advice
Aufgrund der hohen Abdeckung bildet der Datensatz die durchschnittlichen Produktionsverhältnisse und die damit verbundenen Umweltwirkungen repräsentativ für Deutschland ab. Liegen keine herstellerspezifischen Ökobilanzergebnisse des verwendeten Produkts vor, empfiehlt sich die Verwendung dieses Durchschnittsdatensatzes.

## Data sources
- Rüter S, Diederichs S (2012) Ökobilanz Basisdaten für Bauprodukte aus Holz, Hamburg, Johann Heinrich von Thünen Institut, Institut für Holztechnologie und Holzbiologie, Abschlussbericht
- GaBi database SP40 2020
- GaBi database (general)
