# Brettschichtholz - Standardformen (Durchschnitt DE)

Dataset: ILCD process, EPD, representative dataset
Geography: DE
Reference year: 2020
Valid until: 2025
Classification: OEKOBAU.DAT: Holz / Vollholz / Brettschichtholz (BSH)
Method details: EN 15804; ILCD format
Owner: Thünen-Institut für Holzforschung
Compliance: EN 15804
Review: Independent external review by Dr. Frank Werner - Umwelt & Entwicklung
Amounts: rows without a unit in brackets have none in this file; such an amount is in the reference unit of its flow, which a separate flow dataset defines
copyright: true

## General comment
Weitere Informationen zur deklarierten Einheit (Zusammensetzung) und die auf Herstellerangaben beruhende Sachbilanz (In- und Output der Stoff- und Energieströme) stehen als Excel-Datei unter dem Unterpunkt Hintergrundbericht zum Download bereit.
Der Datensatz wurde 2020 als Aktualisierung mit gleichbleibendem Vordergrundsystem erstellt. Alle Hintergrunddaten entstammen der GaBi Professional Datenbank 2020 im Service Pack 40. Die Modellierung und Berechnung der Ökobilanz basiert auf den europäischen Normen EN 15804:2012+A1:2013 und EN 16485:2014. Bei Rückfragen wenden Sie sich bitte an holzundklima@thuenen.de.

## Geography
Für die Ökobilanzierung von Brettschichtholz, Standardträger wurden Daten von 21 Werken berücksichtigt (Rüter & Diederichs 2012). Für alle in Rüter & Diederichs (2012) angeführten Vollholzprodukte wurden von 2009 bis 2011 insgesamt 178 Prozesslinien erfasst. Im Verhältnis zu den vom Statistischen Bundesamt gemeldeten Produktionsmengen im selben Zeitraum entspricht die erreichte Abdeckung von Vollholzprodukten aus Nadelschnittholz 38 %.

## Time period
Der Datensatz basiert auf Produktionsdaten aus den Jahren 2009 bis 2011 (Vordergrundsystem).
Eine Aktualisierung des Hintergrundsystems erfolgte 2020.

## Technology and included processes
Brettschichtholz besteht aus mindestens drei faserparallel miteinander verklebten und getrockneten Brettern oder Brettlamellen aus Nadelholz. Die Verklebung wird vornehmlich mittels UF-Bindemittel durchgeführt. Die hier aufgeführten Ergebnisse und Parameter beziehen sich auf gerade, horizontal laminierte Träger (Standardträger). Die Verklebung von Brettschichtholz Standardträgern wird vornehmlich mittels Melamin-Harnstoff-Formaldehyd Bindemittel durchgeführt. Teilweise werden jedoch auch 1 Komponenten Polyurethan-Bindemittel und in seltenen Fällen Emulsion-Polymer-Isocyanat-Bindemittel genutzt. Die keilgezinkten Lamellen werden analog zu den Konstruktionsvollhölzern verklebt. Im Einzelfall werden maximal zwei verschiedene Klebstofftypen genutzt. Für die Herstellung von Brettschichtholz Standardträgern wird konventionelles Schnittholz zunächst auf etwa 12 % Holzfeuchte getrocknet, vorgehobelt und visuell bzw. maschinell nach Festigkeit sortiert. Identifizierte Brettabschnitte mit festigkeitsvermindernden Stellen werden abhängig von der erwünschten Festigkeitsklasse ausgekappt und die entstandenen Bretter durch Keilzinkenverbindung zu endlos langen Lamellen gestoßen. Im darauf folgenden Vorhobelprozess werden die Lamellen auf bis zu 45mm Stärke gehobelt, um nach Beleimung der Breitseite im Pressbett zu mindesten 3-lagigen Holzrohlingen verpresst zu werden. Nach Aushärtung wird der Rohling gehobelt, gefast, abgebunden und verpackt.
Die Holzfeuchte des Produktes liegt bei 12%.

## Technical purpose
Brettschichtholz wird vorwiegend bei hoher statischer Beanspruchung im Ingenieurholzbau verwendet.

## Scenarios
- energetisch: therm. Verwertung
- stofflich: stoffl. Verwertung

## Reference product
- Brettschichtholz (standard): 1

## Inputs
- Use of renewable primary energy (PERE) [MJ]: A1 812.46, A2 46.5481, A3 2085.53, A1-A3 2944.54, A5 0.253603, C2 0.415835, C3 30.8332, D (energetisch) 6288.77, D (stofflich) -78.2039
- Use of renewable primary energy resources used as raw materials (PERM) [MJ]: A1 8573.86, A2 0, A3 36.1501, A1-A3 8610.01, A5 -36.1501, C2 0, C3 -8573.86, D (energetisch) 0, D (stofflich) 0
- Total use of renewable primary energy resources (PERT) [MJ]: A1 9386.32, A2 46.5481, A3 2121.68, A1-A3 11554.5, A5 -35.8965, C2 0.415835, C3 -8543.03, D (energetisch) 6288.77, D (stofflich) -78.2039
- Use of non renewable primary energy (PENRE) [MJ]: A1 745.856, A2 435.246, A3 889.686, A1-A3 2070.79, A5 1.36717, C2 7.40504, C3 53.6094, D (energetisch) -4944.12, D (stofflich) -174.968
- Use of non renewable primary energy resources used as raw materials (PENRM) [MJ]: A1 88.0247, A2 0, A3 16.668, A1-A3 104.693, A5 -16.668, C2 0, C3 -88.0247, D (energetisch) 0, D (stofflich) 0
- Total use of non renewable primary energy resource (PENRT) [MJ]: A1 833.881, A2 435.246, A3 906.354, A1-A3 2175.48, A5 -15.3008, C2 7.40504, C3 -34.4153, D (energetisch) -4944.12, D (stofflich) -174.968
- Use of secondary material (SM) [kg]: A1 0, A2 0, A3 0, A1-A3 0, A5 0, C2 0, C3 0, D (energetisch) 0, D (stofflich) 507.055
- Use of renewable secondary fuels (RSF) [MJ]: A1 51.9469, A2 0, A3 24.4399, A1-A3 76.3868, A5 0, C2 0, C3 0, D (energetisch) 0, D (stofflich) 0
- Use of non renewable secondary fuels (NRSF) [MJ]: A1 0, A2 0, A3 0, A1-A3 0, A5 0, C2 0, C3 0, D (energetisch) 0, D (stofflich) 0
- Use of net fresh water (FW) [m3]: A1 0.168134, A2 0.0536769, A3 0.258731, A1-A3 0.480542, A5 0.0150463, C2 0.000481508, C3 0.0166923, D (energetisch) 0.815543, D (stofflich) -0.0212016

## Outputs
- Hazardous waste disposed (HWD) [kg]: A1 1.57046e-5, A2 1.75431e-5, A3 1.16396e-5, A1-A3 4.48872e-5, A5 3.50311e-9, C2 3.44607e-7, C3 3.60527e-8, D (energetisch) -2.84689e-6, D (stofflich) -5.70676e-6
- Non hazardous waste dispose (NHWD) [kg]: A1 0.781245, A2 0.0985489, A3 1.68147, A1-A3 2.56126, A5 0.0560164, C2 0.00113326, C3 0.0412596, D (energetisch) 7.25651, D (stofflich) -0.0420168
- Radioactive waste disposed (RWD) [kg]: A1 0.0186891, A2 0.00911202, A3 0.0552036, A1-A3 0.0830047, A5 6.73835e-5, C2 9.16549e-6, C3 0.00448112, D (energetisch) -0.320873, D (stofflich) -0.0043323
- Components for re-use (CRU) [kg]: A1 0, A2 0, A3 0, A1-A3 0, A5 0, C2 0, C3 0, D (energetisch) 0, D (stofflich) 0
- Materials for recycling (MFR) [kg]: A1 0, A2 0, A3 0, A1-A3 0, A5 0, C2 0, C3 507.055, D (energetisch) 0, D (stofflich) 0
- Materials for energy recovery (MER) [kg]: A1 0, A2 0, A3 0, A1-A3 0, A5 0, C2 0, C3 507.055, D (energetisch) 0, D (stofflich) 0
- Exported electrical energy (EEE) [MJ]: A1 0, A2 0, A3 0.149788, A1-A3 0.149788, A5 9.76787, C2 0, C3 0, D (energetisch) 0, D (stofflich) 0
- Exported thermal energy (EET) [MJ]: A1 0, A2 0, A3 0.347975, A1-A3 0.347975, A5 19.0104, C2 0, C3 0, D (energetisch) 0, D (stofflich) 0

## Impact indicators
- Global warming potential (GWP) [kg CO2-Äqv.]: A1 -762.522, A2 30.5314, A3 65.789, A1-A3 -666.202, A5 5.10001, C2 0.534765, C3 819.35, D (energetisch) -319.08, D (stofflich) -13.285
- Depletion potential of the stratospheric ozone layer (ODP) [kg R11 eq.]: A1 7.12743e-13, A2 9.99975e-14, A3 2.0895e-12, A1-A3 2.90224e-12, A5 1.11258e-15, C2 8.90182e-17, C3 1.7597e-13, D (energetisch) -1.25995e-11, D (stofflich) -1.68314e-13
- Acidification potential of soil and water (AP) [kg SO2-Äqv.]: A1 0.224122, A2 0.121129, A3 0.312331, A1-A3 0.657582, A5 0.000641445, C2 0.00224063, C3 0.00587833, D (energetisch) -0.359249, D (stofflich) -0.0489744
- Eutrophication potential (EP) [kg Phosphat-Äqv.]: A1 0.0573903, A2 0.0295383, A3 0.0673847, A1-A3 0.154313, A5 0.000135037, C2 0.00056367, C3 0.00104827, D (energetisch) -0.0608649, D (stofflich) -0.0116319
- Formation potential of tropospheric ozone (POCP) [kg Ethen-Äqv.]: A1 0.0274776, A2 -0.0476909, A3 0.0519349, A1-A3 0.0317217, A5 4.21406e-5, C2 -0.000942268, C3 0.000414745, D (energetisch) -0.028606, D (stofflich) -0.000242817
- Abiotic depletion potential for non fossil resources (ADPE) [kg Sb-Äqv.]: A1 2.872e-5, A2 3.37108e-6, A3 2.71743e-5, A1-A3 5.92653e-5, A5 7.57103e-8, C2 4.50297e-8, C3 1.75259e-6, D (energetisch) -0.00011553, D (stofflich) -2.43267e-6
- Abiotic depletion potential for fossil resources (ADPF) [MJ]: A1 787.856, A2 412.294, A3 753.315, A1-A3 1953.46, A5 1.19746, C2 7.38164, C3 42.2985, D (energetisch) -4046.16, D (stofflich) -164.029

## Use advice
Aufgrund der hohen Abdeckung bildet der Datensatz die durchschnittlichen Produktionsverhältnisse und die damit verbundenen Umweltwirkungen repräsentativ für Deutschland ab. Liegen keine herstellerspezifischen Ökobilanzergebnisse des verwendeten Produkts vor, empfiehlt sich die Verwendung dieses Durchschnittsdatensatzes.

## Data sources
- Rüter S, Diederichs S (2012) Ökobilanz Basisdaten für Bauprodukte aus Holz, Hamburg, Johann Heinrich von Thünen Institut, Institut für Holztechnologie und Holzbiologie, Abschlussbericht
- GaBi database SP40 2020
- GaBi database (general)
