# Laminated wood board softwood (generic); 515 kg/m3 density at 12% moisture

Dataset: ILCD process, EPD, generic dataset
Geography: DE
Reference year: 2018
Valid until: 2022
Classification: oekobau.dat: Holz / Vollholz / Balkenschichtholz (Duo-Triobalken)
Owner: thinkstep
Compliance: DIN EN 15804
Review: Dependent internal review by thinkstep, IABP-GaBi, IBP-GaBi; Independent external review by GaBi user forum, GaBi bug forum, GaBi user community
Amounts: rows without a unit in brackets have none in this file; such an amount is in the reference unit of its flow, which a separate flow dataset defines
copyright: true

## General comment
This data set has been modeled according to the European Standard EN 15804 for Sustainable Building. Results are depicted in modules that allow the structured expression of results over the entire life cycle.

## Geography
The data set represents the country specific situation in Germany, focusing on the main technologies, the region specific characteristics and / or import statistics.

## Time period
Annual average

## Technology and included processes
Laminated woodboard (other name: Duo-/Trio boards) consists of bonded layers, which are also called lamellae. Laminated woodboards in comparison to laminated timber are thicker (45mm) and therefore require less glue per m3 (PU or phenolic resin-based adhesive systems). The layers are glued together so that the fibers run parallel, to enlarge the cariing capacity. The process production steps:
1. Transport and storage of spruce wood
2. Drying
3. Pre-cutting
4. Finger-jointing
5. Cutting lamellae
6. Bonding with adhesives
7. Finishing

Background system:
Electricity: Electricity is modelled according to the individual country-specific situations. The country-specific modelling is achieved on multiple levels. Firstly, individual energy carrier specific power plants and plants for renewable energy sources are modelled according to the current national electricity grid mix. Modelling the electricity consumption mix includes transmission / distribution losses and the own use by energy producers (own consumption of power plants and "other" own consumption e.g. due to pumped storage hydro power etc.), as well as imported electricity. Secondly, the national emission and efficiency standards of the power plants are modelled as well as the share of electricity plants and combined heat and power plants (CHP). Thirdly, the country-specific energy carrier supply (share of imports and / or domestic supply) including the country-specific energy carrier properties (e.g. element and energy content) are accounted for. Fourthly, the exploration, mining/production, processing and transport processes of the energy carrier supply chains are modelled according to the specific situation of each electricity producing country. The different production and processing techniques (emissions and efficiencies) in the different energy producing countries are considered, e.g. different crude oil production technologies or different flaring rates at the oil platforms.
Thermal energy, process steam: The thermal energy and process steam supply is modelled according to the individual country-specific situation with regard to emission standards and considered energy carriers. The thermal energy and process steam are produced at heat plants. Efficiencies for thermal energy production are by definition 100% in relation to the corresponding energy carrier input. For process steam the efficiency ranges from 85%, 90% to 95%. The energy carriers used for the generation of thermal energy and process steam are modelled according to the specific import situation (see electricity above).
Transports: All relevant and known transport processes are included. Ocean-going and inland ship transport as well as rail, truck and pipeline transport of bulk commodities are considered.
Energy carriers: The energy carriers are modelled according to the specific supply situation (see electricity above).
Refinery products: Diesel fuel, gasoline, technical gases, fuel oils, lubricants and residues such as bitumen are modelled with a parameterised country-specific refinery model. The refinery model represents the current national standard in refining techniques (e.g. emission level, internal energy consumption, etc.) as well as the individual country-specific product output spectrum, which can be quite different from country to country. The supply of crude oil is modelled, again, according to the country-specific situation with the respective properties of the resources.

## Technical purpose
This product can be used in construction.

## Safety margin
10 %. Product system almost completely covered. Good technological, temporal and geographic representativeness.

## Reference product
- Laminated woodboard softwood (12% moisture) m3: 1

## Inputs
- Use of renewable primary energy (PERE) [MJ]: A1-A3 1570.48, C1 0, C2 1.02876, C3 10887.3, D -1378.59
- Primary energy resources used as raw materials (PERM) [MJ]: A1-A3 10881, C1 0, C2 0, C3 -10881, D 0
- Total use of renewable primary energy resources (PERT) [MJ]: A1-A3 12451.5, C1 0, C2 1.02876, C3 6.2262, D -1378.59
- Use of non-renewable primary energy (PENRE) [MJ]: A1-A3 3388.96, C1 0, C2 17.6715, C3 10.8254, D -4815.96
- Non-renewable primary energy resources used as raw materials (PENRM) [MJ]: A1-A3 0, C1 0, C2 0, C3 0, D 0
- Total use of non-renewable primary energy resources (PENRT) [MJ]: A1-A3 3388.96, C1 0, C2 17.6715, C3 10.8254, D -4815.96
- Input of secondary material (SM) [kg]: A1-A3 0, C1 0, C2 0, C3 0, D 0
- Use of renewable secondary fuels (RSF) [MJ]: A1-A3 0, C1 0, C2 0, C3 0, D 0
- Use of non renewable secondary fuels (NRSF) [MJ]: A1-A3 0, C1 0, C2 0, C3 0, D 0
- Use of net fresh water (FW) [m3]: A1-A3 0.718019, C1 0, C2 0.000921345, C3 0.0033707, D 1.59392

## Outputs
- Hazardous waste disposed (HWD) [kg]: A1-A3 3.3914e-5, C1 0, C2 6.60365e-7, C3 7.28019e-9, D -2.47731e-6
- Non-hazardous waste disposed (NHWD) [kg]: A1-A3 1.95248, C1 0, C2 0.00310166, C3 0.00833163, D 4.03427
- Radioactive waste disposed (RWD) [kg]: A1-A3 0.155278, C1 0, C2 1.86045e-5, C3 0.000904881, D -0.165394
- Components for re-use (CRU) [kg]: A1-A3 0, C1 0, C2 0, C3 0, D 0
- Materials for Recycling (MFR) [kg]: A1-A3 0, C1 0, C2 0, C3 0, D 0
- Material for Energy Recovery (MER) [kg]: A1-A3 0, C1 566.5, C2 0, C3 0, D 0
- Exported electrical energy (EEE) [MJ]: A1-A3 0, C1 0, C2 0, C3 0, D 1139.61
- Exported thermal energy (EET) [MJ]: A1-A3 0, C1 0, C2 0, C3 0, D 2671.75

## Impact indicators
- Global warming potential (GWP) [kg CO2 eq.]: A1-A3 -593.704, C1 0, C2 1.31478, C3 904.325, D -226.285
- Ozone Depletion Potential (ODP) [kg R11 eq.]: A1-A3 7.05358e-12, C1 0, C2 4.35198e-16, C3 3.55339e-14, D -7.61617e-12
- Acidification potential (AP) [kg SO2 eq.]: A1-A3 0.70133, C1 0, C2 0.00265572, C3 0.0010171, D -0.180545
- Eutrophication potential (EP) [kg Phosphate eq.]: A1-A3 0.15854, C1 0, C2 0.000631337, C3 0.000200888, D -0.0304087
- Photochemical Ozone Creation Potential (POCP) [kg Ethene eq.]: A1-A3 0.0569662, C1 0, C2 -0.000867983, C3 8.37503e-5, D -0.0220581
- Abiotic depletion potential for non fossil resources (ADPE) [kg Sb eq.]: A1-A3 7.40374e-5, C1 0, C2 1.1064e-7, C3 3.32276e-7, D -8.19252e-5
- Abiotic depletion potential for fossil resources (ADPF) [MJ]: A1-A3 2996.94, C1 0, C2 17.6239, C3 8.5414, D -4398.42

## Use advice
The data set represents a cradle to gate inventory. It can be used to characterise the supply chain situation of the respective commodity in a representative manner. Combination with individual unit processes using this commodity enables the generation of user-specific (product) LCAs.

## Data sources
- Informationsdienst Holz: Ökobilanzen Holz, 1997
- Informationsdienst Holz: Erstellung von Ökobilanzen, 1997
- Analyse und Bewertung der forstlichen Produktion
- ÖkoPot-Projektbericht, 2008
- NetLZ-Projektbericht "Grundsätze für Holz und Holzwerkstoffe", 2007
- Vergleichende Oekobilanzierung der Rundholzproduktion in verschiedenen Forstbetrieben BFH Report 204
- Ökologische Bilanzierung von Bauschnittholz und veredelten Vollholzprodukten, 2000
- GaBi Database Edition 2020, SP40
- GaBi database (all versions)
