# Rahmenprofile für Fassaden - Verband Fenster + Fassade - Rahmenprofil für Stahl-/Edelstahlfassade

Dataset: ILCD process, EPD, template dataset
Geography: RER
Reference year: 2017
Valid until: 2023
Classification: OEKOBAU.DAT: Komponenten von Fenstern und Vorhangfassaden / Rahmen / Profile / Stahl
Synonyms: Fassadenprofil aus Stahl, rostfreiem Edelstahl oder wetterfestem Baustahl
Method details: Produktkategorieregeln Teil A; Produktkategorieregeln Teil B – für Fassaden und Dächer aus Glas und Kunststoff; EPD Fassaden aus Stahl, rostfreiem Edelstahl oder wetterfestem Baustahl
Owner: Verband Fenster + Fassade
Compliance: EN 15804
Review: Independent external review by Patrick Wortner
Amounts: rows without a unit in brackets have none in this file; such an amount is in the reference unit of its flow, which a separate flow dataset defines
copyright: true

## General comment
Dieser Datensatz beinhaltet die Ergebnisse für die Module A1-A3 gemäß EN 15804. Ein Vergleich mit anderen Produkten ist nur mit einer vergleichbaren Anwendung im Gebäude zulässig. Grundsätzlich ist eine Gegenüberstellung oder die Bewertung von EPD Daten nur möglich, wenn alle zu vergleichenden Datensätze nach EN 15804 erstellt wurden und der Gebäudekontext, bzw. die produktspezifischen Leistungsmerkmale berücksichtigt werden.

## Geography
Dieser Datensatz repräsentiert die Situation von Unternehmen, die Produkte entsprechend den Systemen von Forster Profilsysteme AG, Jansen AG, RP Technik GmbH, Ottostumm SA produzieren, im Hinblick auf die wichtigsten Technologien und die gesetzlichen Rahmenbedingungen.

## Time period
jährlicher Durchschnitt

## Technology and included processes
Die Ökobilanzergebnisse umfassen die Lebenszyklusstadien der Herstellung der Vorprodukte bis hin zur Rohstoffgewinnung und Verarbeitungsprozesse von als Input dienenden Sekundärstoffen (z.B. Recyclingprozesse), deren Transporte zum Werk sowie die Produktion selbst, einschließlich der Bereitstellung von allen Hilfs- und Betriebsstoffen, Energie, sowie die vollständige Abfallbehandlung oder die Deponierung der Restabfälle während des Stadiums der Produktion. Die Module A1, A2 und A3 sind hier als ein aggregiertes Modul A1-A3 ausgewiesen. Falls für diesen Datensatz weitere Module berechnet wurden, sind diese separat zu finden und können für eine Betrachtung des gesamten Lebenszyklus zusammengeführt werden.

## Technical purpose
Rahmenprofile für Stahl-/Edelstahlfassaden zur Anwendung in Büro- und Verwaltungsgebäuden sowie öffentlichen Gebäuden als auch im privaten Bereich.

## Reference product
- Rahmenprofile für Fassaden - Verband Fenster + Fassade - Rahmenprofil für Stahl-/Edelstahlfassade: 1

## Inputs
- Use of net fresh water (FW) [m3]: A1-A3 0.730945
- Use of non renewable primary energy (PENRE) [MJ]: A1-A3 1945.75
- Use of non renewable primary energy resources used as raw materials (PENRM) [MJ]: A1-A3 98.8668
- Use of non renewable secondary fuels (NRSF) [MJ]: A1-A3 6.63997e-8
- Use of renewable primary energy (PERE) [MJ]: A1-A3 387.993
- Use of renewable primary energy resources used as raw materials (PERM) [MJ]: A1-A3 0
- Use of renewable secondary fuels (RSF) [MJ]: A1-A3 5.65286e-9
- Use of secondary material (SM) [kg]: A1-A3 0
- Total use of non renewable primary energy resource (PENRT) [MJ]: A1-A3 2044.62
- Total use of renewable primary energy resources (PERT) [MJ]: A1-A3 387.993

## Outputs
- Components for re-use (CRU) [kg]: A1-A3 0
- Exported electrical energy (EEE) [MJ]: A1-A3 1.34623
- Exported thermal energy (EET) [MJ]: A1-A3 2.52541
- Hazardous waste disposed (HWD) [kg]: A1-A3 2.19589e-6
- Materials for energy recovery (MER) [kg]: A1-A3 0
- Materials for recycling (MFR) [kg]: A1-A3 0
- Non hazardous waste dispose (NHWD) [kg]: A1-A3 10.1085
- Radioactive waste disposed (RWD) [kg]: A1-A3 0.125686

## Impact indicators
- Abiotic depletion potential for non fossil resources (ADPE) [kg Sb eq.]: A1-A3 0.000739875
- Abiotic depletion potential for fossil resources (ADPF) [MJ]: A1-A3 1720.06
- Acidification potential of soil and water (AP) [kg SO2 eq.]: A1-A3 0.405426
- Eutrophication potential (EP) [kg (PO4)3- eq.]: A1-A3 0.0347199
- Global warming potential (GWP) [kg CO2 eq.]: A1-A3 135.397
- Depletion potential of the stratospheric ozone layer (ODP) [kg CFC 11 eq.]: A1-A3 3.24115e-9
- Formation potential of tropospheric ozone (POCP) [kg C2H2 eq.]: A1-A3 0.0336305

## Use advice
A1-A3. Das Umweltprofil beinhaltet die Aufwendungen für die Lebenszyklus-Stadien cradle to gate (Modul A1-A3).

Die Muster-EPD erlangt Gültigkeit durch die Übertragung an den Hersteller durch das ift. Aktuell gültige EPDs sind der nachfolgenden Liste zu entehmen und auf www.ift-service.de/epd veröffentlicht.
EPD-Nummer und Deklarationsinhaber:
Derzeit sind keine gültigen EPDs vorhanden.

## Review details
Die angewendete LCI Methode ist in Übereinstimmung mit ISO 14040 und 14044. Die Dokumentation enthält alle relevanten Informationen im Hinblick auf die Datenqualität und den Umfang der Anwendung der jeweiligen LCI Ergebnisse bzw. der Datensätze. Der Datensatz repräsentiert den Stand der Technik bezogen auf die funktionelle Einheit.

## Data sources
- GaBi database (general)
