# FASBA e.V. Baustroh; 100 kg/m³

Dataset: ILCD process, EPD, specific dataset
Geography: DE
Reference year: 2019
Valid until: 2024
Classification: OEKOBAU.DAT: Dämmstoffe / Stroh / Strohballen
Synonyms: Strohballen, Strohballendämmung, Strohdämmung
Method details: Bau EPD Produktkategorie-Regeln
Owner: FASBA e.V.
Compliance: EN 15804
Review: Independent external review by Verifizierungsteam F.Gschösser und A.Schindler
Amounts: rows without a unit in brackets have none in this file; such an amount is in the reference unit of its flow, which a separate flow dataset defines
copyright: true

## General comment
Der vorliegende Bericht wurde im Auftrag des Fachverbands Strohballenbau Deutschland e. V. (FASBA) durchgeführt. Die Herstellung der Strohballen erfolgt durch die Baustroh GmbH in Verden vorwiegend aus Weizen- und Roggenstroh ohne Verwendung von zusätzlichen Einsatzstoffen. Die Rohdichte der Produkte liegt zwischen 85 und 115 kg/m³. Die hier publizierten Produktdaten sind repräsentativ für alle Baustrohballen des Fachverbands Baustrohballen Deutschland e.V. Zielmarkt der Produkte ist Deutschland.
Als funktionale Einheit wurde 1 m³ Baustroh festgelegt.

## Geography
Durchschnittliche Transportdistanz vom Werk zu den Baustellen wurde mit 100 km innerhalb Deutschlands angenommen.

## Time period
Die EPD wurde am 10.10.2019 ausgestellt.
Die Strohsorten im Produkt, die Transportdistanz zur Baustelle und die Beladung des LKW wurden vom Fachverband für Strohballenbau übermittelt und beziehen sich auf das Jahr 2017. Der Energieverbrauch beim Pressen und Schnüren der Ballen stammt aus [Krick 2008]. Aktuelle Daten für das Pressen und Schnüren der Ballen sind nicht verfügbar. Es wird angenommen, dass in den letzten 10 Jahren keine relevante Änderung des Energiebedarfs bei diesen Arbeitsschritten stattgefunden hat.

## Technology and included processes
Herstellungsprozess: Die Herstellung der Strohballen inkludiert sämtliche landwirtschaftliche Prozesse von der Bodenbearbeitung und der Aussaat des Korns über die Kultivierung der Pflanzen bis hin zur Ernte des Getreides. Nach der Ernte wird das Stroh auf dem Acker ohne Verwendung von zusätzlichen Einsatzstoffen zu Ballen gepresst und mit Polypropylenschnüren verschnürt.Siehe auch beigefügtes Flussdiagramm.

Die Rohdichte der Produkte liegt zwischen 85 und 115 kg/m³. Baustroh ist in Ballenform in den Abmessungen H x B x L 200-700 mm x 300 bis 900 mm x 500 bis 3000 mm erhältlich. Die Ballen werden mit Polypropylen-Schnüren gebunden.
Wärmeleitfähigkeit λ 10,tr= 0,044 W/(mK)
Bemessungswert der Wärmeleitfähigkeit quer zur Halmrichtung λ=0,052 W/(mK)

## Technical purpose
Die Strohballen des FASBA e.V. werden als dämmende Ausfachung in einer Holzkonstruktion eingesetzt.

## Scenarios
- Verwertung (Verrottung): Szenario 1: 100% Verwertung (Verrottung)
- Thermische Verwertung: Szenario 2: 90% Thermische Verwertung, 10% Deponierung von Materialverlusten

## Reference product
- Strohballen: 1

## Inputs
- Erneuerbare Primärenergie als Energieträger (PERE) [MJ]: A1-A3 14.2, A4 1.98, A5 0.795, B1 0, B2 0, B3 0, B4 0, B5 0, B6 0, B7 0, C1 (Verwertung (Verrottung)) 0, C2 (Verwertung (Verrottung)) 0.298, C3 (Verwertung (Verrottung)) 0, C4 (Verwertung (Verrottung)) 0, D (Verwertung (Verrottung)) 0, C1 (Thermische Verwertung) 0, C2 (Thermische Verwertung) 2.98, C3 (Thermische Verwertung) 5.32, C4 (Thermische Verwertung) 0, D (Thermische Verwertung) -230
- Erneuerbare Primärenergie zur stofflichen Nutzung (PERM) [MJ]: A1-A3 1630, A4 0, A5 81.6, B1 0, B2 0, B3 0, B4 0, B5 0, B6 0, B7 0, C1 (Verwertung (Verrottung)) 0, C2 (Verwertung (Verrottung)) 0, C3 (Verwertung (Verrottung)) 0, C4 (Verwertung (Verrottung)) -1630, D (Verwertung (Verrottung)) 0, C1 (Thermische Verwertung) 0, C2 (Thermische Verwertung) 0, C3 (Thermische Verwertung) -1470, C4 (Thermische Verwertung) -163, D (Thermische Verwertung) 0
- Total erneuerbare Primärenergie (PERT) [MJ]: A1-A3 1650, A4 1.98, A5 82.3, B1 0, B2 0, B3 0, B4 0, B5 0, B6 0, B7 0, C1 (Verwertung (Verrottung)) 0, C2 (Verwertung (Verrottung)) 0.298, C3 (Verwertung (Verrottung)) 0, C4 (Verwertung (Verrottung)) -1630, D (Verwertung (Verrottung)) 0, C1 (Thermische Verwertung) 0, C2 (Thermische Verwertung) 2.98, C3 (Thermische Verwertung) -1460, C4 (Thermische Verwertung) -163, D (Thermische Verwertung) -230
- Nicht-erneuerbare Primärenergie als Energieträger (PENRE) [MJ]: A1-A3 59, A4 34.6, A5 8.2, B1 0, B2 0, B3 0, B4 0, B5 0, B6 0, B7 0, C1 (Verwertung (Verrottung)) 0, C2 (Verwertung (Verrottung)) 5.18, C3 (Verwertung (Verrottung)) 0, C4 (Verwertung (Verrottung)) 0, D (Verwertung (Verrottung)) 0, C1 (Thermische Verwertung) 0, C2 (Thermische Verwertung) 51.8, C3 (Thermische Verwertung) 31.2, C4 (Thermische Verwertung) 0, D (Thermische Verwertung) -769
- Nicht-erneuerbare Primärenergie zur stofflichen Nutzung (PENRM) [MJ]: A1-A3 3.79, A4 0, A5 -3.79, B1 0, B2 0, B3 0, B4 0, B5 0, B6 0, B7 0, C1 (Verwertung (Verrottung)) 0, C2 (Verwertung (Verrottung)) 0, C3 (Verwertung (Verrottung)) 0, C4 (Verwertung (Verrottung)) 0, D (Verwertung (Verrottung)) 0, C1 (Thermische Verwertung) 0, C2 (Thermische Verwertung) 0, C3 (Thermische Verwertung) 0, C4 (Thermische Verwertung) 0, D (Thermische Verwertung) 0
- Total nicht erneuerbare Primärenergie (PENRT) [MJ]: A1-A3 62.8, A4 34.6, A5 4.41, B1 0, B2 0, B3 0, B4 0, B5 0, B6 0, B7 0, C1 (Verwertung (Verrottung)) 0, C2 (Verwertung (Verrottung)) 5.18, C3 (Verwertung (Verrottung)) 0, C4 (Verwertung (Verrottung)) 0, D (Verwertung (Verrottung)) 0, C1 (Thermische Verwertung) 0, C2 (Thermische Verwertung) 51.8, C3 (Thermische Verwertung) 31.2, C4 (Thermische Verwertung) 0, D (Thermische Verwertung) -769
- Einsatz von Sekundärstoffen (SM) [kg]: A1-A3 0, A4 0, A5 0, B1 0, B2 0, B3 0, B4 0, B5 0, B6 0, B7 0, C1 (Verwertung (Verrottung)) 0, C2 (Verwertung (Verrottung)) 0, C3 (Verwertung (Verrottung)) 0, C4 (Verwertung (Verrottung)) 0, D (Verwertung (Verrottung)) 0, C1 (Thermische Verwertung) 0, C2 (Thermische Verwertung) 0, C3 (Thermische Verwertung) 0, C4 (Thermische Verwertung) 0, D (Thermische Verwertung) 0
- Erneuerbare Sekundärbrennstoffe (RSF) [MJ]: A1-A3 0, A4 0, A5 0, B1 0, B2 0, B3 0, B4 0, B5 0, B6 0, B7 0, C1 (Verwertung (Verrottung)) 0, C2 (Verwertung (Verrottung)) 0, C3 (Verwertung (Verrottung)) 0, C4 (Verwertung (Verrottung)) 0, D (Verwertung (Verrottung)) 0, C1 (Thermische Verwertung) 0, C2 (Thermische Verwertung) 0, C3 (Thermische Verwertung) 0, C4 (Thermische Verwertung) 0, D (Thermische Verwertung) 0
- Nicht erneuerbare Sekundärbrennstoffe (NRSF) [MJ]: A1-A3 0, A4 0, A5 0, B1 0, B2 0, B3 0, B4 0, B5 0, B6 0, B7 0, C1 (Verwertung (Verrottung)) 0, C2 (Verwertung (Verrottung)) 0, C3 (Verwertung (Verrottung)) 0, C4 (Verwertung (Verrottung)) 0, D (Verwertung (Verrottung)) 0, C1 (Thermische Verwertung) 0, C2 (Thermische Verwertung) 0, C3 (Thermische Verwertung) 0, C4 (Thermische Verwertung) 0, D (Thermische Verwertung) 0
- Einsatz von Süßwasserressourcen (FW) [m3]: A1-A3 829, A4 4.9, A5 42.2, B1 0, B2 0, B3 0, B4 0, B5 0, B6 0, B7 0, C1 (Verwertung (Verrottung)) 0, C2 (Verwertung (Verrottung)) 0.735, C3 (Verwertung (Verrottung)) 0, C4 (Verwertung (Verrottung)) 0, D (Verwertung (Verrottung)) 0, C1 (Thermische Verwertung) 0, C2 (Thermische Verwertung) 7.35, C3 (Thermische Verwertung) 357, C4 (Thermische Verwertung) 0, D (Thermische Verwertung) -185

## Outputs
- Gefährlicher Abfall zur Deponie (HWD) [kg]: A1-A3 7.44e-7, A4 2.59e-6, A5 1.94e-7, B1 0, B2 0, B3 0, B4 0, B5 0, B6 0, B7 0, C1 (Verwertung (Verrottung)) 0, C2 (Verwertung (Verrottung)) 3.88e-7, C3 (Verwertung (Verrottung)) 0, C4 (Verwertung (Verrottung)) 0, D (Verwertung (Verrottung)) 0, C1 (Thermische Verwertung) 0, C2 (Thermische Verwertung) 3.88e-6, C3 (Thermische Verwertung) 3.94e-8, C4 (Thermische Verwertung) 0, D (Thermische Verwertung) -1.04e-6
- Entsorgter nicht gefährlicher Abfall (NHWD) [kg]: A1-A3 0.000944, A4 0.00298, A5 0.000547, B1 0, B2 0, B3 0, B4 0, B5 0, B6 0, B7 0, C1 (Verwertung (Verrottung)) 0, C2 (Verwertung (Verrottung)) 0.000447, C3 (Verwertung (Verrottung)) 0, C4 (Verwertung (Verrottung)) 0, D (Verwertung (Verrottung)) 0, C1 (Thermische Verwertung) 0, C2 (Thermische Verwertung) 0.00447, C3 (Thermische Verwertung) 0.295, C4 (Thermische Verwertung) 0, D (Thermische Verwertung) -1.25
- Entsorgter radioaktiver Abfall (RWD) [kg]: A1-A3 2.31e-5, A4 7.4e-5, A5 4.68e-6, B1 0, B2 0, B3 0, B4 0, B5 0, B6 0, B7 0, C1 (Verwertung (Verrottung)) 0, C2 (Verwertung (Verrottung)) 1.11e-5, C3 (Verwertung (Verrottung)) 0, C4 (Verwertung (Verrottung)) 0, D (Verwertung (Verrottung)) 0, C1 (Thermische Verwertung) 0, C2 (Thermische Verwertung) 0.000111, C3 (Thermische Verwertung) 0.00128, C4 (Thermische Verwertung) 0, D (Thermische Verwertung) -0.0385
- Komponenten für die Wiederverwendung (CRU) [kg]: A1-A3 0, A4 0, A5 0, B1 0, B2 0, B3 0, B4 0, B5 0, B6 0, B7 0, C1 (Verwertung (Verrottung)) 0, C2 (Verwertung (Verrottung)) 0, C3 (Verwertung (Verrottung)) 0, C4 (Verwertung (Verrottung)) 0, D (Verwertung (Verrottung)) 0, C1 (Thermische Verwertung) 0, C2 (Thermische Verwertung) 0, C3 (Thermische Verwertung) 0, C4 (Thermische Verwertung) 0, D (Thermische Verwertung) 0
- Stoffe zum Recycling (MFR) [kg]: A1-A3 0, A4 0, A5 0, B1 0, B2 0, B3 0, B4 0, B5 0, B6 0, B7 0, C1 (Verwertung (Verrottung)) 0, C2 (Verwertung (Verrottung)) 0, C3 (Verwertung (Verrottung)) 0, C4 (Verwertung (Verrottung)) 0, D (Verwertung (Verrottung)) 0, C1 (Thermische Verwertung) 0, C2 (Thermische Verwertung) 0, C3 (Thermische Verwertung) 0, C4 (Thermische Verwertung) 0, D (Thermische Verwertung) 0
- Stoffe für die Energierückgewinnung (MER) [kg]: A1-A3 0, A4 0, A5 0, B1 0, B2 0, B3 0, B4 0, B5 0, B6 0, B7 0, C1 (Verwertung (Verrottung)) 0, C2 (Verwertung (Verrottung)) 0, C3 (Verwertung (Verrottung)) 0, C4 (Verwertung (Verrottung)) 0, D (Verwertung (Verrottung)) 0, C1 (Thermische Verwertung) 0, C2 (Thermische Verwertung) 0, C3 (Thermische Verwertung) 0, C4 (Thermische Verwertung) 0, D (Thermische Verwertung) 0
- Exportierte elektrische Energie (EEE) [MJ]: A1-A3 0, A4 0, A5 0.517, B1 0, B2 0, B3 0, B4 0, B5 0, B6 0, B7 0, C1 (Verwertung (Verrottung)) 0, C2 (Verwertung (Verrottung)) 0, C3 (Verwertung (Verrottung)) 0, C4 (Verwertung (Verrottung)) 0, D (Verwertung (Verrottung)) 0, C1 (Thermische Verwertung) 0, C2 (Thermische Verwertung) 0, C3 (Thermische Verwertung) 183, C4 (Thermische Verwertung) 0, D (Thermische Verwertung) 0
- Exportierte thermische Energie (EET) [MJ]: A1-A3 0, A4 0, A5 1.25, B1 0, B2 0, B3 0, B4 0, B5 0, B6 0, B7 0, C1 (Verwertung (Verrottung)) 0, C2 (Verwertung (Verrottung)) 0, C3 (Verwertung (Verrottung)) 0, C4 (Verwertung (Verrottung)) 0, D (Verwertung (Verrottung)) 0, C1 (Thermische Verwertung) 0, C2 (Thermische Verwertung) 0, C3 (Thermische Verwertung) 454, C4 (Thermische Verwertung) 0, D (Thermische Verwertung) 0

## Impact indicators
- Globales Erwärmungspotenzial (GWP) [kg CO2-Äqv.]: A1-A3 -127, A4 2.54, A5 0.702, B1 0, B2 0, B3 0, B4 0, B5 0, B6 0, B7 0, C1 (Verwertung (Verrottung)) 0, C2 (Verwertung (Verrottung)) 0.381, C3 (Verwertung (Verrottung)) 0, C4 (Verwertung (Verrottung)) 134, D (Verwertung (Verrottung)) 0, C1 (Thermische Verwertung) 0, C2 (Thermische Verwertung) 3.81, C3 (Thermische Verwertung) 123, C4 (Thermische Verwertung) 13.4, D (Thermische Verwertung) -63
- Abbau Potential der stratosphärischen Ozonschicht (ODP) [kg R11-Äqv.]: A1-A3 4.11e-7, A4 1.81e-11, A5 2.06e-8, B1 0, B2 0, B3 0, B4 0, B5 0, B6 0, B7 0, C1 (Verwertung (Verrottung)) 0, C2 (Verwertung (Verrottung)) 2.71e-12, C3 (Verwertung (Verrottung)) 0, C4 (Verwertung (Verrottung)) 0, D (Verwertung (Verrottung)) 0, C1 (Thermische Verwertung) 0, C2 (Thermische Verwertung) 2.71e-11, C3 (Thermische Verwertung) 6.35e-11, C4 (Thermische Verwertung) 0, D (Thermische Verwertung) -2.11e-9
- Versauerungspotenzial von Boden und Wasser (AP) [kg SO2-Äqv.]: A1-A3 0.0916, A4 0.0104, A5 0.00498, B1 0, B2 0, B3 0, B4 0, B5 0, B6 0, B7 0, C1 (Verwertung (Verrottung)) 0, C2 (Verwertung (Verrottung)) 0.00157, C3 (Verwertung (Verrottung)) 0, C4 (Verwertung (Verrottung)) 0, D (Verwertung (Verrottung)) 0, C1 (Thermische Verwertung) 0, C2 (Thermische Verwertung) 0.0157, C3 (Thermische Verwertung) 0.0138, C4 (Thermische Verwertung) 0, D (Thermische Verwertung) -0.116
- Eutrophierungspotenzial (EP) [kg Phosphat-Äqv.]: A1-A3 0.0787, A4 0.00255, A5 0.00403, B1 0, B2 0, B3 0, B4 0, B5 0, B6 0, B7 0, C1 (Verwertung (Verrottung)) 0, C2 (Verwertung (Verrottung)) 0.000383, C3 (Verwertung (Verrottung)) 0, C4 (Verwertung (Verrottung)) 0, D (Verwertung (Verrottung)) 0, C1 (Thermische Verwertung) 0, C2 (Thermische Verwertung) 0.00383, C3 (Thermische Verwertung) 0.00302, C4 (Thermische Verwertung) 0, D (Thermische Verwertung) -0.0153
- Bildungspotential für troposphärisches Ozon (POCP) [kg Ethen-Äqv.]: A1-A3 0.00307, A4 -0.00346, A5 3e-5, B1 0, B2 0, B3 0, B4 0, B5 0, B6 0, B7 0, C1 (Verwertung (Verrottung)) 0, C2 (Verwertung (Verrottung)) -0.00052, C3 (Verwertung (Verrottung)) 0, C4 (Verwertung (Verrottung)) 0, D (Verwertung (Verrottung)) 0, C1 (Thermische Verwertung) 0, C2 (Thermische Verwertung) -0.0052, C3 (Thermische Verwertung) 0.00132, C4 (Thermische Verwertung) 0, D (Thermische Verwertung) -0.00996
- Potenzial für den abiotischen Abbau nicht fossiler Ressourcen (ADPE) [kg Sb-Äqv.]: A1-A3 2.75e-5, A4 1.87e-7, A5 1.38e-6, B1 0, B2 0, B3 0, B4 0, B5 0, B6 0, B7 0, C1 (Verwertung (Verrottung)) 0, C2 (Verwertung (Verrottung)) 2.8e-8, C3 (Verwertung (Verrottung)) 0, C4 (Verwertung (Verrottung)) 0, D (Verwertung (Verrottung)) 0, C1 (Thermische Verwertung) 0, C2 (Thermische Verwertung) 2.8e-7, C3 (Thermische Verwertung) 1.67e-6, C4 (Thermische Verwertung) 0, D (Thermische Verwertung) -1.53e-5
- Potenzial für den abiotischen Abbau fossiler Brennstoffe (ADPF) [MJ]: A1-A3 59.1, A4 34.4, A5 4.21, B1 0, B2 0, B3 0, B4 0, B5 0, B6 0, B7 0, C1 (Verwertung (Verrottung)) 0, C2 (Verwertung (Verrottung)) 5.16, C3 (Verwertung (Verrottung)) 0, C4 (Verwertung (Verrottung)) 0, D (Verwertung (Verrottung)) 0, C1 (Thermische Verwertung) 0, C2 (Thermische Verwertung) 51.6, C3 (Thermische Verwertung) 28, C4 (Thermische Verwertung) 0, D (Thermische Verwertung) -672

## Use advice
Anmerkung zur Vergleichbarkeit: Ein Vergleich mit anderen Produkten ist nur mit einer vergleichbaren Anwendung im Gebäude sinnvoll. Grundsätzlich ist eine Gegenüberstellung oder die Bewertung von EPD Daten nur möglich, wenn alle zu vergleichenden Datensätze nach EN 15804 erstellt wurden und die produktspezifischen Leistungsmerkmale berücksichtigt werden.

## Data sources
- GaBi database (all versions)
- GaBi database SP30 2016
