# binderholz Brettsperrholz BBS

Dataset: ILCD process, EPD, average dataset
Geography: DE
Reference year: 2019
Valid until: 2024
Classification: OEKOBAU.DAT: Holz / Vollholz / Brettschichtholzplatte
Classification: IBUCategories: 02 Bauprodukte / Produkte aus Bauholz / Vollholzprodukte
Method details: Vollholzprodukte.pdf
Registration number: EPD-BBS-20190021-IBB1-DE
Owner: Thünen-Institut für Holzforschung
Compliance: DIN EN 15804; ISO 14025
Review: Accredited third party review by Institut Bauen und Umwelt e. V.
Amounts: rows without a unit in brackets have none in this file; such an amount is in the reference unit of its flow, which a separate flow dataset defines
copyright: true

## General comment
binderholz Brettsperrholz BBS ist ein massives, plattenförmiges Holzbauelement, welches aus zueinander rechtwinklig verklebten Nadelholzlagen besteht. Hergestellt wird das binderholz Brettsperrholz BBS nach der /ETA-06/0009/ oder nach dem /PRG-320/ bzw. dem /ESR-4081/ gemäß den jeweiligen projektspezifischen Anforderungen.

Die kreuzweise Orientierung der einzelnen Lamellen und der i.d.R. symmetrische Aufbau des binderholz Brettsperrholz BBS birgt den Vorteil einer äußerst hohen Formstabilität, sowie einer potentiellen Lastabtragung sowohl längs, als auch quer zur Haupttragrichtung.

binderholz Brettsperrholz BBS definiert sich im Querschnittaufbau durch eine minimale Lagenanzahl von mindestens drei Lagen, wobei sich die maximale Lagenanzahl auf neun Lagen beschränkt.

binderholz Brettsperrholz BBS steht in 2 unterschiedlichen Formaten zur Verfügung:

- Systemformat BBS 125: Systembreite 125 cm

- Großformat BBS XL: max. Breite 350 cm

Aufgrund der vorhandenen, in die Produktionswerke integrierten Abbundmöglichkeiten kann ein enormer Vorfertigungsgrad und somit eine äußerst geringe Bauzeit erreicht werden.

## Technology and included processes
binderholz Brettsperrholz BBS sind flächige Holzbauteile aus mindestens drei kreuzweise verklebten Brettlagen aus Nadelholz. Benachbarte Lagen sind unter einem Winkel von 90° miteinander verklebt. Der Querschnitt der Bauteile ist symmetrisch. Die Bauteile sind eben. Bis zu zwei benachbarte Lagen können faserparallel verklebt sein, solange ein symmetrischer, kreuzweise gesperrter Aufbau erhalten bleibt. Nichttragende äußere Lagen sind zulässig. Einzelne Lagen (maximal 50% des Querschnitts) dürfen durch ein- und mehrschichtige Massivholzplatten nach EN 13986 in tragender Qualität ersetzt werden. Die Holzbauteile werden mit einer Breite von bis zu 3,5 m und einer Länge von bis zu 22 m als Großformat oder mit einer Breite von bis zu 1,25 m und einer Länge von bis zu 5 m als Systemformat hergestellt. Bauteile im Systemformat mit einer Breite von bis zu 1,25 m können werksmäßig in Längsrichtung durch Universal-KeiIzinkenverbindungen gemäß EN 14080 bis zu einer Länge von 20 m verbunden sein. Die Holzbauteile werden durch einen automatisierten Herstellungsprozess, entsprechend der hinterlegten und durch Inspektion überprüften technischen Dokumentation, gefertigt. Das Dickenspektrum der gehobelten Einzellamellen liegt im Bereich von 18 mm bis 45 mm, bei einer Breite von 80 mm bis 250 mm. Die einzelnen Lagen sind bis zur geforderten Bauteildicke verklebt. Die Bretter werden visuell oder maschinell sortiert. Nur technisch getrocknetes Holz wird eingesetzt (Holzfeuchte = 12 % +/- 2 %). Nur beidseitig auf den Deckflächen gehobelte Bretter werden verwendet. Die Bretter der einzelnen Lagen dürfen durch Keilzinkenverbindungen nach EN 14080 in Längsrichtung verbunden werden. Stumpfstöße sind nicht möglich. Die einzelnen Bretter der in Bauteillängsachse verlaufenden Brettlagen können an ihren Schmalseiten verklebt sein. Materialeigenschaften, Abmessungen und Toleranzen des Brettsperrholzes, sind in der technischen Dokumentation der Europäischen Technischen Bewertung (ETA-06/0009) enthalten. Spezifizierung des Verwendungszwecks gemäß dem anwendbaren Europäischen Bewertungsdokument. Die Elemente sind für eine Verwendung als tragende und/oder aussteifende oder als nicht tragende Wand-‚ Decken-, Boden-, Dach- oder Sonderbauteile für Holzbauwerke vorgesehen. Dabei dürfen sie zur Aufnahme und Weiterleitung von Lasten sowohl rechtwinklig zur Elementebene als auch in Elementebene beansprucht werden. Die Anwendung darf nur in Bauwerken unter statischen bzw. quasi-statischen Einwirkungen erfolgen. Die Elemente sind für eine Verwendung in den Nutzungsklassen 1 und 2 gemäß EN 1995-1-1 vorgesehen. Die Elemente sind während Einbau und Nutzung mit einem ausreichenden Wetterschutz zu versehen. Ein kunden- bzw. objektspezifischer Abbund ist möglich.
Technische Daten:
binderholz Brettsperrholz BBS wird mit einer Holzfeuchte von 12 % +/- 2 % hergestellt.

Es gelten die Daten der Leistungserklärung.

Je nach Querschnittaufbau (Lagenanzahl, Lagendicke) und der Laststellung des binderholz Brettsperrholz BBS variieren die bauphysikalischen Eigenschaften, wie Bauteilwiderstand oder Feuerwiderstand. Daher müssen diese nach den geltenden Bemessungsregeln bauwerksbezogen ermittelt werden.

Gemäß /EN 1995-1-1/ kann binderholz Brettsperrholz BBS in den Nutzungsklassen 1 oder 2 mit vorwiegend ruhenden Verkehrslasten verwendet werden.

Ein vorbeugender, chemischer Holzschutz nach /DIN 68800-3/ ist auf Anfrage möglich. Hierbei kann das binderholz Brettsperrholz BBS zum Schutz vor Pilz- und Insektenbefall mit einer Imprägnierung der Klasse 2 nach /DIN 68800-3/ behandelt werden.

Generell ist ein konstruktiver Holzschutz nach /DIN 68800-2/ vorzuziehen.
Deklarierte Einheit:
Die deklarierte Einheit der ökologischen Betrachtung ist 1 m³ Brettsperrholz BBS unter Berücksichtigung des Mixes der verwendeten Klebstoffe nach Kapitel 2.5 und einer Masse von 470,88 kg/m³ bei einer Holzfeuchte von 12,1 %, was einem Wasseranteil von 10,7 % entspricht. Der Anteil der Klebstoffe liegt bei 1,015 %. Alle Angaben zu eingesetzten Klebstoffen wurden auf Grundlage spezifischer Daten berechnet.

## Technical purpose
binderholz Brettsperrholz BBS wird in allen konstruktiven Bereichen des modernen Holzbaus eingesetzt, vom traditionellen Einfamilienhausbau bis zum ingenieursmäßigen Hoch- und Brückenbau.

Für die Verwendung von binderholz Brettsperrholz BBS gelten die jeweiligen nationalen Vorschriften.

## Reference product
- Brettsperrholz BBS: 1

## Inputs
- Erneuerbare Primärenergie als Energieträger (PERE) [MJ]: A1 1893.6, A2 5.75786, A3 988.561, A5 0.282886, C2 0.417022, C3 27.0522, D -1417.52
- Erneuerbare Primärenergie zur stofflichen Nutzung (PERM) [MJ]: A1 8011.22, A2 0, A3 0, A5 0, C2 0, C3 -8011.22, D 0
- Total erneuerbare Primärenergie (PERT) [MJ]: A1 9904.82, A2 5.75786, A3 988.561, A5 0.282886, C2 0.417022, C3 -7984.17, D -1417.52
- Nicht-erneuerbare Primärenergie als Energieträger (PENRE) [MJ]: A1 1147.15, A2 104.393, A3 299.021, A5 60.6552, C2 7.56079, C3 57.7777, D -6077.01
- Nicht-erneuerbare Primärenergie zur stofflichen Nutzung (PENRM) [MJ]: A1 47.7902, A2 0, A3 59.04, A5 -59.04, C2 0, C3 -47.7902, D 0
- Total nicht erneuerbare Primärenergie (PENRT) [MJ]: A1 1194.94, A2 104.393, A3 358.061, A5 1.6152, C2 7.56079, C3 9.98748, D -6077.01
- Einsatz von Sekundärstoffen (SM) [kg]: A1 0, A2 0, A3 0, A5 0, C2 0, C3 0, D 0
- Erneuerbare Sekundärbrennstoffe (RSF) [MJ]: A1 0, A2 0, A3 0, A5 0, C2 0, C3 0, D 8011.22
- Nicht erneuerbare Sekundärbrennstoffe (NRSF) [MJ]: A1 0, A2 0, A3 0, A5 0, C2 0, C3 0, D 47.7902
- Einsatz von Süßwasserressourcen (FW) [m^3]: A1 0.953113, A2 0.0106106, A3 0.342989, A5 0.0101163, C2 0.000768487, C3 0.0171783, D 0.921125

## Outputs
- Gefährlicher Abfall zur Deponie (HWD) [kg]: A1 0.0468304, A2 6.03608e-6, A3 0.000147693, A5 8.92495e-9, C2 4.37172e-7, C3 4.40648e-8, D -3.4701e-6
- Entsorgter nicht gefährlicher Abfall (NHWD) [kg]: A1 0.690067, A2 0.00874496, A3 0.374031, A5 0.380443, C2 0.000633367, C3 0.0593649, D -0.894444
- Entsorgter radioaktiver Abfall (RWD) [kg]: A1 0.0445169, A2 0.00014287, A3 0.0139126, A5 7.81294e-5, C2 1.03476e-5, C3 0.00571594, D -0.300909
- Komponenten für die Wiederverwendung (CRU) [kg]: A1 0, A2 0, A3 0, A5 0, C2 0, C3 0, D 0
- Stoffe zum Recycling (MFR) [kg]: A1 0, A2 0, A3 0, A5 0, C2 0, C3 0, D 0
- Stoffe für die Energierückgewinnung (MER) [kg]: A1 0, A2 0, A3 0, A5 0, C2 0, C3 470.877, D 0
- Exportierte elektrische Energie (EEE) [MJ]: A1 0, A2 0, A3 0, A5 9.05015, C2 0, C3 0, D 0
- Exportierte thermische Energie (EET) [MJ]: A1 0, A2 0, A3 0, A5 16.3148, C2 0, C3 0, D 0

## Impact indicators
- Globales Erwärmungspotenzial (GWP) [kg CO_(2)-Äq.]: A1 -683.432, A2 7.56441, A3 18.3894, A5 4.07777, C2 0.547864, C3 766.059, D -411.861
- Abbau Potential der stratosphärischen Ozonschicht (ODP) [kg CFC11-Äq.]: A1 3.56903e-7, A2 2.08855e-13, A3 8.37915e-9, A5 1.02313e-13, C2 1.51266e-14, C3 6.57922e-12, D -3.45886e-10
- Versauerungspotenzial von Boden und Wasser (AP) [kg SO_(2)-Äq.]: A1 0.284888, A2 0.0319244, A3 0.098845, A5 0.000974228, C2 0.00231217, C3 0.00680786, D -0.389094
- Eutrophierungspotenzial (EP) [kg PO_(4)^(3)-Äq.]: A1 0.065418, A2 0.0081876, A3 0.0207298, A5 7.94462e-5, C2 0.000592999, C3 0.0011088, D -0.0603592
- Bildungspotential für troposphärisches Ozon (POCP) [kg Ethen-Äq.]: A1 0.0681584, A2 -0.0132867, A3 0.0125868, A5 3.37662e-5, C2 -0.00096231, C3 0.000451891, D -0.0341036
- Potenzial für den abiotischen Abbau nicht fossiler Ressourcen (ADPE) [kg Sb-Äq.]: A1 8.01223e-5, A2 6.2761e-7, A3 2.4736e-5, A5 2.89074e-7, C2 4.54556e-8, C3 3.04835e-6, D -0.000162521
- Potenzial für den abiotischen Abbau fossiler Brennstoffe (ADPF) [MJ]: A1 1076.84, A2 104.026, A3 263.744, A5 1.41804, C2 7.53423, C3 43.3416, D -5353.69

## Use advice
Gültigkeitsbereich:
Die Datengrundlage für die Erstellung der Ökobilanz bilden die Brettsperrholz-Produktionsdaten des Brettsperrholzwerks der Binderholz Unternberg GmbH im Lungau (AT), sowie des Brettsperrholzwerks der Binderholz Burgbernheim GmbH mit Sitz im mittelfränkischen Burgbernheim (D). In Summe repräsentieren diese Werke 100 % der binderholz Brettsperrholz BBS Gesamtproduktion.

Die vorliegende Umweltproduktdeklaration ist für binderholz Brettsperrholz BBS gültig.
Systemgrenze:
Der Deklarationstyp entspricht einer EPD „Wiege bis Werkstor - mit Optionen“. Inhalte sind das Stadium der Produktion, also von der Bereitstellung der Rohstoffe bis zum Werkstor der Produktion (cradle-to-gate, Module A1 bis A3), sowie das Modul A5 und Teile des Endes des Lebensweges (Modul C2 und C3). Darüber hinaus erfolgt eine Betrachtung der potenziellen Nutzen und Lasten über den Lebensweg des Produktes hinaus (Modul D).

Im Einzelnen werden in Modul A1 die Bereitstellung des Holzes aus dem Forst sowie die Bereitstellung der Klebstoffe bilanziert. Die Transporte dieser Stoffe werden in Modul A2 berücksichtigt. Modul A3 umfasst die Bereitstellung der Brennstoffe, Betriebsmittel und des Stroms sowie die Herstellungsprozesse vor Ort. Diese sind im Wesentlichen der Zuschnitt, die Verklebung, Hobel- und Profilierprozesse sowie die Verpackung der Produkte. In Modul A5 wird ausschließlich die Entsorgung der Produktverpackung abgedeckt, welche den Ausgang des enthaltenen biogenen Kohlenstoffes sowie der enthaltenen Primärenergie (PERM und PENRM) einschließt.

Modul C2 berücksichtigt den Transport zum Entsorger und Modul C3 die Aufbereitung und Sortierung des Altholzes. Zudem werden in Modul C3 gemäß /EN 16485/ die CO2-Äquivalente des im Produkt befindlichen holzinhärenten Kohlenstoffs sowie die im Produkt enthaltene erneuerbare und nicht erneuerbare Primärenergie (PERM und PENRM) als Abgänge verbucht.

Modul D bilanziert die thermische Verwertung des Produktes am Ende seines Lebenswegs sowie die daraus resultierenden potenziellen Nutzen und Lasten in Form einer Systemerweiterung.

## Data sources
- binderholz Brettsperrholz BBS.pdf
- GaBi Database (all versions)
- GaBi database SP39 2019
