# CALOSTAT®

Dataset: ILCD process, EPD, specific dataset
Geography: RER
Reference year: 2018
Valid until: 2023
Classification: OEKOBAU.DAT: Dämmstoffe / Siliziumdioxid-basiert / Hydrophobe Platten
Classification: IBUCategories: 02 Bauprodukte / Wärmedämmungsprodukte / Mineralische Dämmstoffe
Method details: Mineralische Dämmstoffe.pdf
Registration number: 9502
Owner: Evonik Resource Efficiency GmbH
Compliance: DIN EN 15804; ISO 14025
Review: Accredited third party review by Institut Bauen und Umwelt e. V.
Amounts: rows without a unit in brackets have none in this file; such an amount is in the reference unit of its flow, which a separate flow dataset defines
copyright: true

## General comment
CALOSTAT® is a high-performance insulating material based on synthetically amorphous silicon dioxide. From a chemical standpoint, this corresponds to quartz in a non-crystalline structure.

The present EPD describes a mineral insulation board for construction applications, such as facade elements, pre-cast concrete parts, core insulation, pre-wall shells and construction elements such as doors and windows, as well as for the optimization of technical building equipment.

CALOSTAT® boards are self-supporting lightweight construction elements, the essential characteristic features of which are a low heat conductivity (0.02 W / (m*K)) in a wide temperature range, flame-resistance and chemical stability. CALOSTAT® is a non-flammable material which is assigned to building material class A in accordance with DIN 4102. By definition, CALOSTAT® is a super insulation material as it provides better insulation than still air.

The insulating material described here is produced by pressing boards under a high level of pressure. The material is gray and has a raw density of 165 kg/m³.

## Technology and included processes
CALOSTAT® is manufactured in accordance with DIN ISO 9001. The quality assurance is ensured by way of internal and external product and production inspections in accordance with the building supervisory authority regulations. The product quality is documented by way of conformity labeling for construction products and the resulting monitoring inspections, as well as test certificates.
Technical data:
The construction data refers to the product CALOSTAT® in accordance with ETA-16/0587.
Declared unit:
All details relate to a cubic meter of CALOSTAT® with a raw density of 165 kg/m3.

## Technical purpose
CALOSTAT® is recommended for different areas of use inside and outside around the building envelope in accordance with DIN 4108-10, for example: Interior insulation of ceilings, roofs, floor panels under floor screed and walls (DI, DEO dg, WI); exterior insulation of roof or ceiling under cover or waterproofing and wall behind covering (DAD, DAA, WAB) as well as core insulation for two-shell masonry for exterior walls. This makes CALOSTAT® a suitable insulating material for use in all building types out of living, industrial, office and administration buildings.

Facade

CALOSTAT® makes it possible to have a particularly narrow facade structure. In this way, facades can be newly built or renovated while complying with the property border, the distance area to neighboring buildings or even while maintaining the available supporting structures. Relevant facade types here are e.g. post-rail facades, hung element facades or concrete sandwich elements. In the case of a new build, the effective insulation with CALOSTAT® and the resulting narrow facade cross section prove themselves, particularly with dense inner-city building development.

With a measurement value for heat conductivity of just 0.02 W/(m*K) – in accordance with ETA-16/0587 – the wall structure can be reduced by up to 50% compared to the use of conventional mineral insulating materials. This in turn increases the design options for planners and architects.

Further advantages are that lower wall structures in facade construction mean less structural load and that fewer materials are required, and in prefabricated construction that the transport capacities are increased thanks to the thinner wall structures.

Solid construction

In new buildings, CALOSTAT® is suitable for core insulation in insulating bricks, but also in facing bricks and two-shell masonry or as core insulation in concrete and lightweight prefabricated concrete parts. In restoration work, solid construction houses can be insulated systematically without losing their character.

Interior insulation

As a thermal upgrade of interior insulation, for example in building renovations, it is possible to use CALOSTAT® with mineral building materials e.g. made from calcium silicate, bricks or porous concrete. CALOSTAT® is then applied to the wall in the form of a breathable mineral composite material. This creates a very narrow capillary-active interior insulation which was not previously possible in this form.

Ceiling and floor insulation

As insulation for ceilings and floors, CALOSTAT® makes it possible to retain or create a barrier-free building structure, particularly when performing renovation work in existing buildings. In the case of cavity flooring, CALOSTAT® fulfills the high fire protection requirements.

## Reference product
- CALOSTAT® (1 m³): 1

## Inputs
- Renewable primary energy as energy carrier (PERE) [MJ]: A1-A3 9.88, A5 0, C2 0, C3 0, C4 0, D -9.88
- Renewable primary energy resources as material utilization (PERM) [MJ]: A1-A3 0, A5 0, C2 0, C3 0, C4 0, D 0
- Total use of renewable primary energy resources (PERT) [MJ]: A1-A3 9.88, A5 0, C2 0, C3 0, C4 0, D -9.88
- Non renewable primary energy as energy carrier (PENRE) [MJ]: A1-A3 235, A5 -0.0495, C2 1.54, C3 0.0884, C4 0.947, D -152
- Non renewable primary energy as material utilization (PENRM) [MJ]: A1-A3 0, A5 0, C2 0, C3 0, C4 0, D 0
- Total use of non renewable primary energy resources (PENRT) [MJ]: A1-A3 235, A5 -0.0495, C2 1.54, C3 0.0884, C4 0.947, D -152
- Use of secondary material (SM) [kg]: A1-A3 0, A5 0, C2 0, C3 0, C4 0, D 159
- Use of renewable secondary fuels (RSF) [MJ]: A1-A3 0, A5 0, C2 0, C3 0, C4 0, D 0
- Use of non renewable secondary fuels (NRSF) [MJ]: A1-A3 0, A5 0, C2 0, C3 0, C4 0, D 0
- Use of net fresh water (FW) [m^3]: A1-A3 215, A5 0.000762, C2 0.00506, C3 0.000633, C4 0.00673, D -132

## Outputs
- Hazardous waste disposed (HWD) [kg]: A1-A3 8.87e-6, A5 0, C2 4.15e-6, C3 1.62e-9, C4 6.06e-7, D -2.05e-6
- Non hazardous waste disposed (NHWD) [kg]: A1-A3 6.1, A5 -0.000221, C2 0.00483, C3 0.00219, C4 165, D -1.69
- Radioactive waste disposed (RWD) [kg]: A1-A3 1.01, A5 -0.000133, C2 7.82e-5, C3 0.00021, C4 0.00051, D -0.121
- Components for re-use (CRU) [kg]: A1-A3 0, A5 0, C2 0, C3 0, C4 0, D 0
- Materials for recycling (MFR) [kg]: A1-A3 0, A5 0, C2 0, C3 159, C4 0, D 0
- Materials for energy recovery (MER) [kg]: A1-A3 0, A5 0, C2 0, C3 0, C4 0, D 0
- Exported electrical energy (EEE) [MJ]: A1-A3 0, A5 0, C2 0, C3 0, C4 0, D 0
- Exported thermal energy (EET) [MJ]: A1-A3 0, A5 0, C2 0, C3 0, C4 0, D 0

## Impact indicators
- Global warming potential (GWP) [kg CO_(2)-Äq.]: A1-A3 624, A5 0.161, C2 4.8, C3 0.165, C4 2.672, D -407
- Depletion potential of the stratospheric ozone layer (ODP) [kg CFC11-Äq.]: A1-A3 1.35e-5, A5 -1.07e-8, C2 1.01e-13, C3 2.42e-13, C4 5.95e-13, D -2.81e-6
- Acidification potential of land and water (AP) [kg SO_(2)-Äq.]: A1-A3 1.43, A5 -0.000661, C2 0.019, C3 0.000251, C4 0.0156, D -2.81e-6
- Eutrophication potential (EP) [kg PO_(4)^(3)-Äq.]: A1-A3 0.454, A5 -1.67e-5, C2 0.00482, C3 4.08e-5, C4 0.00215, D -0.38
- Formation potential of tropospheric ozone photochemical oxidants (POCP) [kg Ethen-Äq.]: A1-A3 0.138, A5 -3.48e-5, C2 -0.00721, C3 1.66e-5, C4 0.00121, D -0.117
- Abiotic depletion potential for non fossil resources (ADPE) [kg Sb-Äq.]: A1-A3 0.00121, A5 -8.23e-8, C2 5.04e-7, C3 1.12e-7, C4 9.89e-7, D -0.00104
- Abiotic depletion potential for fossil resources (ADPF) [MJ]: A1-A3 8050, A5 -1.16, C2 64.6, C3 1.6, C4 33.9, D -4720

## Use advice
Scope:
This environmental declaration covers CALOSTAT®, which may be used as highly efficient heat insulation and is manufactured by Evonik Resource Efficiency GmbH. As CALOSTAT® insulation boards are sold in various measurements and strengths, this environmental declaration is based on volume (for the provided density).This document is translated from the German Environmental Product Declaration into English. It is based on the German original version EPD-EVO-20170122-IBA1-DE. The verifier has no influence on the quality of the translation.
System boundary:
This EPD type is “From the cradle to the factory gate - with options”. Here, the environmental assessment takes into account the following life-cycle phases:

Manufacture and preparation of the preliminary products (module A1),
Transportation of the preliminary products to the factory (module A2),
Production of CALOSTAT® including the preparation of a waste material for secondary raw material within production, manufacture of the packaging, preparing the energy and production processes (module A3),
Burning the packaging (module A5),
Transportation to the recycling process or to landfill (module C2),
Exhaust air and waste treatment (module C3),
Removal of the used insulation boards (module C4),
End of life phase (recycling) of used insulation boards (module D).

The raw materials are examined to their elementary flows. The complete production process is examined.

## Data sources
- CALOSTAT®.pdf
- GaBi Database (all versions)
- GaBi database SP34 2017
