# Hochdichte Faserplatte (Durchschnitt DE)

Dataset: ILCD process, EPD, representative dataset
Geography: DE
Reference year: 2020
Valid until: 2025
Classification: OEKOBAU.DAT: Holz / Holzwerkstoffe / Holzfaserplatten
Method details: EN 15804; ILCD format
Owner: Thünen-Institut für Holzforschung
Compliance: EN 15804
Review: Independent external review by Dr. Frank Werner - Umwelt & Entwicklung
Amounts: rows without a unit in brackets have none in this file; such an amount is in the reference unit of its flow, which a separate flow dataset defines
copyright: true

## General comment
Weitere Informationen zur deklarierten Einheit (Zusammensetzung) und die auf Herstellerangaben beruhende Sachbilanz (In- und Output der Stoff- und Energieströme) stehen als Excel-Datei unter dem Unterpunkt Hintergrund-Bericht zum Download bereit.
Der Datensatz wurde 2020 als Aktualisierung mit gleichbleibendem Vordergrundsystem erstellt. Alle Hintergrunddaten entstammen der GaBi Professional Datenbank 2020 im Service Pack 40. Die Modellierung und Berechnung der Ökobilanz basiert auf den europäischen Normen EN 15804:2012+A1:2013 und EN 16485:2014. Bei Rückfragen wenden Sie sich bitte an holzundklima@thuenen.de.

## Geography
Die Produktion der an der Ökobilanzstudie beteiligten Projektpartner lag bei 360.000 m³/a, was einer deutschlandweiten Abdeckung von 23% entspricht.

## Time period
Der Datensatz basiert auf Produktionsdaten aus den Jahren 2009 bis 2011 (Vordergrundsystem).
Eine Aktualisierung des Hintergrundsystems erfolgte 2020.

## Technology and included processes
Hochdichte Faserplatten (HDF) sind im Trockenverfahren hergestellte Holzwerkstoffe auf Basis von Holzfasern. Neben Holzfasern besteht HDF aus duroplastischen Bindemitteln und weiteren Zusätzen. Die Herstellung von HDF verläuft analog zur Herstellung von MDF, jedoch werden höhere Dichten erreicht. Zur Herstellung von HDF werden Industrieholz und Hackschnitzel als Holzrohstoffe angeliefert. Das Rundholz wird entrindet, zerhackt und zusammen mit den Hackschnitzeln gekocht. Die gekochten Hackschnitzel werden in einem Refiner unter hohem Druck zerfasert und anschließend direkt beleimt. Die beleimten Fasern werden getrocknet und zur Verpressung in entsprechenden Dicken gestreut. Die verpressten Platten bzw. der verpresste Plattenstrang wird aufgetrennt und formatiert. Nachdem der Klebstoff vollständig ausgehärtet ist, werden die Platten verpackt.
Die Holzfeuchte des Produktes liegt bei 9%

## Technical purpose
Hochdichte Faserplatten finden im Innen- und Dachausbau Anwendung. Bevorzugt werden sie als Trägermaterial für hohe Belastung bei geringer Materialstärke (z. B. Laminatfußböden) eingesetzt.

## Scenarios
- energetisch: therm. Verwertung
- stofflich: stoffl. Verwertung

## Reference product
- HDF (849,9 kg/m³): 1

## Inputs
- Use of renewable primary energy (PERE) [MJ]: A1 189.995, A2 30.2212, A3 3483.99, A1-A3 3704.21, A5 0.406078, C2 0.64914, C3 30.8332, D (energetisch) 6731.72, D (stofflich) -50.2078
- Use of renewable primary energy resources used as raw materials (PERM) [MJ]: A1 12898.7, A2 0, A3 62.9527, A1-A3 12961.6, A5 -62.9527, C2 0, C3 -12898.7, D (energetisch) 0, D (stofflich) 0
- Total use of renewable primary energy resources (PERT) [MJ]: A1 13088.7, A2 30.2212, A3 3546.95, A1-A3 16665.8, A5 -62.5466, C2 0.64914, C3 -12867.8, D (energetisch) 6731.72, D (stofflich) -50.2078
- Use of non renewable primary energy (PENRE) [MJ]: A1 2376.77, A2 385.748, A3 2766.17, A1-A3 5528.69, A5 2.1361, C2 11.5597, C3 53.6094, D (energetisch) -6048.21, D (stofflich) -251.718
- Use of non renewable primary energy resources used as raw materials (PENRM) [MJ]: A1 1189.27, A2 0, A3 7.092, A1-A3 1196.36, A5 -7.092, C2 0, C3 -1189.27, D (energetisch) 0, D (stofflich) 0
- Total use of non renewable primary energy resource (PENRT) [MJ]: A1 3566.04, A2 385.748, A3 2773.26, A1-A3 6725.05, A5 -4.9559, C2 11.5597, C3 -1135.66, D (energetisch) -6048.21, D (stofflich) -251.718
- Use of secondary material (SM) [kg]: A1 0, A2 0, A3 0, A1-A3 0, A5 0, C2 0, C3 0, D (energetisch) 0, D (stofflich) 849.964
- Use of renewable secondary fuels (RSF) [MJ]: A1 0, A2 0, A3 3943.21, A1-A3 3943.21, A5 0, C2 0, C3 0, D (energetisch) 0, D (stofflich) 0
- Use of non renewable secondary fuels (NRSF) [MJ]: A1 0, A2 0, A3 0, A1-A3 0, A5 0, C2 0, C3 0, D (energetisch) 0, D (stofflich) 0
- Use of net fresh water (FW) [m3]: A1 0.688659, A2 0.0349776, A3 1.23502, A1-A3 1.95865, A5 0.021734, C2 0.00075166, C3 0.0166923, D (energetisch) 1.16655, D (stofflich) -0.0304874

## Outputs
- Hazardous waste disposed (HWD) [kg]: A1 4.07023e-5, A2 1.69314e-5, A3 1.34414e-5, A1-A3 7.1075e-5, A5 5.81975e-9, C2 5.3795e-7, C3 3.60527e-8, D (energetisch) -2.51859e-6, D (stofflich) -8.48823e-6
- Non hazardous waste dispose (NHWD) [kg]: A1 0.835783, A2 0.0713399, A3 6.49474, A1-A3 7.40186, A5 0.11378, C2 0.00176907, C3 0.0412596, D (energetisch) 29.604, D (stofflich) -0.0624958
- Radioactive waste disposed (RWD) [kg]: A1 0.0291067, A2 0.00380611, A3 0.183426, A1-A3 0.216339, A5 0.000112181, C2 1.43078e-5, C3 0.00448112, D (energetisch) -0.323123, D (stofflich) -0.00616588
- Components for re-use (CRU) [kg]: A1 0, A2 0, A3 0, A1-A3 0, A5 0, C2 0, C3 0, D (energetisch) 0, D (stofflich) 0
- Materials for recycling (MFR) [kg]: A1 0, A2 0, A3 0, A1-A3 0, A5 0, C2 0, C3 849.964, D (energetisch) 0, D (stofflich) 0
- Materials for energy recovery (MER) [kg]: A1 0, A2 0, A3 0, A1-A3 0, A5 0, C2 0, C3 849.964, D (energetisch) 0, D (stofflich) 0
- Exported electrical energy (EEE) [MJ]: A1 0, A2 0, A3 0.0239921, A1-A3 0.0239921, A5 13.0403, C2 0, C3 0, D (energetisch) 0, D (stofflich) 0
- Exported thermal energy (EET) [MJ]: A1 0, A2 0, A3 0.0557366, A1-A3 0.0557366, A5 23.9631, C2 0, C3 0, D (energetisch) 0, D (stofflich) 0

## Impact indicators
- Global warming potential (GWP) [kg CO2-Äqv.]: A1 -1082.83, A2 28.0004, A3 194.913, A1-A3 -859.914, A5 6.61089, C2 0.834797, C3 1230.49, D (energetisch) -107.861, D (stofflich) -19.1822
- Depletion potential of the stratospheric ozone layer (ODP) [kg R11 eq.]: A1 1.01205e-12, A2 4.12645e-14, A3 8.43155e-12, A1-A3 9.48486e-12, A5 1.73737e-15, C2 1.38962e-16, C3 1.7597e-13, D (energetisch) -1.26884e-11, D (stofflich) -2.39444e-13
- Acidification potential of soil and water (AP) [kg SO2-Äqv.]: A1 0.253313, A2 0.13454, A3 0.636428, A1-A3 1.02428, A5 0.000976798, C2 0.00349774, C3 0.00587833, D (energetisch) -0.319387, D (stofflich) -0.0723182
- Eutrophication potential (EP) [kg Phosphat-Äqv.]: A1 0.113597, A2 0.0334291, A3 0.142435, A1-A3 0.289461, A5 0.000194491, C2 0.000879919, C3 0.00104827, D (energetisch) -0.0586083, D (stofflich) -0.0172075
- Formation potential of tropospheric ozone (POCP) [kg Ethen-Äqv.]: A1 0.0176676, A2 -0.0246378, A3 0.318015, A1-A3 0.311044, A5 6.23463e-5, C2 -0.00147093, C3 0.000414745, D (energetisch) -0.0275168, D (stofflich) -0.000312157
- Abiotic depletion potential for non fossil resources (ADPE) [kg Sb-Äqv.]: A1 3.37049e-5, A2 2.62323e-6, A3 8.8041e-5, A1-A3 0.000124369, A5 1.5599e-7, C2 7.02937e-8, C3 1.75259e-6, D (energetisch) -8.62635e-5, D (stofflich) -3.49068e-6
- Abiotic depletion potential for fossil resources (ADPF) [MJ]: A1 3492.5, A2 376.152, A3 2315.11, A1-A3 6183.76, A5 1.85358, C2 11.5231, C3 42.2985, D (energetisch) -4043.33, D (stofflich) -236.149

## Use advice
Aufgrund der hohen Abdeckung bildet der Datensatz die durchschnittlichen Produktionsverhältnisse und die damit verbundenen Umweltwirkungen repräsentativ für Deutschland ab. Liegen keine herstellerspezifischen Ökobilanzergebnisse des verwendeten Produkts vor, empfiehlt sich die Verwendung dieses Durchschnittsdatensatzes.

## Data sources
- Rüter S, Diederichs S (2012) Ökobilanz Basisdaten für Bauprodukte aus Holz, Hamburg, Johann Heinrich von Thünen Institut, Institut für Holztechnologie und Holzbiologie, Abschlussbericht
- GaBi database SP40 2020
- GaBi database (general)
