# 3- und 5-Schicht Massivholzplatte (Durchschnitt DE)

Dataset: ILCD process, EPD, representative dataset
Geography: DE
Reference year: 2020
Valid until: 2025
Classification: OEKOBAU.DAT: Holz / Holzwerkstoffe / 3- und 5-Schichtplatten
Method details: EN 15804; ILCD format
Owner: Thünen-Institut für Holzforschung
Compliance: EN 15804
Review: Independent external review by Dr. Frank Werner - Umwelt & Entwicklung
Amounts: rows without a unit in brackets have none in this file; such an amount is in the reference unit of its flow, which a separate flow dataset defines
copyright: true

## General comment
Weitere Informationen zur deklarierten Einheit (Zusammensetzung) und die auf Herstellerangaben beruhende Sachbilanz (In- und Output der Stoff- und Energieströme) stehen als Excel-Datei unter dem Unterpunkt Hintergrund-Bericht zum Download bereit.
Der Datensatz wurde 2020 als Aktualisierung mit gleichbleibendem Vordergrundsystem erstellt. Alle Hintergrunddaten entstammen der GaBi Professional Datenbank 2020 im Service Pack 40. Die Modellierung und Berechnung der Ökobilanz basiert auf den europäischen Normen EN 15804:2012+A1:2013 und EN 16485:2014. Bei Rückfragen wenden Sie sich bitte an holzundklima@thuenen.de.

## Geography
Für die Ökobilanzierung von Schicht-Massivholzplatten wurden Daten von 2 Werken berücksichtigt (Rüter & Diederichs 2012). Für alle in Rüter & Diederichs (2012) angeführten Vollholzprodukte wurden von 2009 bis 2011 insgesamt 178 Prozesslinien erfasst. Im Verhältnis zu den vom Statistischen Bundesamt gemeldeten Produktionsmengen im selben Zeitraum entspricht die erreichte Abdeckung von Vollholzprodukten aus Nadelschnittholz 38 %.

## Time period
Der Datensatz basiert auf Produktionsdaten aus den Jahren 2009 bis 2011 (Vordergrundsystem).
Eine Aktualisierung des Hintergrundsystems erfolgte 2020.

## Technology and included processes
Massivholzplatten sind in der Regel symmetrisch aufgebaut und bestehen aus drei oder fünf recht-winklig zueinander verklebten Lagen aus Nadelschnittholz. Die Plattendicke beträgt normalerweise zwischen 12 und 100 mm. Die Verklebung von Massivholzplatten wird vornehmlich mittels Melamin-Harnstoff-Formaldehyd-Bindemittel durchgeführt. Für die Herstellung von Massivholzplatten werden Bretter und Bohlen aus Nadelholz zunächst auf weniger als 15 % Holzfeuchte getrocknet, gehobelt und mittels Schmalseitenverklebung zu einer Ein-schichtplatte verklebt. Diese werden nach der Aushärtung gehobelt, beleimt und anschließend in der Presse kreuzweise angeordnet. Nach dem Pressen und Aushärten wird der Rohling gehobelt, gefast, abgebunden und verpackt.
Die Holzfeuchte des Produktes liegt bei 12%

## Technical purpose
Massivholzplatten in 3- oder 5- schichtigem Aufbau sind industriell gefertigte flächige Holzprodukte für den Innenausbau, Möbelbau oder konstruktiven Holzbau.

## Scenarios
- energetisch: therm. Verwertung
- stofflich: stoffl. Verwertung

## Reference product
- 3- und 5 Schichtplatte: 1

## Inputs
- Use of renewable primary energy (PERE) [MJ]: A1 356.272, A2 20.0255, A3 1697.95, A1-A3 2074.24, A5 0.0837963, C2 0.416666, C3 30.8332, D (energetisch) 6221.02, D (stofflich) -26.5707
- Use of renewable primary energy resources used as raw materials (PERM) [MJ]: A1 8476.73, A2 0, A3 0, A1-A3 8476.73, A5 0, C2 0, C3 -8476.73, D (energetisch) 0, D (stofflich) 0
- Total use of renewable primary energy resources (PERT) [MJ]: A1 8833.01, A2 20.0255, A3 1697.95, A1-A3 10551, A5 0.0837963, C2 0.416666, C3 -8445.9, D (energetisch) 6221.02, D (stofflich) -26.5707
- Use of non renewable primary energy (PENRE) [MJ]: A1 590.996, A2 334.824, A3 1141.54, A1-A3 2067.36, A5 0.409319, C2 7.41985, C3 53.6094, D (energetisch) -4880.1, D (stofflich) -144.435
- Use of non renewable primary energy resources used as raw materials (PENRM) [MJ]: A1 178.382, A2 0, A3 27.612, A1-A3 205.994, A5 -27.612, C2 0, C3 -178.382, D (energetisch) 0, D (stofflich) 0
- Total use of non renewable primary energy resource (PENRT) [MJ]: A1 769.377, A2 334.824, A3 1169.15, A1-A3 2273.35, A5 -27.2027, C2 7.41985, C3 -124.772, D (energetisch) -4880.1, D (stofflich) -144.435
- Use of secondary material (SM) [kg]: A1 0, A2 0, A3 0, A1-A3 0, A5 0, C2 0, C3 0, D (energetisch) 0, D (stofflich) 511.709
- Use of renewable secondary fuels (RSF) [MJ]: A1 22.108, A2 0, A3 87.2794, A1-A3 109.387, A5 0, C2 0, C3 0, D (energetisch) 0, D (stofflich) 0
- Use of non renewable secondary fuels (NRSF) [MJ]: A1 0, A2 0, A3 0, A1-A3 0, A5 0, C2 0, C3 0, D (energetisch) 0, D (stofflich) 0
- Use of net fresh water (FW) [m3]: A1 0.14029, A2 0.0188153, A3 0.384596, A1-A3 0.543701, A5 0.00405618, C2 0.000482471, C3 0.0166923, D (energetisch) 0.8782, D (stofflich) -0.0165389

## Outputs
- Hazardous waste disposed (HWD) [kg]: A1 1.17836e-5, A2 1.31812e-5, A3 6.93925e-6, A1-A3 3.1904e-5, A5 1.15154e-9, C2 3.45296e-7, C3 3.60527e-8, D (energetisch) -2.69891e-6, D (stofflich) -5.57829e-6
- Non hazardous waste dispose (NHWD) [kg]: A1 0.415935, A2 0.0578044, A3 1.87573, A1-A3 2.34947, A5 0.022423, C2 0.00113552, C3 0.0412596, D (energetisch) 12.1119, D (stofflich) -0.041071
- Radioactive waste disposed (RWD) [kg]: A1 0.0100008, A2 0.00047795, A3 0.0900209, A1-A3 0.1005, A5 1.20323e-5, C2 9.18382e-6, C3 0.00448112, D (energetisch) -0.311827, D (stofflich) -0.00311967
- Components for re-use (CRU) [kg]: A1 0, A2 0, A3 0, A1-A3 0, A5 0, C2 0, C3 0, D (energetisch) 0, D (stofflich) 0
- Materials for recycling (MFR) [kg]: A1 0, A2 0, A3 0, A1-A3 0, A5 0, C2 0, C3 511.709, D (energetisch) 0, D (stofflich) 0
- Materials for energy recovery (MER) [kg]: A1 0, A2 0, A3 0, A1-A3 0, A5 0, C2 0, C3 511.709, D (energetisch) 0, D (stofflich) 0
- Exported electrical energy (EEE) [MJ]: A1 0, A2 0, A3 0.399238, A1-A3 0.399238, A5 2.52043, C2 0, C3 0, D (energetisch) 0, D (stofflich) 0
- Exported thermal energy (EET) [MJ]: A1 0, A2 0, A3 0.927477, A1-A3 0.927477, A5 5.83316, C2 0, C3 0, D (energetisch) 0, D (stofflich) 0

## Impact indicators
- Global warming potential (GWP) [kg CO2-Äqv.]: A1 -764.07, A2 24.7273, A3 91.9222, A1-A3 -647.42, A5 0.872785, C2 0.535835, C3 810.116, D (energetisch) -261.097, D (stofflich) -11.1256
- Depletion potential of the stratospheric ozone layer (ODP) [kg R11 eq.]: A1 3.71796e-13, A2 1.16374e-14, A3 1.19067e-11, A1-A3 1.22902e-11, A5 4.6917e-16, C2 8.91962e-17, C3 1.7597e-13, D (energetisch) -1.22444e-11, D (stofflich) -1.20763e-13
- Acidification potential of soil and water (AP) [kg SO2-Äqv.]: A1 0.139978, A2 0.0995895, A3 0.302038, A1-A3 0.541605, A5 0.000255778, C2 0.00224511, C3 0.00587833, D (energetisch) -0.338875, D (stofflich) -0.0459972
- Eutrophication potential (EP) [kg Phosphat-Äqv.]: A1 0.0429537, A2 0.0251926, A3 0.0617853, A1-A3 0.129932, A5 5.36535e-5, C2 0.000564798, C3 0.00104827, D (energetisch) -0.0584099, D (stofflich) -0.0110359
- Formation potential of tropospheric ozone (POCP) [kg Ethen-Äqv.]: A1 0.0200246, A2 -0.0428002, A3 0.0713823, A1-A3 0.0486068, A5 1.45579e-5, C2 -0.000944152, C3 0.000414745, D (energetisch) -0.0274402, D (stofflich) -7.48431e-5
- Abiotic depletion potential for non fossil resources (ADPE) [kg Sb-Äqv.]: A1 1.09446e-5, A2 2.27188e-6, A3 4.08581e-5, A1-A3 5.40746e-5, A5 3.11168e-8, C2 4.51197e-8, C3 1.75259e-6, D (energetisch) -0.000105394, D (stofflich) -1.8935e-6
- Abiotic depletion potential for fossil resources (ADPF) [MJ]: A1 744.615, A2 333.606, A3 916.912, A1-A3 1995.13, A5 0.378945, C2 7.39641, C3 42.2985, D (energetisch) -3914.62, D (stofflich) -136.557

## Use advice
Der Datensatz bildet die durchschnittlichen Produktionsverhältnisse und die damit verbundenen Umweltwirkungen repräsentativ für Deutschland ab. Liegen keine herstellerspezifischen Ökobilanzergebnisse des verwendeten Produkts vor, empfiehlt sich die Verwendung dieses Durchschnittsdatensatzes.

## Data sources
- Rüter S, Diederichs S (2012) Ökobilanz Basisdaten für Bauprodukte aus Holz, Hamburg, Johann Heinrich von Thünen Institut, Institut für Holztechnologie und Holzbiologie, Abschlussbericht
- GaBi database SP40 2020
- GaBi database (general)
