# Nadelschnittholz - frisch (Durchschnitt DE)

Dataset: ILCD process, EPD, representative dataset
Geography: DE
Reference year: 2020
Valid until: 2025
Classification: OEKOBAU.DAT: Holz / Vollholz / Bau-Schnittholz
Method details: EN 15804; ILCD format
Owner: Thünen-Institut für Holzforschung
Compliance: EN 15804
Review: Independent external review by Dr. Frank Werner - Umwelt & Entwicklung
Amounts: rows without a unit in brackets have none in this file; such an amount is in the reference unit of its flow, which a separate flow dataset defines
copyright: true

## General comment
Weitere Informationen zur deklarierten Einheit (Zusammensetzung) und die auf Herstellerangaben beruhende Sachbilanz (In- und Output der Stoff- und Energieströme) stehen als Excel-Datei unter dem Unterpunkt Hintergrundbericht zum Download bereit.
Der Datensatz wurde 2020 als Aktualisierung mit gleichbleibendem Vordergrundsystem erstellt. Alle Hintergrunddaten entstammen der GaBi Professional Datenbank 2020 im Service Pack 40. Die Modellierung und Berechnung der Ökobilanz basiert auf den europäischen Normen EN 15804:2012+A1:2013 und EN 16485:2014. Bei Rückfragen wenden Sie sich bitte an holzundklima@thuenen.de.

## Geography
Für die Ökobilanzierung von frischem Nadelschnittholz wurden Daten von 31 Werken berücksichtigt (Rüter & Diederichs 2012). Im Rahmen der den Daten zugrunde liegenden Ökobilanzstudie wurden insgesamt 178 Prozesslinien für Vollholzprodukte erfasst. Im Verhältnis zu den vom Statistischen Bundesamt gemeldeten Produktionsmengen im selben Zeitraum entspricht die erreichte Abdeckung von Vollholzprodukten aus Nadelschnittholz 38 %.

## Time period
Der Datensatz basiert auf Produktionsdaten aus den Jahren 2009 bis 2011 (Vordergrundsystem).
Eine Aktualisierung des Hintergrundsystems erfolgte 2020.

## Technology and included processes
Das dem Forst entnommene Stammholz wird teilweise bereits im Wald entrindet, auf Rundholz-LKW an die Sägewerke geliefert und visuell geprüft. Die Stämme werden, sofern noch nicht geschehen, entrindet, je nach Lieferlänge (teilweise bis 22 m), den Maschinenbedingungen und den Auftragsvorgaben gekappt und nach Durchmessern und Holzart sortiert zwischengelagert. Der Einschnitt erfolgt je nach verwendeter Technologie mittels Profilzerspanern, Kreissägen oder Bandsägen. Dabei können mehrere Maschinentypen in Reihe geschaltet sein oder der Stamm bzw. dessen Teile mehrmals durch die gleiche Maschine gefahren werden. Die Technologien bzw. die Auslegungen der einzelnen Technologien innerhalb eines Sägewerkes unterscheiden sich hauptsächlich in der möglichen Bearbeitungsgeschwindigkeit, der minimal und maximal möglichen Bearbeitungsdurchmesser der Menge an anfallenden Reststoffen, der Reststoffformen, der möglichen Dimensionsvariabilität der Produkte sowie der möglichen Ausbeute an Hauptware (Schnittholz) bei schwankender Qualität (z.B. bei Krummschaftigkeit) des Stammholzes. Die Produkte werden verpackt und liegen bereit am Werkstor der Fertigung zur weiteren Verwendung.
Die Holzfeuchte des Produktes liegt bei 55%

## Technical purpose
Nadelschnittholz (NH) findet Anwendung in der Bau- und Möbelindustrie. Im Baubereich werden aus Nadelschnittholz insbesondere Holzhäuser, Dachstühle, Fenster und Türen sowie Fußböden (Dielen, Parkett oder Laminat) hergestellt.

## Scenarios
- energetisch: thermische Verwertung
- stofflich: stoffliche Verwertung

## Reference product
- Nadelschnittholz - frisch (Durchschnitt DE): 1

## Inputs
- Use of renewable primary energy (PERE) [MJ]: A1 22.3422, A2 4.62744, A3 103.109, A1-A3 130.078, A5 0.159117, C2 0.392896, C3 30.8332, D (energetisch) 6239.26, D (stofflich) -29.2807
- Use of renewable primary energy resources used as raw materials (PERM) [MJ]: A1 8388.86, A2 0, A3 28.3434, A1-A3 8417.2, A5 -28.3434, C2 0, C3 -8388.86, D (energetisch) 0, D (stofflich) 0
- Total use of renewable primary energy resources (PERT) [MJ]: A1 8411.2, A2 4.62744, A3 131.452, A1-A3 8547.28, A5 -28.1843, C2 0.392896, C3 -8358.03, D (energetisch) 6239.26, D (stofflich) -29.2807
- Use of non renewable primary energy (PENRE) [MJ]: A1 182.121, A2 76.739, A3 175.624, A1-A3 434.485, A5 0.868001, C2 6.99656, C3 53.6094, D (energetisch) -4727.41, D (stofflich) -153.176
- Use of non renewable primary energy resources used as raw materials (PENRM) [MJ]: A1 0, A2 0, A3 1.008, A1-A3 1.008, A5 -1.008, C2 0, C3 0, D (energetisch) 0, D (stofflich) 0
- Total use of non renewable primary energy resource (PENRT) [MJ]: A1 182.121, A2 76.739, A3 176.632, A1-A3 435.493, A5 -0.139999, C2 6.99656, C3 53.6094, D (energetisch) -4727.41, D (stofflich) -153.176
- Use of secondary material (SM) [kg]: A1 0, A2 0, A3 0, A1-A3 0, A5 0, C2 0, C3 0, D (energetisch) 0, D (stofflich) 674.732
- Use of renewable secondary fuels (RSF) [MJ]: A1 0, A2 0, A3 0, A1-A3 0, A5 0, C2 0, C3 0, D (energetisch) 0, D (stofflich) 0
- Use of non renewable secondary fuels (NRSF) [MJ]: A1 0, A2 0, A3 0, A1-A3 0, A5 0, C2 0, C3 0, D (energetisch) 0, D (stofflich) 0
- Use of net fresh water (FW) [m3]: A1 0.0155109, A2 0.0040812, A3 0.0493209, A1-A3 0.068913, A5 0.00923142, C2 0.000454947, C3 0.0166923, D (energetisch) 0.72193, D (stofflich) -0.0181432

## Outputs
- Hazardous waste disposed (HWD) [kg]: A1 1.01095e-5, A2 2.8563e-6, A3 1.69316e-6, A1-A3 1.46589e-5, A5 2.29816e-9, C2 3.25598e-7, C3 3.60527e-8, D (energetisch) -2.85153e-6, D (stofflich) -5.52046e-6
- Non hazardous waste dispose (NHWD) [kg]: A1 0.0456461, A2 0.0136529, A3 0.127374, A1-A3 0.186673, A5 0.0336533, C2 0.00107074, C3 0.0412596, D (energetisch) 2.21829, D (stofflich) -0.0406452
- Radioactive waste disposed (RWD) [kg]: A1 0.00208496, A2 0.000106337, A3 0.0105445, A1-A3 0.0127358, A5 4.71182e-5, C2 8.65989e-6, C3 0.00448112, D (energetisch) -0.312272, D (stofflich) -0.00351913
- Components for re-use (CRU) [kg]: A1 0, A2 0, A3 0, A1-A3 0, A5 0, C2 0, C3 0, D (energetisch) 0, D (stofflich) 0
- Materials for recycling (MFR) [kg]: A1 0, A2 0, A3 0, A1-A3 0, A5 0, C2 0, C3 674.732, D (energetisch) 0, D (stofflich) 0
- Materials for energy recovery (MER) [kg]: A1 0, A2 0, A3 0, A1-A3 0, A5 0, C2 0, C3 674.732, D (energetisch) 0, D (stofflich) 0
- Exported electrical energy (EEE) [MJ]: A1 0, A2 0, A3 0.124386, A1-A3 0.124386, A5 5.50041, C2 0, C3 0, D (energetisch) 0, D (stofflich) 0
- Exported thermal energy (EET) [MJ]: A1 0, A2 0, A3 0.288964, A1-A3 0.288964, A5 9.93535, C2 0, C3 0, D (energetisch) 0, D (stofflich) 0

## Impact indicators
- Global warming potential (GWP) [kg CO2-Äqv.]: A1 -783.129, A2 5.70503, A3 10.9331, A1-A3 -766.491, A5 2.81172, C2 0.505266, C3 801.762, D (energetisch) -356.693, D (stofflich) -11.8035
- Depletion potential of the stratospheric ozone layer (ODP) [kg R11 eq.]: A1 7.91202e-14, A2 2.89824e-15, A3 4.1222e-13, A1-A3 4.94238e-13, A5 6.49636e-16, C2 8.41076e-17, C3 1.7597e-13, D (energetisch) -1.22615e-11, D (stofflich) -1.36359e-13
- Acidification potential of soil and water (AP) [kg SO2-Äqv.]: A1 0.0769721, A2 0.0232457, A3 0.0419546, A1-A3 0.142172, A5 0.000386185, C2 0.00211703, C3 0.00587833, D (energetisch) -0.358811, D (stofflich) -0.0465362
- Eutrophication potential (EP) [kg Phosphat-Äqv.]: A1 0.0185996, A2 0.00589625, A3 0.00846896, A1-A3 0.0329648, A5 8.10601e-5, C2 0.000532576, C3 0.00104827, D (energetisch) -0.0597769, D (stofflich) -0.0110744
- Formation potential of tropospheric ozone (POCP) [kg Ethen-Äqv.]: A1 0.00952952, A2 -0.0101042, A3 0.00362232, A1-A3 0.00304765, A5 2.56837e-5, C2 -0.000890289, C3 0.000414745, D (energetisch) -0.0281226, D (stofflich) -0.000172914
- Abiotic depletion potential for non fossil resources (ADPE) [kg Sb-Äqv.]: A1 1.83025e-6, A2 5.3482e-7, A3 9.3342e-6, A1-A3 1.16993e-5, A5 4.44217e-8, C2 4.25457e-8, C3 1.75259e-6, D (energetisch) -0.000118935, D (stofflich) -2.05583e-6
- Abiotic depletion potential for fossil resources (ADPF) [MJ]: A1 176.853, A2 76.468, A3 149.007, A1-A3 402.329, A5 0.749361, C2 6.97445, C3 42.2985, D (energetisch) -3939.19, D (stofflich) -144.29

## Use advice
Aufgrund der hohen Abdeckung bildet der Datensatz die durchschnittlichen Produktionsverhältnisse und die damit verbundenen Umweltwirkungen repräsentativ für Deutschland ab. Liegen keine herstellerspezifischen Ökobilanzergebnisse des verwendeten Produkts vor, empfiehlt sich die Verwendung dieses Durchschnittsdatensatzes.

## Data sources
- Rüter S, Diederichs S (2012) Ökobilanz Basisdaten für Bauprodukte aus Holz, Hamburg, Johann Heinrich von Thünen Institut, Institut für Holztechnologie und Holzbiologie, Abschlussbericht
- GaBi database SP40 2020
- GaBi database (general)
