# Massivholzparkett (Durchschnitt DE)

Dataset: ILCD process, EPD, representative dataset
Geography: DE
Reference year: 2020
Valid until: 2025
Classification: OEKOBAU.DAT: Holz / Holzböden / Parkett
Method details: EN 15804; ILCD format
Owner: Thünen-Institut für Holzforschung
Compliance: EN 15804
Review: Independent external review by Dr. Frank Werner - Umwelt & Entwicklung
Amounts: rows without a unit in brackets have none in this file; such an amount is in the reference unit of its flow, which a separate flow dataset defines
copyright: true

## General comment
Weitere Informationen zur deklarierten Einheit (Zusammensetzung) und die auf Herstellerangaben beruhende Sachbilanz (In- und Output der Stoff- und Energieströme) stehen als Excel-Datei unter dem Unterpunkt Hintergrund-Bericht zum Download bereit.
Der Datensatz wurde 2020 als Aktualisierung mit gleichbleibendem Vordergrundsystem erstellt. Alle Hintergrunddaten entstammen der GaBi Professional Datenbank 2020 im Service Pack 40. Die Modellierung und Berechnung der Ökobilanz basiert auf den europäischen Normen EN 15804:2012+A1:2013 und EN 16485:2014. Bei Rückfragen wenden Sie sich bitte an holzundklima@thuenen.de.

## Geography
Im Bereich der Parkettproduktion werden durch das Statistische Bundesamt nur 2 Meldenummern gelistet, die insgesamt eine Produktion von 9,6 Mio. m² angeben, wobei hier zwischen Mosaikparkett (1622 10 300) und Anderen (1622 10 600) unterschieden wird. Die Erhebung im Parkettbereich lieferte aussagekräftige Zahlen für 315.000 m² Massivholzbodenbeläge, die im Wesentlichen Stabparkett und Massivholzdielen, aber auch Hochkantlamellen und Mosaikparkett repräsentieren. Daneben wurde die Produktion von insgesamt 7,9 Mio. m² Mehrschichtparkett analysiert. Die Bilanzierung der Parkettproduktion konnten etwa 88 % der unter Meldenummer 1622 10 600 gelisteten Produktion und 12 % der unter Meldenummer 1622 10 300 gelisteten Produktionsmengen abdecken.
Holzfeuchte 9%

## Time period
Der Datensatz basiert auf Produktionsdaten aus den Jahren 2009 bis 2011 (Vordergrundsystem).
Eine Aktualisierung des Hintergrundsystems erfolgte 2020.

## Technology and included processes
Einschichtige Holzböden sind einschichtige Bodenbeläge aus massivem Holz in Form von Massivholz-parkett, Massivholzdielen oder Holzpflaster. Die Böden haben Dicken zwischen 8 und 40 mm und werden teilweise schwimmend, teilweise fest mit dem Untergrund verklebt, verlegt. Die hier betrachteten Produkte sind Massivholzböden am Werkstor der Herstellung ohne Oberflächenbeschichtung. Zur Herstellung von einschichtigen Massivholzböden wird getrocknetes Schnittholz oder Hobelware in mehreren Schritten zu verlegbaren, massiven Einzelelementen verarbeitet. Teilweise werden Rundhölzer eingekauft, die analog zur Herstellung von Schnittholz zunächst aufgetrennt und getrocknet werden. Je nach erwünschter Dimension der Einzelelemente werden je m² Bodenfläche verschieden viele Sägeschnitte und Hobelprozesse durchgeführt. Bei Stabparkett wird zusätzlich eine umlaufende Nut oder Nut und Feder angebracht. Grundsätzlich gilt, je kleiner die Einzelteile sind, desto höher wird der Prozessaufwand je m² Bodenfläche. Das Produkt wird nach Fertigstellung für den Transport zur Baustelle verpackt.

## Technical purpose
Massivholzparkett kommt als Fußbodenbelag zum Einsatz.

## Scenarios
- energetisch: therm. Verwertung
- stofflich: stoffl. Verwertung

## Reference product
- Massivholzparkett: 1

## Inputs
- Use of renewable primary energy (PERE) [MJ]: A1 76.0833, A2 0.000140897, A3 471.867, A1-A3 547.95, A5 0.009878, C2 0.00978278, C3 0.542531, D (energetisch) 154.931, D (stofflich) -0.959731
- Use of renewable primary energy resources used as raw materials (PERM) [MJ]: A1 208.875, A2 0, A3 0.205617, A1-A3 209.081, A5 -0.205617, C2 0, C3 -208.875, D (energetisch) 0, D (stofflich) 0
- Total use of renewable primary energy resources (PERT) [MJ]: A1 284.959, A2 0.000140897, A3 472.072, A1-A3 757.031, A5 -0.195739, C2 0.00978278, C3 -208.333, D (energetisch) 154.931, D (stofflich) -0.959731
- Use of non renewable primary energy (PENRE) [MJ]: A1 12.9275, A2 0.00250904, A3 77.0992, A1-A3 90.0292, A5 0.04825, C2 0.174208, C3 0.943293, D (energetisch) -118.506, D (stofflich) -4.75268
- Use of non renewable primary energy resources used as raw materials (PENRM) [MJ]: A1 0, A2 0, A3 0.0155376, A1-A3 0.0155376, A5 -0.0155376, C2 0, C3 0, D (energetisch) 0, D (stofflich) 0
- Total use of non renewable primary energy resource (PENRT) [MJ]: A1 12.9275, A2 0.00250904, A3 77.1147, A1-A3 90.0447, A5 0.0327124, C2 0.174208, C3 0.943293, D (energetisch) -118.506, D (stofflich) -4.75268
- Use of secondary material (SM) [kg]: A1 0, A2 0, A3 0, A1-A3 0, A5 0, C2 0, C3 0, D (energetisch) 0, D (stofflich) 11.705
- Use of renewable secondary fuels (RSF) [MJ]: A1 0, A2 0, A3 0.254271, A1-A3 0.254271, A5 0, C2 0, C3 0, D (energetisch) 0, D (stofflich) 0
- Use of non renewable secondary fuels (NRSF) [MJ]: A1 0, A2 0, A3 0, A1-A3 0, A5 0, C2 0, C3 0, D (energetisch) 0, D (stofflich) 0
- Use of net fresh water (FW) [m3]: A1 0.00273905, A2 1.63149e-7, A3 0.0215022, A1-A3 0.0242414, A5 0.000482955, C2 1.13278e-5, C3 0.000293712, D (energetisch) 0.0178306, D (stofflich) -0.000574895

## Outputs
- Hazardous waste disposed (HWD) [kg]: A1 4.3303e-7, A2 1.16763e-10, A3 1.19455e-6, A1-A3 1.62769e-6, A5 1.35642e-10, C2 8.1071e-9, C3 6.34371e-10, D (energetisch) -7.09151e-8, D (stofflich) -1.37455e-7
- Non hazardous waste dispose (NHWD) [kg]: A1 0.0618704, A2 3.8398e-7, A3 0.489968, A1-A3 0.551838, A5 0.00274953, C2 2.66605e-5, C3 0.00072599, D (energetisch) 0.0551671, D (stofflich) -0.00101203
- Radioactive waste disposed (RWD) [kg]: A1 0.000663713, A2 3.10553e-9, A3 0.00554621, A1-A3 0.00620993, A5 1.5935e-6, C2 2.15624e-7, C3 7.88484e-5, D (energetisch) -0.00779945, D (stofflich) -0.000121101
- Components for re-use (CRU) [kg]: A1 0, A2 0, A3 0, A1-A3 0, A5 0, C2 0, C3 0, D (energetisch) 0, D (stofflich) 0
- Materials for recycling (MFR) [kg]: A1 0, A2 0, A3 0, A1-A3 0, A5 0, C2 0, C3 11.705, D (energetisch) 0, D (stofflich) 0
- Materials for energy recovery (MER) [kg]: A1 0, A2 0, A3 0, A1-A3 0, A5 0, C2 0, C3 11.705, D (energetisch) 0, D (stofflich) 0
- Exported electrical energy (EEE) [MJ]: A1 0, A2 0, A3 0.0285201, A1-A3 0.0285201, A5 0.312747, C2 0, C3 0, D (energetisch) 0, D (stofflich) 0
- Exported thermal energy (EET) [MJ]: A1 0, A2 0, A3 0.0662557, A1-A3 0.0662557, A5 0.70278, C2 0, C3 0, D (energetisch) 0, D (stofflich) 0

## Impact indicators
- Global warming potential (GWP) [kg CO2-Äqv.]: A1 -18.7332, A2 0.000185455, A3 6.10158, A1-A3 -12.6314, A5 0.126645, C2 0.0125807, C3 19.932, D (energetisch) -8.9336, D (stofflich) -0.356782
- Depletion potential of the stratospheric ozone layer (ODP) [kg R11 eq.]: A1 2.58758e-14, A2 3.01619e-20, A3 9.38821e-13, A1-A3 9.64697e-13, A5 5.35734e-17, C2 2.09421e-18, C3 3.0963e-15, D (energetisch) -3.06251e-13, D (stofflich) -4.71053e-15
- Acidification potential of soil and water (AP) [kg SO2-Äqv.]: A1 0.0104173, A2 9.4573e-7, A3 0.0348855, A1-A3 0.0453037, A5 2.86391e-5, C2 5.27123e-5, C3 0.000103433, D (energetisch) -0.00897868, D (stofflich) -0.00121401
- Eutrophication potential (EP) [kg Phosphat-Äqv.]: A1 0.00228075, A2 2.37473e-7, A3 0.00806516, A1-A3 0.0103461, A5 5.84405e-6, C2 1.32607e-5, C3 1.84451e-5, D (energetisch) -0.00149698, D (stofflich) -0.000286114
- Formation potential of tropospheric ozone (POCP) [kg Ethen-Äqv.]: A1 0.00106826, A2 -1.36764e-7, A3 0.00374421, A1-A3 0.00481233, A5 1.6414e-6, C2 -2.21674e-5, C3 7.29772e-6, D (energetisch) -0.000704233, D (stofflich) -9.14845e-6
- Abiotic depletion potential for non fossil resources (ADPE) [kg Sb-Äqv.]: A1 7.28806e-7, A2 1.52574e-11, A3 2.83902e-6, A1-A3 3.56785e-6, A5 4.1972e-9, C2 1.05935e-9, C3 3.08379e-8, D (energetisch) -2.97298e-6, D (stofflich) -6.63413e-8
- Abiotic depletion potential for fossil resources (ADPF) [MJ]: A1 11.3989, A2 0.00250112, A3 63.9189, A1-A3 75.3203, A5 0.0442297, C2 0.173658, C3 0.74427, D (energetisch) -98.8193, D (stofflich) -4.44692

## Use advice
Aufgrund der hohen Abdeckung bildet der Datensatz die durchschnittlichen Produktionsverhältnisse und die damit verbundenen Umweltwirkungen repräsentativ für Deutschland ab. Liegen keine herstellerspezifischen Ökobilanzergebnisse des verwendeten Produkts vor, empfiehlt sich die Verwendung dieses Durchschnittsdatensatzes.

## Data sources
- Rüter S, Diederichs S (2012) Ökobilanz Basisdaten für Bauprodukte aus Holz, Hamburg, Johann Heinrich von Thünen Institut, Institut für Holztechnologie und Holzbiologie, Abschlussbericht
- GaBi database SP40 2020
- GaBi database (general)
